// SBML level 2 version 3

model akman2()

  // Compartments:
  compartment cytoplasm = 1;  // isVersionOf GO:0005737
  compartment nucleus = 1;  // isVersionOf GO:0005634

  // Species:
  species FC in cytoplasm = 2.462463;  // isVersionOf uniprot:P19970
  species FCp in cytoplasm = 2.712311;  // isVersionOf uniprot:P19970
  species FN in nucleus = 1.844;  // isVersionOf uniprot:P19970
  species FNp in nucleus = 2.74225;  // isVersionOf uniprot:P19970
  species MF in nucleus = 0.7255793;  // encodes uniprot:P19970

  // Parameters:
  amp = 0;
  dawn = 6;
  dusk = 18;
  k1n = 0.2226367;
  k1np = 0.2723065;
  k2n = 0.3314845;
  k2np = 0.2954207;
  ki = 5.045433;
  km = 0.08460041;
  ks = 0.3138465;
  ksp = 0.2948402;
  n = 6.3958;
  vd = 0.1611115;
  vdp = 0.1397503;
  vm = 0.8853763;
  vs = 1.223633;

  // Assignment rules:
  Tot_FRQ := FC + FCp + FN + FNp;
  observable_task0_model0_akman2_MF := MF;
  observable_task0_model0_akman2_Tot_FRQ := task0_model0_akman2_Tot_FRQ;

  // Reactions:
  FCdeg: FC => ; vd*FC;  // isVersionOf GO:0009056
  FCpdeg: FCp => ; vdp*FCp;  // isVersionOf GO:0009056
  FCptrl: => FCp; ksp*MF;  // modifiers: MF; isVersionOf GO:0006412
  FCptrs: FCp -> FNp; k1np*FCp - k2np*FNp;  // isVersionOf GO:0006810
  FCtrl: => FC; ks*MF;  // modifiers: MF; isVersionOf GO:0006412
  FCtrs: FC -> FN; k1n*FC - k2n*FN;  // isVersionOf GO:0006810
  MFdeg: MF => ; vm*MF/(km + MF);  // isVersionOf GO:0009056
  MFtrn: => MF; (vs + amp*((1 + tanh(2*(time - 24*floor(time/24) - dawn)))*(1 - tanh(2*(time - 24*floor(time/24) - dusk)))/4))*ki^n/(ki^n + (FN + FNp)^n);  // modifiers: FN, FNp; isVersionOf GO:0006351
end
