// SBML level 2 version 3

model akman1()

  // Compartments:
  compartment cytosol = 1;  // GO:0005829
  compartment nucleus = 1;  // GO:0005634

  // Species:
  species E1F in cytosol = 0.43076; E1F is "s-Frq_1";  // isVersionOf uniprot:P19970
  species E1Fp in cytosol = 0.45583; E1Fp is "l-Frq_1";  // isVersionOf uniprot:P19970
  species E1W in cytosol = 5.84748; E1W is "WC-1_1";  // isVersionOf uniprot:Q01371
  species E2F in cytosol = 0.10647; E2F is "s-Frq_2";  // isVersionOf uniprot:P19970
  species E2Fp in cytosol = 0.09872; E2Fp is "l-Frq_2";  // isVersionOf uniprot:P19970
  species E2W in cytosol = 5.70265; E2W is "WC-1_2";  // isVersionOf uniprot:Q01371
  species Frq_tot in nucleus; Frq_tot is "tot Frq";  // isVersionOf uniprot:P19970
  species MF in nucleus = 0.6935; MF is "Frq mRNA";  // isVersionOf CHEBI:33699 kegg.compound:C00046 uniprot:P19970
  species MW in nucleus = 1.2689; MW is "WC-1 mRNA";  // isVersionOf CHEBI:33699 kegg.compound:C00046 uniprot:Q01371
  species PF in nucleus = 0.06565; PF is "s-Frq";  // isVersionOf uniprot:P19970
  species PFp in nucleus = 0.07719; PFp is "l-Frq";  // isVersionOf uniprot:P19970
  species PW in nucleus = 26.4393; PW is "WC-1";  // isVersionOf uniprot:Q01371
  species PWL in nucleus = 0; PWL is "WC-1*";  // isVersionOf uniprot:Q01371
  species WC1_tot in nucleus; WC1_tot is "tot WC-1";  // isVersionOf uniprot:Q01371
  species lFrq_tot in nucleus; lFrq_tot is "tot l-Frq";  // isVersionOf uniprot:P19970
  species sFrq_tot in nucleus; sFrq_tot is "tot s-Frq";  // isVersionOf uniprot:P19970

  // Parameters:
  a1 = 24.9736;
  a2 = 3.59797;
  a3 = 0.2834;
  a3p = 0.34578;
  a4 = 0.46227;
  a5 = 0.02917;
  a6 = 0.20695;
  a7 = 3.02856;
  amp = 0;
  b1 = 0.00209;
  b10 = 93.03664;
  b2 = 2.13476;
  b3 = 0.08039;
  b4 = 0.45859;
  b5 = 0.13056;
  b6 = 0;
  b7 = 2.96739;
  b8 = 0.11167;
  b9 = 81.10381;
  d1 = 1.43549;
  d2 = 0.21251;
  d2p = 0.18191;
  d3 = 0.50309;
  d4 = 3.36641;
  d5 = 0.41085;
  dawn = 12;
  dusk = 24;
  f1 = 0.09292;
  f1p = 0.09588;
  f2 = 0.14979;
  gam1 = 0.34603;
  gam1p = 0.40119;
  gam2 = 0.00028;
  k = 2.18234;
  m = 1.34979;
  n = 1.02419;
  r1 = 2.71574;
  r2 = 35.40005;

  // Assignment rules:
  WC1_tot := PW + PWL + E1W + E2W;
  Frq_tot := sFrq_tot + lFrq_tot;
  lFrq_tot := PFp + E2Fp + E1Fp;
  sFrq_tot := PF + E2F + E1F;
  observable_task0_model0_akman1_MW := MW;
  observable_task0_model0_akman1_Frq_tot := Frq_tot;
  observable_task0_model0_akman1_MF := MF;
  observable_task0_model0_akman1_WC1_tot := WC1_tot;

  // Reactions:
  E1Fdeg: E1F => ; gam1*E1F;  // isVersionOf GO:0030163
  E1Fpdeg: E1Fp => ; gam1p*E1Fp;  // isVersionOf GO:0030163
  E1Fptrl: => E1Fp; a3p*MF;  // modifiers: MF; isVersionOf GO:0006412
  E1Ftrl: => E1F; a3*MF;  // modifiers: MF; isVersionOf GO:0006412
  E1Wdeg: E1W => ; gam2*E1W;  // isVersionOf GO:0030163
  E1Wtrl: => E1W; (a6 + a7*(PF + PFp))*MW;  // modifiers: MW, PF, PFp; isVersionOf GO:0006412
  E2Fdeg: E2F => ; gam1*E2F;  // isVersionOf GO:0030163
  E2Fpdeg: E2Fp => ; gam1p*E2Fp;  // isVersionOf GO:0030163
  E2Fptrl: E1Fp => E2Fp; f1p*E1Fp;  // isVersionOf GO:0016485
  E2Ftrl: E1F => E2F; f1*E1F;  // isVersionOf GO:0016485
  E2Wdeg: E2W => ; gam2*E2W;  // isVersionOf GO:0030163
  E2Wtrl: E1W => E2W; f2*E1W;  // isVersionOf GO:0016485
  MFdeg: MF => ; d1*MF/(MF + b5);  // isVersionOf GO:0006402
  MFtrn: => MF; a1*PWL^n/((1 + (PF + PFp)/b1)*(PWL^n + b2^n)) + a2*PW^m/((1 + (PF + PFp)/b3)*(PW^m + b4^m));  // modifiers: PF, PFp, PW, PWL; isVersionOf GO:0006351
  MWdeg: MW => ; d3*MW/(MW + b8);  // isVersionOf GO:0006402
  MWtrn: => MW; a4 + a5*PWL^k/(PWL^k + b7^k);  // modifiers: PWL; isVersionOf GO:0006351
  PFdeg: PF => ; d2*PF;  // isVersionOf GO:0030163
  PFpdeg: PFp => ; d2p*PFp;  // isVersionOf GO:0030163
  PFptrl: E2Fp => PFp; f1p*E2Fp;  // isVersionOf GO:0006606
  PFtrl: E2F => PF; f1*E2F;  // isVersionOf GO:0006606
  PWLdeg: PWL => ; d5*PWL/(PWL + b10);  // isVersionOf GO:0030163
  PWdeg: PW => ; d4*PW/(PW + b9);  // isVersionOf GO:0030163
  PWtrl: E2W => PW; f2*E2W;  // isVersionOf GO:0006606
  PWtrs: PW -> PWL; r1*amp*PW*(1 + tanh(24*(time - 24*floor(time/24) - dawn)))*(1 - tanh(24*(time - 24*floor(time/24) - dusk)))/4 - r2*PWL;  // isVersionOf GO:0051091 GO:0016037

  // Unit definitions:
  unit hours = 3600 second;
  unit arbitrary_units = dimensionless;
end
