// SBML level 3 version 1

model arnaout1()

  // Compartments:
  compartment default = 1;

  // Species:
  species x in default = 2.5;
  species y in default = 0.07;
  species z in default = 0.5;

  // Parameters:
  a = 0.02;
  b = 0.15;
  beta = 0.5;
  c = 1;
  d = 0.02;
  lambda = 0.05;
  p = 1;
  s = 0;

  // Assignment rules:
  v := 1000000*y;
  observable_task0_model0_arnaout1_v := v;
  observable_task0_model0_arnaout1_z := z;

  // Reactions:
  v1: -> x; lambda;
  v2: x -> ; d*x;
  v3: x -> y; beta*s*x*y;
  v4: y -> ; a*y;
  v5: y -> ; p*y*z;  // modifiers: z
  v6: -> z; c*y;  // modifiers: y
  v7: z -> ; b*z;
end
