// SBML level 2 version 1

model ataullahkhanov1()

  // Compartments:
  compartment cell = 1; cell is "Erythrocyte";  // GO:0005623

  // Species:
  species A in cell = 1.11; A is "Adenylate pool";  // hasVersion kegg.compound:C00020 kegg.compound:C00008 kegg.compound:C00002 CHEBI:16027
  species E in cell = 2.1; E is "Energy pool";  // hasVersion CHEBI:15422 CHEBI:16761 kegg.compound:C00008 kegg.compound:C00002
  species I in cell = 10; I is "Ions";  // CHEBI:29101 kegg.compound:C01330

  // Parameters:
  J = 100; J is "Extracellular ion concentration";
  var M; M is "AMP";
  P = 0.121; P is "Membrane permeability";
  var T; T is "ATP";
  U = 0.02; U is "de novo AMP synthesis";
  W = 0.01; W is "AMP degradation";
  W2 = 0.2; W2 is "Ion pump activity";
  W3 = 13.48; W3 is "Glycolytic activity";
  k = -1; k is "Dependence of AMP degradation on AMP";
  n = 1.2; n is "Dependence of AMP degradation on ATP";

  // Assignment rules:
  T := (A + 3*E - (6*A*E - 3*E^2 + A^2)^0.5)/6;
  M := (7*A - 3*E - (6*A*E - 3*E^2 + A^2)^0.5)/6;
  observable_task0_model0_ataullahkhanov1_I := I;
  observable_task0_model0_ataullahkhanov1_A := A;

  // Reactions:
  U1: => I; cell*P*J; U1 is "Passive ion influx";  // isVersionOf GO:0006814
  U2: 3 I + E => ; cell*W2*I*T; U2 is "ATP consumption by ion pump";  // hasPart GO:0042623 GO:0006814
  U3: => E; cell*W3*T^0.52*M^0.41; U3 is "ATP from glycolysis";  // isVersionOf GO:0006754
  U6_plus_3U7: E => ; cell*2*U; U6_plus_3U7 is "AMP synthesis de novo";  // hasPart GO:0003999 GO:0004001 ec-code:2.7.1.20 ec-code:2.4.2.7
  U6_plus_U7_minus_U8: => A; cell*U*(1 - W*T^n*M^k); U6_plus_U7_minus_U8 is "Adenylate pool";  // hasPart ec-code:2.4.2.7 ec-code:3.5.4.6 ec-code:2.7.1.20 GO:0003876

  // Unit definitions:
  unit millimole_default = 1e-3 mole; millimole_default is "millimole (default)";
  unit hour_default = 3600 second; hour_default is "hour (default)";
end
