// SBML level 2 version 4

function Mass_Action_2_1(k1, S1, S2)
  k1*S1*S2;
end

model bai1()

  // Compartments:
  compartment cell = 1;  // isVersionOf GO:0005623

  // Species:
  species D_1 in cell = 0;  // hasPart uniprot:Q9JKW8 uniprot:P25322
  species E_1 in cell = 0;  // hasPart uniprot:P97377 uniprot:Q61457
  species RS_1 in cell = 0;  // isVersionOf uniprot:Q61501
  species R in cell = 0;  // isVersionOf uniprot:P13405
  species X in cell = 0;
  species theta_1 in cell = 0;  // isVersionOf uniprot:Q61501

  // Parameters:
  GF_1 = 6.3;
  RT_1 = 2.5;
  var Rb_phos; Rb_phos is "Rb_phosphorylated";
  aD_1 = 0.4;
  aE_1 = 0.16;
  aF_1 = 0.9;
  aX_1 = 0.08;
  atheta_1 = 0.05;
  dD_1 = 0.4;
  dE_1 = 0.2;
  dX_1 = 1.04;
  dtheta_1 = 0.12;
  fC_1_1 = 0.003; fC_1_1 is "fe";
  f_1 = 0.35;
  g_1 = 0.528;
  k1_1 = 0.05;
  k2_1 = 1000;
  k3_1 = 1.5;
  pD_1 = 0.48;
  pE_1 = 0.096;
  pS_1 = 0.6;
  pX_1 = 0.48;
  qD_1 = 0.6;
  qE_1 = 0.6;
  qX_1 = 0.8;
  qtheta_1 = 0.3;

  // Assignment rules:
  Rb_phos := RT_1 - RS_1 - R;
  observable_task0_model0_bai1_D_1 := D_1;
  observable_task0_model0_bai1_E_1 := E_1;
  observable_task0_model0_bai1_theta_1 := theta_1;
  observable_task0_model0_bai1_X_1 := X;
  observable_task0_model0_bai1_RS_1 := RS_1;
  observable_task0_model0_bai1_Rb_phos := task0_model0_bai1_Rb_phos;

  // Reactions:
  E2Fdegradationviacellcycleprogression_1: theta_1 => ; cell*dtheta_1*(X/(qtheta_1 + X))*theta_1; E2Fdegradationviacellcycleprogression_1 is "E2F degradation via cell cycle progression";  // modifiers: X
  _1: => D_1; cell*aD_1*(GF_1/(k1_1^(-1) + GF_1)); _1 is "cyclinD synthesis";
  _2: RS_1 => theta_1; cell*(pD_1*RS_1*D_1/(qD_1 + RS_1 + D_1)); _2 is "pRB/E2F complex dissociation via cyclin D";  // modifiers: D_1
  cellcycleprogression_1: => X; cell*(aX_1*E_1 + f_1*theta_1 + g_1*X^2*E_1); cellcycleprogression_1 is "cell cycle progression go";  // modifiers: E_1, theta_1
  cellcycleprogressionslow_1: X => ; cell*dX_1*X; cellcycleprogressionslow_1 is "cell cycle progression slow";
  cyclinD_1: D_1 => ; cell*dD_1*E_1*D_1; cyclinD_1 is "cyclinD degradation";  // modifiers: E_1
  cyclinEdegradation_1: E_1 => ; cell*dE_1*X*E_1; cyclinEdegradation_1 is "cyclinE degradation";  // modifiers: X
  cyclinEsynthesis_1: => E_1; cell*aE_1*(GF_1/(k2_1^(-1) + GF_1) + aF_1*theta_1); cyclinEsynthesis_1 is "cyclinE synthesis";  // modifiers: theta_1
  null2_1: RS_1 => theta_1; cell*(pE_1*RS_1*E_1/(qE_1 + RS_1 + E_1)); null2_1 is "pRB/E2F complex dissociation via cyclin E";  // modifiers: E_1
  null3_1: => theta_1; cell*atheta_1*(GF_1/(k3_1^(-1) + GF_1) + fC_1_1*theta_1); null3_1 is "E2F synthesis";
  pRBdeplation_1: R + theta_1 => RS_1; cell*Mass_Action_2_1(pS_1, R, theta_1); pRBdeplation_1 is "pRB/E2F complex association";
  pRBsynthesis_1: => R; cell*(pX_1*(RT_1 - RS_1 - R)*X/(qX_1 + RT_1 - RS_1 - R + X)); pRBsynthesis_1 is "pRB synthesis";  // modifiers: RS_1, X
end
