// SBML level 3 version 1

model bajaria1()

  // Compartments:
  compartment default = 1;

  // Species:
  species MB in default = 550;
  species ML in default = 110000000000;
  species NB in default = 450;
  species NL in default = 90000000000;

  // Parameters:
  K1 = 100000000000;
  R = 6.5e19;
  alpha = 5000000;
  beta = 2e-7;
  eMB = 10;
  eML = 0.25;
  eNB = 40;
  eNL = 1;
  lambda = 0.1;
  muM = 0.003;
  muN = 0.002;

  // Assignment rules:
  SUMB := MB + NB;
  SUML := ML + NL;
  observable_task0_model0_bajaria_ML := ML;
  observable_task0_model0_bajaria_NL := NL;
  observable_task0_model0_bajaria_SUML := task0_model0_bajaria_SUML;
  observable_task0_model0_bajaria_MB := MB;
  observable_task0_model0_bajaria_NB := NB;
  observable_task0_model0_bajaria_SUMB := task0_model0_bajaria_SUMB;

  // Reactions:
  v1: -> NB; beta*eNL*NL;  // modifiers: NL
  v10: ML -> ; eML*ML;
  v11: ML -> ; muM*ML;
  v12: -> NL; 90000000000*0.97^(time/365)*muN;
  v13: -> ML; R/(K1 + NL);  // modifiers: NL
  v2: NB -> ; eNB*NB;
  v3: -> MB; beta*eML*ML;  // modifiers: ML
  v4: MB -> ; eMB*MB;
  v5: -> NL; alpha*eNB*NB;  // modifiers: NB
  v6: NL -> ; eNL*NL;
  v7: NL -> ; muN*NL;
  v8: -> ML; lambda*muN*NL;  // modifiers: NL
  v9: -> ML; alpha*eMB*MB;  // modifiers: MB
end
