// SBML level 2 version 4

model band1()

  // Compartments:
  compartment cell = 1;  // isVersionOf GO:0005623

  // Species:
  species TIR1 in cell = 15.4;  // isVersionOf uniprot:Q570C0 uniprot:Q9ZR12 uniprot:Q9LW29 uniprot:Q9LPW7
  species VENUS in cell = 40.4;  // hasPart uniprot:Q940U6 uniprot:Q9XFM0
  species auxin in cell = 7.38;  // isVersionOf uniprot:P49677
  species auxinTIR1 in cell = 0.28;  // hasPart uniprot:P49677 uniprot:Q570C0
  species auxinTIR1VENUS in cell = 2.78;  // hasPart uniprot:P49677 uniprot:Q570C0 uniprot:Q9XFM0 uniprot:Q940U6

  // Parameters:
  TIR1T = 18.5;
  alpha_tr = 30.5;
  delta = 0.486;
  ka = 0.000822;
  kd = 0.334;
  la = 1.15;
  lambda = 0.00316;
  ld = 4.49;
  lm = 0.175;
  mu = 0.79;

  // Assignment rules:
  observable_plot1_auxin_datagen1 := task1_model1_band1_auxin;
  observable_plot3_auxin_datagen1 := task3_model3_band1_auxin;
  observable_plot5_auxin_datagen1 := task5_model5_band1_auxin;
  observable_task7_model7_band1_auxin := auxin;
  observable_plot2_auxin_datagen1 := task2_model2_band1_auxin;
  observable_plot6_auxin_datagen1 := task6_model6_band1_auxin;

  // Reactions:
  VENUSphotobleachingdecay: VENUS => ; lambda*VENUS;  // isVersionOf GO:0030163
  VENUSproduction: => VENUS; delta;  // isVersionOf GO:0006412
  auxin_TIR1_VENUSassociation: auxinTIR1 + VENUS => auxinTIR1VENUS; la*auxinTIR1*VENUS;  // isVersionOf GO:0006461
  auxin_TIR1_VENUSdissociation: auxinTIR1VENUS => auxinTIR1 + VENUS; ld*auxinTIR1VENUS;  // isVersionOf GO:0043241
  auxin_TIR1_VENUSdissociationleadingtoubiquitination: auxinTIR1VENUS => auxinTIR1; lm*auxinTIR1VENUS;  // isVersionOf GO:0043241
  auxin_TIR1association: auxin + TIR1 => auxinTIR1; ka*auxin*TIR1;  // isVersionOf GO:0006461
  auxin_TIR1dissociation: auxinTIR1 => auxin + TIR1; kd*auxinTIR1;  // isVersionOf GO:0043241
  auxindecay: auxin => ; mu*auxin;  // isVersionOf GO:0030163
  auxinproduction: => auxin; alpha_tr;  // isVersionOf GO:0006412
end
