// SBML level 2 version 3

model bartholome1()

  // Compartments:
  compartment apical = 1.5; apical is "apical extracellular space";  // GO:0005615
  compartment basolat = 1; basolat is "basolateral extrocellular space";  // GO:0005615
  compartment cell = 1; cell is "intracellular";  // GO:0005623

  // Species:
  substanceOnly species $BSP_cell in cell; BSP_cell is "intracellular BSP";  // kegg.compound:C11363 CHEBI:63836
  substanceOnly species $BSP_tot in apical; BSP_tot is "total BSP";  // kegg.compound:C11363 CHEBI:63836
  substanceOnly species free_basolateral_BSP in basolat = 88;  // kegg.compound:C11363 CHEBI:63836
  substanceOnly species basolateral_bound_BSP in basolat = 0;  // kegg.compound:C11363 CHEBI:63836
  substanceOnly species free_intracellular_BSP in cell = 0;  // kegg.compound:C11363 CHEBI:63836
  substanceOnly species bound_intracellular_BSP in cell = 0;  // kegg.compound:C11363 CHEBI:63836
  substanceOnly species apical_BSP in apical = 0;  // kegg.compound:C11363 CHEBI:63836

  // Parameters:
  p1 = 0.0025 permin;
  p10 = 1.6 permin;
  p11 = 1000;
  p12 = 0.0003 ml_per_min;
  p2 = 0.0784 permin;
  p3 = 0.0013 permin;
  p4 = 0.0827 permin;
  p5 = 0.0091 permin;
  p6 = 6.4e-5 per_nmole_per_ml;
  p7 = 0.0397 permin;
  p8 = 1000;
  p9 = 0.0098 per_nmole_per_ml;

  // Assignment rules:
  BSP_cell := free_intracellular_BSP + bound_intracellular_BSP;
  BSP_tot := free_basolateral_BSP + basolateral_bound_BSP + free_intracellular_BSP + bound_intracellular_BSP + apical_BSP;
  observable_task0_model0_bartholome2007_x5 := apical_BSP;
  observable_task0_model0_bartholome2007_BSP_cell := BSP_cell;

  // Reactions:
  ABCC2: free_intracellular_BSP => apical_BSP; p2*free_intracellular_BSP; ABCC2 is "ABCC2 mediated export";  // isVersionOf kegg.pathway:hsa02010 GO:0015415
  OATP1B3: free_basolateral_BSP => free_intracellular_BSP; p1*free_basolateral_BSP; OATP1B3 is "OATP1B3 mediated import";  // isVersionOf GO:0006810
  bl_BSP_binding: free_basolateral_BSP => basolateral_bound_BSP; p6*free_basolateral_BSP*(p8 - basolateral_bound_BSP); bl_BSP_binding is "basolateral BSP binding";  // isVersionOf GO:0005488
  bl_BSP_dissoc: basolateral_bound_BSP => free_basolateral_BSP; p7*basolateral_bound_BSP; bl_BSP_dissoc is "basolateral BSP dissoc";
  cellular_BSP_binding: free_intracellular_BSP => bound_intracellular_BSP; p9*free_intracellular_BSP*(p11 - bound_intracellular_BSP);  // isVersionOf GO:0005488
  cellular_BSP_dissoc: bound_intracellular_BSP => free_intracellular_BSP; p10*bound_intracellular_BSP;
  endo_ex_ap: free_intracellular_BSP => apical_BSP; p5*free_intracellular_BSP; endo_ex_ap is "endogenous apical export";  // isVersionOf GO:0006810
  endo_ex_bl: free_intracellular_BSP => free_basolateral_BSP; p4*free_intracellular_BSP; endo_ex_bl is "endogenous basolateral export";  // isVersionOf GO:0006810
  endo_in_bl: free_basolateral_BSP => free_intracellular_BSP; p3*free_basolateral_BSP; endo_in_bl is "endogenous basolateral import";  // isVersionOf GO:0006810
  paracell_transp: free_basolateral_BSP -> apical_BSP; p12*(free_basolateral_BSP/basolat - apical_BSP/apical); paracell_transp is "paracellular transport";  // isVersionOf GO:0006810

  // Unit definitions:
  unit nmole = 1e-9 mole;
  unit ml = 1e-3 litre;
  unit min = 60 second;
  unit permin = 1 / (60 second);
  unit ml_per_min = 1e-3 litre / (60 second);
  unit per_nmole_per_ml = 1 / (1e-9 mole * 60 second);
end
