// SBML level 2 version 1

model bertram1()

  // Compartments:
  compartment cell = 1;  // isVersionOf GO:0005623

  // Species:
  species c in cell = 0.3; c is "cytosolic calcium concentration";  // CHEBI:29108 kegg.compound:C00076
  species cAMP in cell = 1;  // CHEBI:17489 kegg.compound:C00575
  species cer in cell = 260; cer is "ER calcium concentration";  // CHEBI:29108 kegg.compound:C00076

  // Parameters:
  ETswitch = 0;
  IP3 = 0;
  V = -60; V is "voltage";
  alpha = 4.5e-6;
  // Set cAMPlow=0.2 for nM ET, and cAMPlow=0.5 for pM ET
  cAMPlow = 0.2;
  cm = 5300;
  dact = 0.35;
  dinh = 0.4;
  dip3 = 0.5;
  f = 0.01;
  fer = 0.01;
  gca = 2000;
  girk = 1000;
  gk = 3500;
  h = 0;
  inh = 1; inh is "variable for direct inhibition of secretion";
  kc = 0.15;
  ki = 0.5;
  kserca = 0.4;
  lambda = 1.25;
  n = 0; n is "delayed rectifier activation";
  perl = 0.0005;
  sh = 70;
  sigmav = 10;
  sm = 12;
  sn = 5;
  taudir = 20000;
  tauh = 20;
  taun = 20;
  vca = 25;
  vh = -20;
  vk = -75;
  vm = -20;
  vn = -16;

  // Assignment rules:
  jerip3 := o*(cer - c);
  perl_inf := inh*cAMP*c^4/(ki^4 + c^4);
  jertot := jerleak + jerip3 - kserca*c;
  jerleak := perl*(cer - c);
  jmemtot := -(alpha*gca*1/(1 + exp((vm - V)/sm))*(V - vca) + kc*c);
  o := ainf^3*binf^3*hinfer^3;
  binf := IP3/(IP3 + dip3);
  jerp := kserca*c;
  hinfer := 1/(1 + c/dinh);
  ainf := 1/(1 + dact/c);
  ik := gk*n*(V - vk);
  igirk := girk*h*(V - vk);
  ica := gca*minf*(V - vca);
  hinf := 1/(1 + exp((vh - V)/sh));
  ninf := 1/(1 + exp((vn - V)/sn));
  minf := 1/(1 + exp((vm - V)/sm));
  observable_task0_model0_bertram1_c := c;
  observable_task0_model0_bertram1_cer := cer;
  observable_task0_model0_bertram1_cAMP := cAMP;

  // Rate rules:
  h' = (hinf - h)/tauh;
  inh' = ETswitch*((0.2 - inh)/taudir);
  V' = (-ica - ik - igirk)/cm;
  n' = lambda*(ninf - n)/taun;

  // Reactions:
  reaction_0000001: => c; cell*f*(jertot + jmemtot);  // isVersionOf GO:0051480
  reaction_0000002: => cer; -fer*sigmav*jertot*cell;  // isVersionOf GO:0032469
  reaction_000003: => cAMP; cell*ETswitch*((cAMPlow - cAMP)/taudir);  // isVersionOf GO:0004016 GO:0030817

  // Events:
  // At time 1 minute a nanomolar concentration of endothelin is added.
  ET_1_switch: at (time > 60000): ETswitch = 1, girk = 3000, IP3 = 0.3; ET_1_switch is "ET-1 switch";  // isVersionOf GO:0004962

  // Unit definitions:
  unit millisecond = 1e-3 second;
end
