// SBML level 2 version 4

model bhartiya1()

  // Compartments:
  compartment compartment = 1; compartment is "cell";  // isVersionOf GO:0005623

  // Species:
  species Enz in compartment = 0; Enz is "Anthranilate synthase";  // uniprot:P00895
  species $To in compartment; To is "exog. Trp";
  species Ts in compartment = 0; Ts is "Synthesized tryptophan";  // CHEBI:27897 kegg.compound:C00806
  species Tt in compartment; Tt is "Total tryptophan";  // CHEBI:27897 kegg.compound:C00806

  // Parameters:
  Enz_norm has dimensionless;
  Tex = 0.14;
  To_norm has dimensionless;
  Tomax = 100;
  Ts_norm has dimensionless;
  Tt_norm has dimensionless;
  e_val = 0.9;
  f_val = 380;

  // Assignment rules:
  To_norm := To/82;
  Tt_norm := Tt/82;
  Ts_norm := Ts/82;
  Enz_norm := Enz/1;
  Tt := To + Ts;
  To := Tomax*Tex/(Tex*(1 + Ts/f_val) + e_val);
  observable_task0_model0_bhartiya1_To_norm := To_norm;
  observable_task0_model0_bhartiya1_Tt_norm := Tt_norm;
  observable_task0_model0_bhartiya1_Ts_norm := Ts_norm;
  observable_task0_model0_bhartiya1_Enz_norm := Enz_norm;
  observable_task1_model1_bhartiya1_To_norm := To_norm;
  observable_task1_model1_bhartiya1_Tt_norm := Tt_norm;
  observable_task1_model1_bhartiya1_Ts_norm := Ts_norm;
  observable_task2_model2_bhartiya1_To_norm := To_norm;
  observable_task2_model2_bhartiya1_Tt_norm := Tt_norm;
  observable_task2_model2_bhartiya1_Ts_norm := Ts_norm;

  // Reactions:
  Enzyme_dilution: Enz -> ; compartment*Enzyme_dilution_mu*Enz; Enzyme_dilution is "Enzyme dilution due to cell growth";
    Enzyme_dilution_mu = 0.01;
  Enzyme_synthesis: -> Enz; compartment*k1*ki1^nH*Ot/(ki1^nH + Tt^nH); Enzyme_synthesis is "Anthranilate synthase synthesis";  // modifiers: Tt; isVersionOf GO:0006417
    k1 = 65; ki1 = 3.53; nH = 1.92 dimensionless; Ot = 0.0033;
  tryptophan_consumption: Ts -> ; compartment*g*Ts/(Kg + Ts); tryptophan_consumption is "Tryptophan consumption for protein synthesis";  // isVersionOf GO:0006412
    g = 25; Kg = 0.2;
  tryptophan_dilution: Ts -> ; compartment*tryptophan_dilution_mu*Ts; tryptophan_dilution is "Tryptophan dilution due to cell growth";
    tryptophan_dilution_mu = 0.01;
  tryptophan_synthesis: -> Ts; compartment*k2*Enz*Ki2/(Ki2 + Tt); tryptophan_synthesis is "Tryptophan synthesis";  // modifiers: Enz, Tt; isVersionOf GO:0000162
    k2 = 25; Ki2 = 810;

  // Unit definitions:
  unit micromole = 1e-6 mole;
  unit minutes = 60 second;
  unit microM = 1e-6 mole / litre;
  unit microM_per_min = 1e-6 mole / (litre * 60 second);
  unit per_min = 1 / (60 second);
end
