// SBML level 2 version 4

model borisov1()

  // Compartments:
  compartment cell = 1;  // GO:0005623
  compartment extra = 34; extra is "extracellular space";

  // Species:
  species Akt in cell = 100;
  species EGF in extra = 1;  // isVersionOf uniprot:P01133 reactome:REACT_9610
  species Erk in cell = 400;
  species GAB in cell = 225;
  species GABp in cell = 0;
  species GABp_GS in cell = 0;
  species GABp_PI3K in cell = 0;
  species GABp_RasGAP in cell = 0;
  species GABp_SHP2 in cell = 0;
  species GABp_pSHP2 in cell = 0;
  species GABp_pSHP2_GS in cell = 0;
  species GS in cell = 200;
  species I in extra = 0;  // isVersionOf uniprot:P01308 reactome:REACT_5828
  species IR in cell = 150;
  species IRL in cell = 0;
  species IRS in cell = 300;
  species IRSp in cell = 0;
  species IRSp_GS in cell = 0;
  species IRSp_PI3K in cell = 0;
  species IRSp_SHP2 in cell = 0;
  species IRi in cell = 0;
  species IRp in cell = 0;
  species IRp_IRS in cell = 0;
  species IRp_IRSp in cell = 0;
  species IRp_PI3K in cell = 0;
  species IRp_RasGAP in cell = 0;
  species Mek in cell = 200;
  species Null in cell = 0;
  species PDK1 in cell = 100;
  species PI3K in cell = 200;
  species PIP3 in cell = 0;
  species PKA in cell = 100;
  species R in cell = 100;
  species RE in cell = 0;  // hasPart uniprot:P00533 uniprot:P01133
  species Raf in cell = 100;
  species RasGAP in cell = 50;
  species Rd in cell = 0;  // isVersionOf uniprot:P01133 uniprot:P00533
  species Ri in cell = 0;
  species Rp in cell = 0;  // isVersionOf uniprot:P01133 uniprot:P00533
  species Rp_GS in cell = 0;  // hasPart uniprot:P00533
  species Rp_PI3K in cell = 0;
  species Rp_RasGAP in cell = 0;
  species Rp_Shc in cell = 0;  // hasPart uniprot:P00533
  species Rp_pShc in cell = 0;
  species Rp_pShc_GS in cell = 0;
  species SHP2 in cell = 300;
  species Shc in cell = 270;
  species aPX in cell = 0;
  species aPX_GS in cell = 0;
  species aRaf in cell = 0;
  species aSrc in cell = 0;
  species aaRaf in cell = 0;
  species amTOR in cell = 0;
  species bRasGAP in cell = 1e-5;
  species dRas in cell = 150;
  species iGS in cell = 0;
  species iPX in cell = 200;
  species iSrc in cell = 518;
  species imGAB in cell = 0;
  species imGABp in cell = 0;
  species imIRS in cell = 0;
  species mGAB in cell = 0;
  species mGABp in cell = 0;
  species mGABp_GS in cell = 0;
  species mGABp_PI3K in cell = 0;
  species mGABp_RasGAP in cell = 0;
  species mGABp_SHP2 in cell = 0;
  species mGABp_pSHP2 in cell = 0;
  species mGABp_pSHP2_GS in cell = 0;
  species mIRS in cell = 0;
  species mIRSp in cell = 0;
  species mIRSp_GS in cell = 0;
  species mIRSp_PI3K in cell = 0;
  species mIRSp_SHP2 in cell = 0;
  species mPDK1 in cell = 0;
  species mTOR in cell = 100;
  species pAkt in cell = 0;
  species pErk in cell = 0;
  species pShc in cell = 0;
  species pShc_GS in cell = 0;
  species phosphorylated_Akt in cell;
  species ppAkt in cell = 0;
  species ppErk in cell = 0;
  species ppMek in cell = 0;
  species tRas in cell = 0;
  species tRas_PI3K in cell = 0;

  // Parameters:
  EGF_tot has nM;
  Kd1 = 0.58824 nM;
  Kd10 = 400 nM;
  Kd12 = 12.45 nM;
  Kd13 = 200 nM;
  Kd2 = 15 nM;
  Kd24 = 0.029412 nM;
  Kd26 = 124.5 nM;
  Kd27 = 2000000 nM;
  Kd28 = 3.75 nM;
  Kd30 = 10 nM;
  Kd4 = 10 nM;
  Kd42 = 10 nM;
  Kd45 = 100000 nM;
  Kd46 = 1 nM;
  Kd47 = 1000 nM;
  Kd49 = 1 nM;
  Kd5 = 10 nM;
  Kd52 = 1 nM;
  Kd53 = 2.5 nM;
  Kd54 = 66666 nM;
  Kd55 = 100 nM;
  Kd59 = 20 nM;
  Kd7 = 400 nM;
  Kd74 = 100 nM;
  Kd9 = 10 nM;
  Km31 = 143.3 nM;
  Km40 = 110 nM;
  Km41 = 50 nM;
  Km43 = 150 nM;
  Km50 = 150 nM;
  Km51 = 130 nM;
  Km57 = 150 nM;
  Km58 = 130 nM;
  Km62 = 50 nM;
  Km63 = 50 nM;
  Km65 = 400 nM;
  Km66 = 10 nM;
  Km67 = 10000 nM;
  Km68 = 50 nM;
  Km69 = 675.299 nM;
  Km70 = 500 nM;
  Km71 = 500 nM;
  Km72 = 500 nM;
  Km73 = 500 nM;
  Km75 = 500 nM;
  Km76 = 1 nM;
  Km77 = 100 nM;
  Km78 = 100 nM;
  Km79 = 5000 nM;
  Km8 = 100 nM;
  Km80 = 700 nM;
  Km81 = 300 nM;
  Km82 = 50 nM;
  Km84 = 266 nM;
  V31 = 333;
  V41 = 6.66;
  V51 = 333;
  V58 = 2;
  V69 = 16.6;
  V72 = 33.3;
  V73 = 23.33;
  V76 = 16.66;
  V8 = 200;
  V_82 = 133;
  V_84 = 333;
  alpha40 = 0.00025 dimensionless;
  alpha43 = 0.05 dimensionless;
  alpha50 = 0.0001 dimensionless;
  alpha67 = 1e-6;
  alpha77 = 0.5 dimensionless;
  beta67 = 2 dimensionless;
  k1 = 0.068;
  k10 = 0.0004;
  k111 = 0.0133;
  k118 = 0.001;
  k12 = 0.00933;
  k13 = 6.66e-6;
  k17 = 0.000185;
  k2 = 0.033;
  k24 = 0.011322;
  k25 = 1.66;
  k26 = 0.00933;
  k27 = 6.66e-8;
  k28 = 0.1066;
  k29 = 0.66;
  k3 = 0.4;
  k30 = 0.0066;
  k4 = 0.000666;
  k42 = 0.00666;
  k45 = 0.000666;
  k46 = 0.00666;
  k47 = 0.000666;
  k48 = 0.666;
  k49 = 0.000666;
  k5 = 0.0133;
  k52 = 0.002;
  k53 = 0.0133;
  k54 = 1e-5;
  k55 = 0.000666;
  k56 = 0.666;
  k59 = 0.01;
  k6 = 0.333;
  k60 = 4.66;
  k61 = 3.33;
  k64 = 0;
  k7 = 0.000666;
  k74 = 0.00666;
  k83 = 0.0166;
  k85 = 0.0166;
  k9 = 0.00666;
  k_64 = 2.5;
  k_77 = 0.666;
  k_78 = 0.666;
  k_79 = 6.66e-5;
  k_80 = 6.66e-5;
  k_81 = 6.66e-5;
  kcat40 = 6.6;
  kcat43 = 33.3;
  kcat50 = 3333;
  kcat57 = 0.133;
  kcat62 = 5.33;
  kcat63 = 20000;
  kcat65 = 0.1;
  kcat66 = 3.33;
  kcat67 = 0.666;
  kcat68 = 0.133;
  kcat70 = 0.333;
  kcat71 = 0.666;
  kcat75 = 4.66;
  kcat77 = 0.666;
  kcat78 = 0.666;
  kcat79 = 0.0466;
  kcat80 = 0.04;
  kcat81 = 0.166;

  // Assignment rules:
  k_5 := Kd5*k5;
  k_4 := Kd4*k4;
  k_2 := Kd2*k2;
  k_1 := Kd1*k1;
  k_10 := Kd10*k10;
  k_9 := Kd9*k9;
  k_7 := Kd7*k7;
  k_74 := k74*Kd74;
  k_59 := Kd59*k59;
  k_55 := Kd55*k55;
  k_54 := Kd54*k54;
  k_53 := Kd53*k53;
  k_52 := k52*Kd52;
  k_49 := Kd49*k49;
  k_47 := Kd47*k47;
  k_46 := Kd46*k46;
  k_45 := k45*Kd45;
  k_42 := Kd42*k42;
  k_30 := Kd30*k30;
  k_28 := Kd28*k28;
  k_27 := Kd27*k27;
  k_26 := Kd26*k26;
  k_24 := Kd24*k24;
  k_13 := Kd13*k13;
  k_12 := Kd12*k12;
  k11 := k9;
  k_11 := k_9;
  EGF_tot := EGF + (RE + 2*(Rd + Rp + Ri + Rp_GS + Rp_Shc + Rp_pShc + Rp_pShc_GS + Rp_PI3K + Rp_RasGAP))*(cell/extra);
  phosphorylated_Akt := pAkt + ppAkt;
  observable_plot2_tRas_datagen1 := task2_model2_borisov1_tRas;
  observable_task0_model0_borisov1_tRas := tRas;
  observable_plot2_tRas_datagen3 := task3_model3_borisov1_tRas;
  observable_task1_model1_borisov1_tRas := tRas;

  // Reactions:
  reaction_1: R + EGF -> RE; (k1*R*EGF - k_1*RE)*cell;
  reaction_10: Rp_pShc_GS -> Rp + pShc_GS; (k_10*Rp_pShc_GS - k10*Rp*pShc_GS)*cell;
  reaction_100: IRSp_GS => GS + IRS; V31*IRSp_GS/(Km31 + IRSp_GS)*cell;
  reaction_101: IRSp_SHP2 => IRS + SHP2; k48*IRSp_SHP2*cell;
  reaction_102: mGABp_pSHP2 => SHP2 + mGAB; k56*mGABp_pSHP2*cell;
  reaction_103: mGABp_pSHP2_GS => GS + SHP2 + mGAB; k56*mGABp_pSHP2_GS*cell;
  reaction_104: GABp => GAB; V51*GABp/(Km51 + GABp)*cell;
  reaction_105: GABp_PI3K => PI3K + GAB; V51*GABp_PI3K/(Km51 + GABp_PI3K)*cell;
  reaction_106: GABp_GS => GS + GAB; V51*GABp_GS/(Km51 + GABp_GS)*cell;
  reaction_107: GABp_RasGAP => RasGAP + GAB; V51*GABp_RasGAP/(Km51 + GABp_RasGAP)*cell;
  reaction_108: GABp_SHP2 => SHP2 + GAB; k56*GABp_SHP2*cell;
  reaction_109: GABp_pSHP2 => SHP2 + GAB; k56*GABp_pSHP2*cell;
  reaction_11: pShc_GS -> GS + pShc; (k_11*pShc_GS - k11*pShc*GS)*cell;
  reaction_110: GABp_pSHP2_GS => GS + SHP2 + GAB; k56*GABp_pSHP2_GS*cell;
  reaction_111: mGABp_RasGAP => RasGAP + mGAB; k111*(mGABp_SHP2 + mGABp_pSHP2 + mGABp_pSHP2_GS + mIRSp_SHP2)*mGABp_RasGAP*cell;  // modifiers: mIRSp_SHP2, mGABp_SHP2, mGABp_pSHP2, mGABp_pSHP2_GS
  reaction_112: Rp_RasGAP => Rp + RasGAP; k111*(mGABp_SHP2 + mGABp_pSHP2 + mGABp_pSHP2_GS)*Rp_RasGAP*cell;  // modifiers: mGABp_SHP2, mGABp_pSHP2, mGABp_pSHP2_GS
  reaction_113: IRp_RasGAP => RasGAP + IRp; k111*(mGABp_SHP2 + mGABp_pSHP2 + mGABp_pSHP2_GS)*IRp_RasGAP*cell;  // modifiers: mGABp_SHP2, mGABp_pSHP2, mGABp_pSHP2_GS
  reaction_114: Rp_RasGAP => Rp + RasGAP; k111*mIRSp_SHP2*Rp_RasGAP*cell;  // modifiers: mIRSp_SHP2
  reaction_115: IRp_RasGAP => RasGAP + IRp; k111*mIRSp_SHP2*IRp_RasGAP*cell;  // modifiers: mIRSp_SHP2
  reaction_117: mGABp -> imGABp; (2*kcat80*mGABp*ppErk/(Km80 + mGABp) - k_80*imGABp)*cell;  // modifiers: ppErk
  reaction_118: imGABp => imGAB; k118*imGABp*cell;
  reaction_12: Rp + PI3K -> Rp_PI3K; (k12*Rp*PI3K - k_12*Rp_PI3K)*cell;
  reaction_13: Rp + RasGAP -> Rp_RasGAP; (k13*Rp*RasGAP - k_13*Rp_RasGAP)*cell;
  reaction_17: Rp => Null; k17*Rp*cell;
  reaction_18: Rp_GS => GS; k17*Rp_GS*cell;
  reaction_19: Rp_Shc => Shc; k17*Rp_Shc*cell;
  reaction_2: 2 RE -> Rd; (k2*RE*RE - k_2*Rd)*cell;
  reaction_20: Rp_pShc => pShc; k17*Rp_pShc*cell;
  reaction_21: Rp_pShc_GS => pShc_GS; k17*Rp_pShc_GS*cell;
  reaction_22: Rp_PI3K => PI3K; k17*Rp_PI3K*cell;
  reaction_23: Rp_RasGAP => RasGAP; k17*Rp_RasGAP*cell;
  reaction_24: I + IR -> IRL; (k24*IR*I - k_24*IRL)*cell;
  reaction_25: IRL => IRp; k25*IRL*cell;
  reaction_26: PI3K + IRp -> IRp_PI3K; (k26*IRp*PI3K - k_26*IRp_PI3K)*cell;
  reaction_27: RasGAP + IRp -> IRp_RasGAP; (k27*IRp*RasGAP - k_27*IRp_RasGAP)*cell;
  reaction_28: IRp + IRS -> IRp_IRS; (k28*IRp*IRS - k_28*IRp_IRS)*cell;
  reaction_29: IRp_IRS => IRp_IRSp; k29*IRp_IRS*cell;
  reaction_3: Rd => Rp; k3*Rd*cell;
  reaction_30: IRp_IRSp -> IRp + IRSp; (k_30*IRp_IRSp - k30*IRp*IRSp)*cell;
  reaction_31: IRSp => IRS; V31*IRSp/(Km31 + IRSp)*cell;
  reaction_34: IRp => Null; k17*IRp*cell;
  reaction_35: IRp_PI3K => PI3K; k17*IRp_PI3K*cell;
  reaction_36: IRp_RasGAP => RasGAP; k17*IRp_RasGAP*cell;
  reaction_37: IRp_IRS => IRS; k17*IRp_IRS*cell;
  reaction_38: IRp_IRSp => IRSp; k17*IRp_IRSp*cell;
  reaction_4: Rp + GS -> Rp_GS; (k4*Rp*GS - k_4*Rp_GS)*cell;
  reaction_40: iSrc => aSrc; kcat40*iSrc*(Rp + alpha40*IRp)/(Km40 + iSrc)*cell;  // modifiers: Rp, IRp
  reaction_41: aSrc => iSrc; V41*aSrc/(Km41 + aSrc)*cell;
  reaction_42: IRS + PIP3 -> mIRS; (k42*IRS*PIP3 - k_42*mIRS)*cell;
  reaction_43: mIRS => mIRSp; kcat43*mIRS*(IRp + alpha43*Rp)/(Km43 + mIRS)*cell;  // modifiers: Rp, IRp
  reaction_44: mIRSp => mIRS; V31*mIRSp/(Km31 + mIRSp)*cell;
  reaction_45: GS + mIRSp -> mIRSp_GS; (k45*mIRSp*GS - k_45*mIRSp_GS)*cell;
  reaction_46: PI3K + mIRSp -> mIRSp_PI3K; (k46*mIRSp*PI3K - k_46*mIRSp_PI3K)*cell;
  reaction_47: mIRSp + SHP2 -> mIRSp_SHP2; (k47*mIRSp*SHP2 - k_47*mIRSp_SHP2)*cell;
  reaction_48: mIRSp_SHP2 => mIRS + SHP2; k48*mIRSp_SHP2*cell;
  reaction_49: GAB + PIP3 -> mGAB; (k49*GAB*PIP3 - k_49*mGAB)*cell;
  reaction_5: Rp + Shc -> Rp_Shc; (k5*Rp*Shc - k_5*Rp_Shc)*cell;
  reaction_50: mGAB => mGABp; kcat50*mGAB*(Rp + alpha50*aSrc)/(Km50 + mGAB)*cell;  // modifiers: Rp, aSrc
  reaction_51: mGABp => mGAB; V51*mGABp/(Km51 + mGABp)*cell;
  reaction_52: GS + mGABp -> mGABp_GS; (k52*mGABp*GS - k_52*mGABp_GS)*cell;
  reaction_53: PI3K + mGABp -> mGABp_PI3K; (k53*mGABp*PI3K - k_53*mGABp_PI3K)*cell;
  reaction_54: RasGAP + mGABp -> mGABp_RasGAP; (k54*mGABp*RasGAP - k_54*mGABp_RasGAP)*cell;
  reaction_55: SHP2 + mGABp -> mGABp_SHP2; (k55*mGABp*SHP2 - k_55*mGABp_SHP2)*cell;
  reaction_56: mGABp_SHP2 => SHP2 + mGAB; k56*mGABp_SHP2*cell;
  reaction_57: mGABp_SHP2 => mGABp_pSHP2; kcat57*mGABp_SHP2*(Rp + aSrc)/(Km57 + mGABp_SHP2)*cell;  // modifiers: Rp, aSrc
  reaction_58: mGABp_pSHP2 => mGABp_SHP2; V58*mGABp_pSHP2/(Km58 + mGABp_pSHP2)*cell;
  reaction_59: GS + mGABp_pSHP2 -> mGABp_pSHP2_GS; (k59*mGABp_pSHP2*GS - k_59*mGABp_pSHP2_GS)*cell;
  reaction_6: Rp_Shc => Rp_pShc; k6*Rp_Shc*cell;
  reaction_60: => PIP3; k60*(Rp_PI3K + IRp_PI3K + mIRSp_PI3K + mGABp_PI3K + tRas_PI3K)*cell;  // modifiers: Rp_PI3K, IRp_PI3K, mIRSp_PI3K, mGABp_PI3K, tRas_PI3K
  reaction_61: PIP3 => Null; k61*PIP3*cell;
  reaction_62: dRas => tRas; kcat62*dRas*(Rp_GS + Rp_pShc_GS + mIRSp_GS + mGABp_GS + mGABp_pSHP2_GS)/(Km62 + dRas)*cell;  // modifiers: Rp_GS, Rp_pShc_GS, mIRSp_GS, mGABp_GS, mGABp_pSHP2_GS
  reaction_63: tRas => dRas; kcat63*tRas*(bRasGAP + mGABp_RasGAP + Rp_RasGAP + IRp_RasGAP)/(Km63 + tRas)*cell;  // modifiers: Rp_RasGAP, IRp_RasGAP, mGABp_RasGAP, bRasGAP
  reaction_64: PI3K + tRas => tRas_PI3K; (k64*tRas*PI3K - k_64*tRas_PI3K)*cell;
  reaction_65: Raf => aRaf; kcat65*tRas*Raf/(Km65 + Raf)*cell;  // modifiers: tRas
  reaction_66: aRaf => aaRaf; kcat66*aSrc*aRaf/(Km66 + aRaf)*cell;  // modifiers: aSrc
  reaction_67: aaRaf => Raf; (kcat67*aaRaf*(PKA/(Km67 + aaRaf)) + alpha67*aaRaf*(pAkt + beta67*ppAkt))*cell;  // modifiers: pAkt, PKA, ppAkt
  reaction_68: Mek => ppMek; kcat68*aaRaf*Mek/(Km68 + Mek)*cell;  // modifiers: aaRaf
  reaction_69: ppMek => Mek; V69*ppMek/(Km69 + ppMek)*cell;
  reaction_7: Rp_pShc -> Rp + pShc; (k_7*Rp_pShc - k7*Rp*pShc)*cell;
  reaction_70: Erk => pErk; kcat70*Erk*ppMek/(Km70 + Erk + pErk*(Km70/Km71))*cell;  // modifiers: ppMek
  reaction_71: pErk => ppErk; kcat71*pErk*ppMek/(Km71 + pErk + Erk*(Km71/Km70))*cell;  // modifiers: Erk, ppMek
  reaction_72: ppErk => pErk; V72*ppErk/(Km72 + ppErk + pErk*(Km72/Km73))*cell;
  reaction_73: pErk => Erk; V73*pErk/(Km73 + pErk + ppErk*(Km73/Km72))*cell;  // modifiers: ppErk
  reaction_74: PIP3 + PDK1 -> mPDK1; (k74*PDK1*PIP3 - k_74*mPDK1)*cell;
  reaction_75: Akt => pAkt; kcat75*mPDK1*Akt/(Km75 + Akt)*cell;  // modifiers: mPDK1
  reaction_76: pAkt => Akt; V76*pAkt/(Km76 + pAkt)*cell;
  reaction_77: mTOR -> amTOR; (kcat77*mTOR*((alpha77*pAkt + ppAkt)/(Km77 + mTOR)) - k_77*amTOR)*cell;  // modifiers: pAkt, ppAkt
  reaction_78: pAkt -> ppAkt; (kcat78*amTOR*(pAkt/(Km78 + pAkt)) - k_78*ppAkt)*cell;  // modifiers: amTOR
  reaction_79: GS -> iGS; (kcat79*ppErk*(GS/(Km79 + GS)) - k_79*iGS)*cell;  // modifiers: ppErk
  reaction_8: pShc => Shc; V8*pShc/(Km8 + pShc)*cell;
  reaction_80: mGAB -> imGAB; (kcat80*mGAB*(ppErk/(Km80 + mGAB)) - k_80*imGAB)*cell;  // modifiers: ppErk
  reaction_81: mIRS -> imIRS; (kcat81*mIRS*(amTOR/(Km81 + mIRS)) - k_81*imIRS)*cell;  // modifiers: amTOR
  reaction_82: Rp => Ri; V_82*Rp/(Km82 + Rp)*cell;
  reaction_83: Ri => Rd; k83*Ri*cell;
  reaction_84: IRp => IRi; V_84*IRp/(Km84 + IRp)*cell;
  reaction_85: IRi => IRL; k85*IRi*cell;
  reaction_88: mIRSp -> IRSp + PIP3; (k_42*mIRSp - k42*PIP3*IRSp)*cell;
  reaction_89: mIRSp_PI3K -> PIP3 + IRSp_PI3K; (k_42*mIRSp_PI3K - k42*PIP3*IRSp_PI3K)*cell;
  reaction_9: GS + Rp_pShc -> Rp_pShc_GS; (k9*Rp_pShc*GS - k_9*Rp_pShc_GS)*cell;
  reaction_90: mIRSp_GS -> PIP3 + IRSp_GS; (k_42*mIRSp_GS - k42*PIP3*IRSp_GS)*cell;
  reaction_91: mIRSp_SHP2 -> PIP3 + IRSp_SHP2; (k_42*mIRSp_SHP2 - k42*PIP3*IRSp_SHP2)*cell;
  reaction_92: mGABp -> PIP3 + GABp; (k_42*mGABp - k42*PIP3*GABp)*cell;
  reaction_93: mGABp_PI3K -> PIP3 + GABp_PI3K; (k_42*mGABp_PI3K - k42*PIP3*GABp_PI3K)*cell;
  reaction_94: mGABp_GS -> PIP3 + GABp_GS; (k_42*mGABp_GS - k42*PIP3*GABp_GS)*cell;
  reaction_95: mGABp_RasGAP -> PIP3 + GABp_RasGAP; (k_42*mGABp_RasGAP - k49*PIP3*GABp_RasGAP)*cell;
  reaction_96: mGABp_SHP2 -> PIP3 + GABp_SHP2; (k_42*mGABp_SHP2 - k42*PIP3*GABp_SHP2)*cell;
  reaction_97: mGABp_pSHP2 -> PIP3 + GABp_pSHP2; (k_42*mGABp_pSHP2 - k42*PIP3*GABp_pSHP2)*cell;
  reaction_98: mGABp_pSHP2_GS -> PIP3 + GABp_pSHP2_GS; (k_42*mGABp_pSHP2_GS - k42*PIP3*GABp_pSHP2_GS)*cell;
  reaction_99: IRSp_PI3K => PI3K + IRS; V31*IRSp_PI3K/(Km31 + IRSp_PI3K)*cell;

  // Unit definitions:
  unit nanomole = 1e-9 mole;
  unit seconds = second;
  unit nM = 1e-9 mole / litre;
  unit per_nM = litre / (1e-9 mole);
  unit per_second = 1 / second;
  unit nM_per_sec = 1e-9 mole / (litre * second);
  unit per_nM_per_s = litre / (1e-9 mole * second);
end
