// SBML level 3 version 1

model cai1()

  // Compartments:
  compartment default = 1;

  // Species:
  species A in default = 0; A is "AIDS";
  species $EXT in default = 1;
  species I in default = 30; I is "Asymptomatic infected";
  species J in default = 20; J is "Symptomatic infected";
  species S in default = 150; S is "Susceptible";

  // Parameters:
  Alpha = 0.01;
  Beta = 0.0005;
  K = 120;
  Mu = 0.02;
  b = 0.3;
  c = 3;
  d = 0.333;
  k1 = 0.01;
  k2 = 0.02;

  // Assignment rules:
  observable_task1_model1_cai1_I := I;
  observable_task1_model1_cai1_J := J;
  observable_task0_model0_cai1_I := I;

  // Reactions:
  v_1: $EXT -> S; Mu*K;
  v_10: A -> $EXT; d*A;
  v_2: S -> I; c*Beta*(I + b*J)*S;  // modifiers: J
  v_3: S -> $EXT; Mu*S;
  v_4: I -> $EXT; Mu*I;
  v_5: I -> J; k1*I;
  v_6: J -> I; Alpha*J;
  v_7: J -> $EXT; Mu*J;
  v_8: J -> A; k2*J;
  v_9: A -> $EXT; Mu*A;
end
