// SBML level 3 version 1

model callaway2()

  // Compartments:
  compartment default = 1;

  // Species:
  species L in default = 0.8571429;
  species T in default = 200000;
  species Tstar in default = 11428.57;
  species V in default = 50000;

  // Parameters:
  NT = 100;
  a = 0.01;
  alpha = 1.5e-6;
  c = 13;
  d = 0.01;
  delta = 0.7;
  deltaL = 0.004;
  k = 8e-7;
  kappa = 0.8226;
  lambda = 10000;

  // Assignment rules:
  observable_task0_model0_callaway2_V := V;
  observable_plot1_V_datagen1 := task1_model1_callaway2_V;
  observable_task1_model1_callaway2_V := V;
  observable_plot2_V_datagen1 := task2_model2_callaway2_V;
  observable_task2_model2_callaway2_V := V;
  observable_task2_model2_callaway2_V := V;
  observable_plot4_V_datagen1 := task3_model3_callaway2_V;
  observable_task3_model3_callaway2_V := V;

  // Reactions:
  v1: -> T; lambda;
  v10: V -> ; c*V;
  v2: T -> ; d*T;
  v3: T -> ; k*(1 - kappa)*T*V;  // modifiers: V
  v4: -> Tstar; (1 - alpha)*k*(1 - kappa)*T*V;  // modifiers: V, T
  v5: Tstar -> ; delta*Tstar;
  v6: L -> Tstar; a*L;
  v7: -> L; alpha*k*(1 - kappa)*T*V;  // modifiers: T, V
  v8: L -> ; deltaL*L;
  v9: -> V; delta*NT*Tstar;  // modifiers: Tstar
end
