// SBML level 3 version 1

model callaway3()

  // Compartments:
  compartment default = 1;

  // Species:
  species T in default = 200000;
  species Tstar in default = 9285.889;
  species V in default = 50000;

  // Parameters:
  NT = 100;
  c = 13;
  d = 0.01;
  delta = 0.7;
  deltaACC = 0.7863;
  k = 8e-7;
  kappa = 0.788;
  lambda = 10000;
  omega = 0.01;
  p = 70;

  // Assignment rules:
  observable_task0_model0_callaway3_V := V;
  observable_task1_model1_callaway3_V := V;
  observable_plot1_V_datagen1 := task1_model1_callaway3_V;
  observable_task2_model2_callaway3_V := V;
  observable_plot2_V_datagen1 := task2_model2_callaway3_V;

  // Reactions:
  v1: -> T; lambda;
  v2: T -> ; d*T;
  v3: T -> Tstar; k*(1 - kappa)*T*V;  // modifiers: V
  v4: Tstar -> ; deltaACC*Tstar^(1 + omega);
  v5: -> V; p*Tstar;  // modifiers: Tstar
  v6: V -> ; c*V;
end
