// SBML level 2 version 1

model calzone1()

  // Compartments:
  compartment cytoplasm = 1;  // isVersionOf GO:0005737
  compartment nuclei = 1;  // isVersionOf GO:0005634

  // Species:
  species FZYa in nuclei = 0;  // uniprot:Q24044 interpro:IPR000002
  species IEa_1 in nuclei = 0;
  species MPFc in cytoplasm = 1;  // hasPart uniprot:P23572 uniprot:P20439 GO:0031387
  species MPFn in nuclei = 0;  // hasPart uniprot:P20439 uniprot:P23572 GO:0031387
  species N in nuclei = 1;
  species StgPc in cytoplasm = 0.8;  // uniprot:P20483
  species StgPn in nuclei = 0;  // uniprot:P20483 interpro:IPR000751
  species Stgc in cytoplasm = 0;  // uniprot:P20483
  species Stgm in cytoplasm = 1;  // isVersionOf CHEBI:33699
  species Stgn in nuclei = 0;  // uniprot:P20483 interpro:IPR000751
  // Wee1Pc has been defined as boundarycondition, only change with the assignment rule.
  species $Wee1Pc in cytoplasm;  // uniprot:P54350 uniprot:P30291
  species Wee1Pn in nuclei = 0;  // uniprot:P54350 uniprot:P30291
  species Wee1c in cytoplasm = 0;  // uniprot:P54350 uniprot:P30291
  species Wee1n in nuclei = 0;  // uniprot:P54350 uniprot:P30291
  species Xm in cytoplasm = 0;  // isVersionOf CHEBI:33699
  species Xp in cytoplasm = 0;
  species preMPFc in cytoplasm = 0;  // isVersionOf GO:0031387
  species preMPFn in nuclei = 0;  // isVersionOf GO:0031387

  // Parameters:
  E_1 = 7e-5;
  Jafzy = 0.01;
  Jaie = 0.01;
  Jastg = 0.05;
  Jawee = 0.05;
  Jifzy = 0.01;
  Jiie = 0.01;
  Jistg = 0.05;
  Jiwee = 0.05;
  Jm = 0.05;
  // Simulation of Figure1, total amounts of String are constant, 0.8.
  StringT = 0.8;
  // Total Wee1 are constant 0.8.
  Wee1T = 0.8;
  factor_1 = 1.95;
  kafzy = 1;
  kaie = 1;
  kastg = 1; kastg is "kastgpp";
  kastgp = 0;
  kawee = 0.3;
  kdc = 0.01; kdc is "kdcp";
  kdm = 0.2; kdm is "kdmpp";
  kdmp = 0.002;
  kdn = 1.5; kdn is "kdnpp";
  kdnp = 0.01;
  // kdstg=0 for figure1B
  kdstg = 0;
  kez_1 = 0.5;
  kifzy = 0.2;
  kiie = 0.4;
  kins_1 = 0.08;
  kinw_1 = 0.04;
  kistg = 0.3;
  kiwee = 1; kiwee is "kiweepp";
  kiweep = 0.01;
  kout_1 = 0;
  kouts_1 = 0.02;
  koutw_1 = 0.01;
  ksc = 0.01;
  // ksstg=0 for figure1B
  ksstg = 0;
  kstg = 2; kstg is "kstgpp";
  kstgp = 0.2;
  ksxm_1 = 0.0005;
  ksxp_1 = 0.001;
  kt = 0.15; kt is "kin";
  kwee = 1; kwee is "kweepp";
  kweep = 0.005;

  // Assignment rules:
  Wee1Pc := (Wee1T - N*E_1*(Wee1n + Wee1Pn))/(1 - N*E_1) - Wee1c;
  StgPT := (1 - N*E_1)*StgPc + N*E_1*StgPn;
  CycBT := (1 - N*E_1)*(MPFc + preMPFc) + N*E_1*(MPFn + preMPFn);
  observable_task0_model0_calzone1_MPFc := MPFc;
  observable_task0_model0_calzone1_StgPc := StgPc;
  observable_task0_model0_calzone1_Wee1c := Wee1c;
  observable_task0_model0_calzone1_CycBT := CycBT;
  observable_task0_model0_calzone1_MPFn := MPFn;
  observable_task0_model0_calzone1_StgPn := StgPn;
  observable_task0_model0_calzone1_Wee1n := Wee1n;

  // Reactions:
  Nuclei_1: => N; 0;
  Synthesis_of_MPFc: => MPFc; ksc*cytoplasm;
  mRNA_of_Stg: Stgm => ; nuclei*(kdmp*Stgm/(Jm + Stgm) + kdm*Xp*Stgm);  // modifiers: Xp
  Synthesis_of_Stg: => Stgc; cytoplasm*ksstg*Stgm;  // modifiers: Stgm
  activation_of_Stgc: Stgc => StgPc; cytoplasm*((kastgp + kastg*MPFc)*Stgc/(Jastg + Stgc));  // modifiers: MPFc
  inactivation_of_Stgc: StgPc => Stgc; cytoplasm*(kistg*StgPc/(Jistg + StgPc));
  degradation_of_Stgc: Stgc => ; cytoplasm*kdstg*Stgc;
  degradation_of_active_Stgc: StgPc => ; cytoplasm*kdstg*StgPc;
  export_of_MPF_from_cytoplasm: MPFc => ; cytoplasm*(kt*MPFc*E_1*N/(1 - N*E_1));  // modifiers: N
  Activation_of_MPFc: preMPFc => MPFc; cytoplasm*(kstgp + kstg*StgPc)*preMPFc;  // modifiers: StgPc
  export_of_preMPF_from_cytoplasm: preMPFc => ; cytoplasm*(kt*preMPFc*E_1*N/(1 - N*E_1));  // modifiers: N
  export_of_Wee1P_from_nucleus: Wee1Pn => ; nuclei*koutw_1*Wee1Pn;
  export_of_Wee1P_from_cytoplasm: $Wee1Pc => ; cytoplasm*(kinw_1*Wee1Pc*E_1*N/(1 - N*E_1));  // modifiers: N
  export_of_Wee1_from_nucleus: Wee1n => ; nuclei*koutw_1*Wee1n;
  export_of_Wee1c_from_cytoplasm: Wee1c => ; cytoplasm*(kinw_1*Wee1c*E_1*N/(1 - N*E_1));  // modifiers: N
  export_of_StgP_from_nucleus: StgPn => ; nuclei*kouts_1*StgPn;
  export_of_StgP_from_cytoplasm: StgPc => ; cytoplasm*(kins_1*StgPc*E_1*N/(1 - N*E_1));  // modifiers: N
  export_of_Stg_from_nucleus: Stgn => ; nuclei*kouts_1*Stgn;
  export_of_Stg_from_cytoplasm: Stgc => ; cytoplasm*(kins_1*Stgc*E_1*N/(1 - N*E_1));  // modifiers: N
  activation_of_MPFn: preMPFn => MPFn; nuclei*(kstgp + kstg*StgPn)*preMPFn;  // modifiers: StgPn
  Inactivation_of_MPFc: MPFc => preMPFc; cytoplasm*(kweep + kwee*Wee1c)*MPFc;  // modifiers: Wee1c
  inactivation_of_MPFn: MPFn => preMPFn; nuclei*(kweep + kwee*Wee1n)*MPFn;  // modifiers: Wee1n
  degradation_of_preMPFn: preMPFn => ; nuclei*(kdnp + kdn*FZYa)*preMPFn;  // modifiers: FZYa
  degradation_of_MPFn: MPFn => ; nuclei*(kdnp + kdn*FZYa)*MPFn;  // modifiers: FZYa
  R_37: IEa_1 => ; nuclei*(kiie*IEa_1/(Jiie + IEa_1)); R_37 is "activation of intermediary enzyme";
  R_38: => IEa_1; nuclei*(kaie*(1 - IEa_1)*MPFn/(Jaie + 1 - IEa_1)); R_38 is "inactivation of intermediary enzyme";  // modifiers: MPFn
  activation_of_FZY: => FZYa; nuclei*(kafzy*IEa_1*(1 - FZYa)/(Jafzy + 1 - FZYa));  // modifiers: IEa_1
  inactivation_of_FZY: FZYa => ; nuclei*(kifzy*FZYa/(Jifzy + FZYa));
  inactivation_of_Wee1n: Wee1n => Wee1Pn; nuclei*((kiweep + kiwee*MPFn)*Wee1n/(Jiwee + Wee1n));  // modifiers: MPFn
  activation_of_Wee1n: Wee1Pn => Wee1n; nuclei*(kawee*Wee1Pn/(Jawee + Wee1Pn));
  activation_of_StgPn: Stgn => StgPn; nuclei*((kastgp + kastg*MPFn)*Stgn/(Jastg + Stgn));  // modifiers: MPFn
  inactivation_of_StgPn: StgPn => Stgn; nuclei*(kistg*StgPn/(Jistg + StgPn));
  degradation_of_Stgn: Stgn => ; nuclei*kdstg*Stgn;
  degradation_of_StgPn: StgPn => ; nuclei*kdstg*StgPn;
  Degradation_of_cyclin: preMPFc => ; cytoplasm*kdc*preMPFc;
  degradation_of_cyclin: MPFc => ; cytoplasm*kdc*MPFc;
  Inactivation_of_Wee1c: Wee1c => $Wee1Pc; cytoplasm*((kiweep + kiwee*MPFc)*Wee1c/(Jiwee + Wee1c));  // modifiers: MPFc
  Activation_of_Wee1c: $Wee1Pc => Wee1c; cytoplasm*(kawee*Wee1Pc/(Jawee + Wee1Pc));
  _16: => MPFn; cytoplasm*kt*MPFc; _16 is "import of MPF into nucleus";  // modifiers: MPFc
  _18: => preMPFn; cytoplasm*kt*preMPFc; _18 is "import of preMPF into nucleus";  // modifiers: preMPFc
  _182_1: => $Wee1Pc; nuclei*(koutw_1*Wee1Pn*N*E_1/(1 - N*E_1)); _182_1 is "import of Wee1P into cytoplasm";  // modifiers: Wee1Pn, N
  _20: => Wee1Pn; cytoplasm*kinw_1*Wee1Pc; _20 is "import of Wee1P into nucleus";  // modifiers: Wee1Pc
  _22: => Wee1c; nuclei*(koutw_1*Wee1n*N*E_1/(1 - N*E_1)); _22 is "import of Wee1 into cytoplasm";  // modifiers: Wee1n, N
  _24: => Wee1n; cytoplasm*kinw_1*Wee1c; _24 is "import of Wee1 into nucleus";  // modifiers: Wee1c
  _26: => StgPc; nuclei*(kouts_1*StgPn*E_1*N/(1 - N*E_1)); _26 is "import of StgP into cytoplasm";  // modifiers: StgPn, N
  _28: => StgPn; cytoplasm*kins_1*StgPc; _28 is "import of StgP into nucleus";  // modifiers: StgPc
  _30: => Stgc; nuclei*(kouts_1*Stgn*E_1*N/(1 - N*E_1)); _30 is "import of Stg into cytoplasm";  // modifiers: Stgn, N
  _32: => Stgn; cytoplasm*kins_1*Stgc; _32 is "import of Stg into nucleus";  // modifiers: Stgc
  _50: => Xm; nuclei*ksxm_1*N; _50 is "Zygotic mRNA";  // modifiers: N
  _51: => Xp; cytoplasm*ksxp_1*Xm; _51 is "Zygotic proteins";  // modifiers: Xm
  exportofMPFfromnucleus_1: MPFn => ; nuclei*kout_1*MPFn; exportofMPFfromnucleus_1 is "export of MPF from nucleus";
  exportofpreMPFnfromnucleus_1: preMPFn => ; nuclei*kout_1*preMPFn; exportofpreMPFnfromnucleus_1 is "export of preMPFn from nucleus";
  importofMPFintocytoplasm_1: => MPFc; nuclei*(kout_1*MPFn*E_1*N/(1 - N*E_1)); importofMPFintocytoplasm_1 is "import of MPF into cytoplasm";  // modifiers: N, MPFn
  importofpreMPFintocytoplaslm_1: => preMPFc; nuclei*(kout_1*preMPFn*N*E_1/(1 - N*E_1)); importofpreMPFintocytoplaslm_1 is "import of preMPF into cytoplasm";  // modifiers: preMPFn, N

  // Events:
  // When Fzy=Kez(increasing), then the following changes are made instantaneously (for X=MPF,preMPF,Wee1,Wee1P, Stg, and StgP) :
  // Xc-> (1-N*E)*Xc/(1-1.95*N*E)
  // Xn->Xn/1.95
  // N->1.95N
  at (FZYa >= kez_1): MPFc = MPFc*((1 - N*E_1)/(1 - 1.95*N*E_1)), StgPn = StgPn/1.95, Stgc = Stgc*((1 - N*E_1)/(1 - 1.95*N*E_1)), StgPc = StgPc*((1 - N*E_1)/(1 - 1.95*N*E_1)), Stgn = Stgn/1.95, Wee1c = Wee1c*((1 - N*E_1)/(1 - 1.95*N*E_1)), Wee1Pn = Wee1Pn/1.95, Wee1n = Wee1n/1.95, preMPFn = preMPFn/1.95, MPFn = MPFn/1.95, N = factor_1*N;  // isVersionOf GO:0000093

  // Unit definitions:
  unit min = 60 second;
end
