// SBML level 2 version 4

model chance2()

  // Compartments:
  compartment cell = 1;  // GO:0005623

  // Species:
  species $a in cell = 0; a is "donor AH2";  // isVersionOf CHEBI:15734 CHEBI:35681
  species e in cell = 1.36; e is "enzyme E (catalase)";  // hasProperty GO:0004096 uniprot:P04040 interpro:IPR002226 uniprot:Q65YZ0
  species p in cell = 0; p is "enzyme-substrate complex ES (catalase - hydrogen peroxide)";  // hasVersion CHEBI:16240 interpro:IPR002226
  species product_1 in cell = 0;  // hasVersion CHEBI:15377 CHEBI:15379
  species product_2 in cell = 0;  // hasVersion CHEBI:15377 CHEBI:36586
  species x in cell = 2; x is "substrate S (hydrogen peroxide)";  // CHEBI:16240 kegg.compound:C00027

  // Parameters:
  k1 = 11;
  k2 = 0;
  k4 = 0.72;
  k4_prime = 16.6;

  // Assignment rules:
  observable_plot1_p_datagen1 := task1_model1_chance2_p;
  observable_plot4_p_datagen1 := task4_model4_chance2_p;
  observable_plot2_p_datagen1 := task2_model2_chance2_p;
  observable_task0_model0_chance2_p := p;
  observable_plot3_p_datagen1 := task3_model3_chance2_p;

  // Reactions:
  r1: e + x -> p; cell*(k1*e*x - k2*p);  // isPartOf ec-code:1.11.1.6
  r2: p + x => e + product_1; cell*k4_prime*p*x;  // isVersionOf GO:0016491 ec-code:1.11.1.6
  r3: p + $a => e + product_2; cell*k4*p*a;  // isVersionOf GO:0016614 ec-code:1.11.1.6

  // Unit definitions:
  unit micromole = 1e-6 mole;
  unit per_micromolar_per_second = 10 litre / (1e-6 mole * 10 second);
  unit per_second = 1 / (10 second);
end
