// SBML level 2 version 4

model chance1()

  // Compartments:
  compartment cell = 1;  // GO:0005623

  // Species:
  species ADP in cell = 0.0001; ADP is "(ADP) adenosine diphosphate";  // CHEBI:16761 kegg.compound:C00008
  species AGP in cell = 0; AGP is "(AGP) alpha-glycerophosphate";  // kegg.compound:C00623 CHEBI:16221
  species DBP in cell = 0; DBP is "(DBP) dibromophenol";  // CHEBI:33625
  species DGA in cell = 0; DGA is "(DGA) 1,3 diphosphoglycerate";  // kegg.compound:C00236 CHEBI:16001
  species DHA in cell = 0; DHA is "(DHA) dihydroxacetone phosphate";  // kegg.compound:C00111 CHEBI:16108
  species DIH in cell = 3e-5; DIH is "(DIH) intramitochondrial reduced diphospyridine nucleotide";  // CHEBI:16908 kegg.compound:C00004
  species DIN in cell = 3e-5; DIN is "(DIN) intramitochondrial diphospyridine nucleotide";  // kegg.compound:C00003 CHEBI:15846
  species DPH in cell = 0.0001; DPH is "(DPH) extramitochondrial reduced diphospyridine nucleotide";  // CHEBI:16908 kegg.compound:C00004
  species DPN in cell = 0.0001; DPN is "(DPN) extramitochondrial diphospyridine nucleotide";  // CHEBI:15846 kegg.compound:C00003
  species ENG in cell = 0; ENG is "(ENG) hexokinase-glucose intermediate";  // hasPart CHEBI:17234 interpro:IPR001312
  species ENZ in cell = 1e-5; ENZ is "(ENZ) hexokinase";  // isVersionOf interpro:IPR001312 GO:0004396
  species ETG in cell = 0; ETG is "(ETG) phosphofructokinase intermediate";  // hasPart CHEBI:4170 interpro:IPR022463 GO:0008662
  species ETZ in cell = 1e-5; ETZ is "(ETZ) phosphofructokinase";  // isVersionOf interpro:IPR022463 GO:0008662
  species GAP in cell = 0; GAP is "(GAP) glyceraldehyde 3-phosphate";  // CHEBI:29052 kegg.compound:C00118
  species GLP in cell = 0; GLP is "(GLP) glucose 6-phosphate";  // CHEBI:4170 kegg.compound:C00092
  species GLU in cell = 0; GLU is "(GLU) glucose";  // kegg.compound:C00293 CHEBI:17234
  species GPP in cell = 0; GPP is "(GPP) hexose diphosphate";  // kegg.compound:C05378 CHEBI:28013
  species LAC in cell = 0.001; LAC is "(LAC) lactate";  // kegg.compound:C00186 CHEBI:422
  species MOB in cell = 0; MOB is "(MOB) acyl enzyme intermediate of glyceraldehyde 3-phoshphate dehydrogenase";  // hasPart CHEBI:29052 interpro:IPR006424 GO:0004365
  species MOD in cell = 5e-5; MOD is "(MOD) glyceraldehyde 3-phoshphate dehydrogenase-DPN complex";  // hasPart CHEBI:15846 interpro:IPR006424
  species MOX in cell = 0; MOX is "(MOX) glyceraldehyde 3-phoshphate dehydrogenase";  // isVersionOf uniprot:P04406 uniprot:Q2TSD0 interpro:IPR006424 GO:0004365
  species OXY in cell = 0.0005; OXY is "(OXY) oxygen";  // kegg.compound:C00007 CHEBI:15379
  species PGA in cell = 0; PGA is "(PGA) 3 phosphoglycerate";  // kegg.compound:C00197 CHEBI:17794
  species PID in cell = 0.004; PID is "(PID) inorganic phosphate";  // CHEBI:18367 kegg.compound:C00009
  species PPP in cell = 1e-6; PPP is "(PPP) enzyme intermediate concerned in ATP utilization";  // hasPart CHEBI:15422 CHEBI:16541 GO:0016887
  species PUE in cell = 2e-6; PUE is "(PUE) enzyme concerned in ATP utilization";  // isVersionOf kegg.compound:C00017 CHEBI:16541
  species PYR in cell = 0.001; PYR is "(PYR) pyruvate";  // kegg.compound:C00022 CHEBI:32816
  species TP1 in cell = 0.0005; TP1 is "(TP1) adenosine triphosphate in store 1 (cytoplasm)";  // CHEBI:15422 kegg.compound:C00002
  species TP2 in cell = 0.0005; TP2 is "(TP2) adenosine triphosphate in store 2 (mitochondria)";  // kegg.compound:C00002 CHEBI:15422
  species XI in cell = 2e-5; XI is "(XI) low energy intermediate in oxidative phosphorylation";  // isPartOf GO:0045259 GO:0005746
  species XSI in cell = 2e-5; XSI is "(XSI) high energy intermediate in oxidative phosphorylation";  // isPartOf GO:0045259 GO:0005746
  species XSP in cell = 2e-5; XSP is "(XSP) phosphorylated intermediate in oxidative phosphorylation";  // isPartOf GO:0005746 GO:0045259

  // Parameters:
  ADP_0 has dimensionless; ADP_0 is "relative ADP";
  AGP_0 has dimensionless; AGP_0 is "relative AGP";
  DBP_0 has dimensionless; DBP_0 is "relative DBP";
  DGA_0 has dimensionless; DGA_0 is "relative DGA";
  DHA_0 has dimensionless; DHA_0 is "relative DHA";
  DIH_0 has dimensionless; DIH_0 is "relative DIH";
  DIN_0 has dimensionless; DIN_0 is "relative DIN";
  DPH_0 has dimensionless; DPH_0 is "relative DPH";
  DPN_0 has dimensionless; DPN_0 is "relative DPN";
  ENG_0 has dimensionless; ENG_0 is "relative ENG";
  ENZ_0 has dimensionless; ENZ_0 is "relative ENZ";
  ETG_0 has dimensionless; ETG_0 is "relative ETG";
  ETZ_0 has dimensionless; ETZ_0 is "relative ETZ";
  GAP_0 has dimensionless; GAP_0 is "relative GAP";
  GLP_0 has dimensionless; GLP_0 is "relative GLP";
  GLU_0 has dimensionless; GLU_0 is "relative GLU";
  GPP_0 has dimensionless; GPP_0 is "relative GPP";
  LAC_0 has dimensionless; LAC_0 is "relative LAC";
  MOB_0 has dimensionless; MOB_0 is "relative MOB";
  MOD_0 has dimensionless; MOD_0 is "relative MOD";
  MOX_0 has dimensionless; MOX_0 is "relative MOX";
  OXY_0 has dimensionless; OXY_0 is "relative OXY";
  PGA_0 has dimensionless; PGA_0 is "relative PGA";
  PID_0 has dimensionless; PID_0 is "relative PID";
  PPP_0 has dimensionless; PPP_0 is "relative PPP";
  PUE_0 has dimensionless; PUE_0 is "relative PUE";
  PYR_0 has dimensionless; PYR_0 is "relative PYR";
  TP1_0 has dimensionless; TP1_0 is "relative TP1";
  TP2_0 has dimensionless; TP2_0 is "relative TP2";
  XI_0 has dimensionless; XI_0 is "relative XI";
  XSI_0 has dimensionless; XSI_0 is "relative XSI";
  XSP_0 has dimensionless; XSP_0 is "relative XSP";

  // Assignment rules:
  GPP_0 := GPP/0.001;
  ETG_0 := ETG/1e-5;
  ETZ_0 := ETZ/1e-5;
  GLP_0 := GLP/0.001;
  ADP_0 := ADP/0.001;
  TP1_0 := TP1/0.0015;
  ENG_0 := ENG/1.02e-5;
  ENZ_0 := ENZ/1.02e-5;
  GLU_0 := GLU/0.003;
  MOX_0 := MOX/5e-5;
  MOB_0 := MOB/0.0001;
  MOD_0 := MOD/5e-5;
  AGP_0 := AGP/0.0013;
  PPP_0 := PPP/3.06;
  PUE_0 := PUE/3.06e-6;
  DBP_0 := DBP/0.025;
  TP2_0 := TP2/0.0015;
  XSP_0 := XSP/6e-5;
  OXY_0 := OXY/0.0005;
  XSI_0 := XSI/6e-5;
  XI_0 := XI/6e-5;
  DIH_0 := DIH/7e-5;
  DIN_0 := DIN/7e-5;
  LAC_0 := LAC/0.0012;
  PYR_0 := PYR/0.002;
  PGA_0 := PGA/0.0002;
  DGA_0 := DGA/0.0002;
  PID_0 := PID/0.005;
  DPH_0 := DPH/0.0002;
  DPN_0 := DPN/0.00025;
  DHA_0 := DHA/0.0013;
  GAP_0 := GAP/0.0002;
  observable_task0_model0_chance1_PPP_0 := task0_model0_chance1_PPP_0;
  observable_task0_model0_chance1_TP2_0 := task0_model0_chance1_TP2_0;
  observable_task0_model0_chance1_OXY_0 := task0_model0_chance1_OXY_0;
  observable_task0_model0_chance1_DIH_0 := task0_model0_chance1_DIH_0;
  observable_task0_model0_chance1_PYR_0 := task0_model0_chance1_PYR_0;
  observable_task0_model0_chance1_ADP_0 := task0_model0_chance1_ADP_0;
  observable_task0_model0_chance1_TP1_0 := task0_model0_chance1_TP1_0;
  observable_task0_model0_chance1_GLU_0 := task0_model0_chance1_GLU_0;

  // Reactions:
  reaction_1: GLU + ENZ => ENG; cell*1e-6*reaction_1_k*GLU*ENZ;  // isPartOf ec-code:2.7.1.1 kegg.reaction:R00299 GO:0004396
    reaction_1_k = 3000000000;
  reaction_10: MOX + DPN => MOD; cell*1e-6*reaction_10_k*MOX*DPN;  // isPartOf GO:0008943 ec-code:1.2.1.12 kegg.reaction:R01061
    reaction_10_k = 6000000000;
  reaction_11: DGA + ADP => TP1 + PGA; cell*1e-6*reaction_11_k*DGA*ADP;  // isVersionOf ec-code:2.7.2.3 kegg.reaction:R01512
    reaction_11_k = 10000000000;
  reaction_12: PGA + ADP => TP1 + PYR; cell*1e-6*reaction_12_k*PGA*ADP;  // hasPart ec-code:4.2.1.11 ec-code:2.7.1.40 kegg.reaction:R00658 kegg.reaction:R00200
    reaction_12_k = 5000000000;
  reaction_13: PYR + DPH => LAC + DPN; cell*1e-6*reaction_13_k*PYR*DPH;  // isVersionOf ec-code:1.1.1.27 kegg.reaction:R00703 GO:0004459
    reaction_13_k = 500000000;
  reaction_14: LAC + DPN => PYR + DPH; cell*1e-6*reaction_14_k*LAC*DPN;  // isVersionOf ec-code:1.1.1.27 kegg.reaction:R00703 GO:0004459
    reaction_14_k = 10000000;
  reaction_15: PYR + 4 DIN => 4 DIH; cell*1e-6*reaction_15_k*PYR*DIN;  // isVersionOf GO:0042867 GO:0006099
    reaction_15_k = 20000000;
  reaction_16: DIH + 3 XI + OXY => 3 XSI + DIN; cell*1e-6*reaction_16_k*DIH*XI*OXY;  // isVersionOf GO:0019646
    reaction_16_k = 7500000000000;
  reaction_17: XSI + PID => XSP; cell*1e-6*reaction_17_k*XSI*PID;  // isPartOf GO:0006119
    reaction_17_k = 400000000;
  reaction_18: XSP + ADP => TP2 + XI; cell*1e-6*reaction_18_k*XSP*ADP;  // isPartOf GO:0006119
    reaction_18_k = 15000000000;
  reaction_19: XSI => XI; cell*1e-6*reaction_19_k*XSI*DBP;  // modifiers: DBP; isVersionOf GO:0022900
    reaction_19_k = 120000000;
  reaction_2: ENG + TP1 => ADP + GLP + ENZ; cell*1e-6*reaction_2_k*ENG*TP1;  // isPartOf GO:0004396 ec-code:2.7.1.1 kegg.reaction:R00299
    reaction_2_k = 10000000000;
  reaction_20: TP2 => TP1; cell*1e-6*reaction_20_k*TP2*DBP;  // modifiers: DBP; isVersionOf GO:0015867
    reaction_20_k = 4000000;
  reaction_21: TP1 + PUE => PPP; cell*1e-6*reaction_21_k*TP1*PUE;  // isVersionOf GO:0005524
    reaction_21_k = 3000000000;
  reaction_22: PPP => ADP + PUE + PID; cell*1e-6*reaction_22_k*PPP;  // isVersionOf GO:0006200
    reaction_22_k = 2000000;
  reaction_3: GLP + ETZ => ETG; cell*1e-6*reaction_3_k*GLP*ETZ;  // isPartOf ec-code:2.7.1.4 kegg.reaction:R04779 GO:0008865
    reaction_3_k = 40000000000;
  reaction_4: ETG + TP1 => GPP + ETZ + ADP; cell*1e-6*reaction_4_k*ETG*TP1;  // isPartOf ec-code:2.7.1.4 kegg.reaction:R04779 GO:0008865
    reaction_4_k = 40000000000;
  reaction_5: GPP => GAP + DHA; cell*1e-6*reaction_5_k*GPP;  // isVersionOf GO:0004332 ec-code:4.1.2.13 kegg.reaction:R01068
    reaction_5_k = 100000;
  reaction_6: DHA + DPH => AGP + DPN; cell*1e-6*reaction_6_k*DHA*DPH;  // isPartOf GO:0006127 kegg.reaction:R00842 ec-code:1.1.1.8 GO:0004367
    reaction_6_k = 2000000000;
  reaction_7: AGP + DPN => DHA + DPH; cell*1e-6*reaction_7_k*AGP*DPN;  // isPartOf GO:0006127 GO:0004367 ec-code:1.1.1.8 kegg.reaction:R00842
    reaction_7_k = 80000000;
  reaction_8: GAP + MOD => MOB + DPH; cell*1e-6*reaction_8_k*GAP*MOD;  // isPartOf ec-code:1.2.1.12 kegg.reaction:R01061 GO:0008943
    reaction_8_k = 600000000000;
  reaction_9: MOB + PID => DGA + MOX; cell*1e-6*reaction_9_k*MOB*PID;  // isPartOf GO:0008943 ec-code:1.2.1.12 kegg.reaction:R01061
    reaction_9_k = 400000000;

  // Events:
  e_1: at (time >= 64): GLU = 0.003; e_1 is "addition of glucose";
  e_2: at (time >= 119): DBP = 0.025; e_2 is "addition of uncoupling agent";

  // Unit definitions:
  unit per_second = 1 / (10 second);
  unit per_molar_per_second = 10 litre / (10 mole * 10 second);
  unit per_molar_squared_per_second = (10 litre)^2 / ((10 mole)^2 * 10 second);
end
