// SBML level 2 version 1

model chassagnole1()

  // Compartments:
  compartment compartment = 1;  // GO:0005623

  // Species:
  species adp in compartment = 0; adp is "ADP";  // CHEBI:16761 kegg.compound:C00008
  species asa in compartment = 0; asa is "Aspartate beta-semialdehyde";  // CHEBI:18051 kegg.compound:C00441
  species asp in compartment = 2; asp is "Aspartate";  // CHEBI:17053 kegg.compound:C00049
  species aspp in compartment = 0; aspp is "Aspartyl phosphate";  // CHEBI:15836 kegg.compound:C03082
  species atp in compartment = 10; atp is "ATP";  // CHEBI:15422 kegg.compound:C00002
  species hs in compartment = 0; hs is "Homoserine";  // CHEBI:15699 kegg.compound:C00263
  species hsp in compartment = 0; hsp is "O-Phospho-homoserine";  // CHEBI:15961 kegg.compound:C01102
  species nadp in compartment = 0; nadp is "NADP";  // CHEBI:18009 kegg.compound:C00006
  species nadph in compartment = 2; nadph is "NADPH";  // CHEBI:16474 kegg.compound:C00005
  species phos in compartment = 0; phos is "Phos";  // CHEBI:18367 kegg.compound:C00009
  species thr in compartment = 2; thr is "Threonine";  // CHEBI:16857 kegg.compound:C00188

  // Assignment rules:
  observable_task0_model0_chassagnole1_asa := asa;
  observable_task0_model0_chassagnole1_asp := asp;
  observable_task0_model0_chassagnole1_hs := hs;
  observable_task0_model0_chassagnole1_nadph := nadph;
  observable_task0_model0_chassagnole1_thr := thr;
  observable_task0_model0_chassagnole1_atp := atp;

  // Reactions:
  vak: atp + asp -> aspp + adp; compartment*(vm11*(asp*atp - aspp*adp/keqak)/((k11*(1 + (thr/k1thr)^nak1)/(1 + (thr/(alpha*k1thr))^nak1) + k11*aspp/k1aspp + asp)*(k1atp*(1 + adp/k1adp) + atp)) + vm13*(asp*atp - aspp*adp/keqak)/((1 + (vak_lys/k1lys)^nak3)*(k13*(1 + aspp/k13aspp) + asp)*(k13atp*(1 + adp/k13adp) + atp))); vak is "Aspartate Kinase";  // modifiers: thr; kegg.reaction:R00480 ec-code:2.7.2.4 GO:0004072
    vm11 = 0.15 mM_per_min; keqak = 0.00064 dimensionless; k11 = 0.97 mM; k1thr = 0.167 mM; nak1 = 4.09 dimensionless; alpha = 2.47 dimensionless; k1aspp = 0.017 mM; k1atp = 0.98 mM; k1adp = 0.25 mM; vm13 = 0.0722 mM_per_min; vak_lys = 0.46 mM; k1lys = 0.391 mM; nak3 = 2.8 dimensionless; k13 = 0.32 mM; k13aspp = 0.017 mM; k13atp = 0.22 mM; k13adp = 0.25 mM;
  vasd: nadph + aspp -> nadp + phos + asa; compartment*(vm2f*(aspp*nadph - asa*nadp*phos/k2eq)/((k2aspp*(1 + asa/k2asa)*(1 + phos/k2p) + aspp)*(k2nadph*(1 + nadp/k2nadp) + nadph))); vasd is "Aspartate semialdehyde dehydrogenase";  // isVersionOf ec-code:1.2.1.11 GO:0004073 kegg.reaction:R02291
    vm2f = 0.1812 mM_per_min; k2eq = 56.41503 dimensionless; k2aspp = 0.022 mM; k2asa = 0.11 mM; k2p = 10 mM; k2nadph = 0.029 mM; k2nadp = 0.144 mM;
  vatpase: atp -> adp + phos; compartment*vatpase_prot*katpase; vatpase is "ATPase";  // GO:0016887
    katpase = 4.1e-5 millimole_per_mg_per_min; vatpase_prot = 202 mg_per_litre;
  vhdh: nadph + asa -> hs + nadp; compartment*(vm3f*(asa*nadph - hs*nadp/k3eq)/((1 + (thr/k3thr)^nhdh1)/(1 + (thr/(alpha3*k3thr))^nhdh1)*(k3asa + asa + hs*k3asa/k3hs)*(k3nadph*(1 + nadp/k3nadp) + nadph))); vhdh is "Homoserine dehydrogenase";  // modifiers: asp, thr; isVersionOf ec-code:1.1.1.3 GO:0004412 kegg.reaction:R01775
    vm3f = 1.001 mM_per_min; k3eq = 3162.278 dimensionless; k3thr = 0.097 mM; nhdh1 = 1.41 dimensionless; alpha3 = 3.93 dimensionless; k3asa = 0.24 mM; k3hs = 3.39 mM; k3nadph = 0.037 mM; k3nadp = 0.067 mM;
  vhk: hs + atp -> hsp + adp; compartment*(vm4f*hs*atp/((1 + vhk_lys/k4lys)*(atp + k4atp*(1 + hs/k4ihs))*(hs + k4hs*(1 + thr/k4thr)*(1 + atp/k4iatp)))); vhk is "Homoserine kinase";  // modifiers: thr; isVersionOf ec-code:2.7.1.39 GO:0004413 kegg.reaction:R01771
    vm4f = 0.1 mM_per_min; vhk_lys = 0.46 mM; k4lys = 9.45 mM; k4atp = 0.072 mM; k4ihs = 4.7 mM; k4hs = 0.11 mM; k4thr = 1.09 mM; k4iatp = 4.35 mM;
  vnadph_endo: nadph -> nadp; compartment*vnadph_endo_prot*knadph*nadph; vnadph_endo is "Endogenous consumption of NADPH";  // isVersionOf GO:0006739
    knadph = 5.4e-6 litre_per_mg_per_min; vnadph_endo_prot = 202 mg_per_litre;
  vtsy: hsp -> thr + phos; compartment*vm5*hsp/(hsp + k5hsp); vtsy is "Threonine synthase";  // kegg.reaction:R01466 ec-code:4.2.3.1 GO:0004795
    vm5 = 0.0434 mM_per_min; k5hsp = 0.31 mM;

  // Unit definitions:
  unit millimole = 1e-3 mole;
  unit min = 60 second;
  unit mM = 1e-3 mole / litre;
  unit mM_per_min = 1e-3 mole / (litre * 60 second);
  unit litre_per_mg_per_min = litre / (1e-3 gram * 60 second);
  unit millimole_per_mg_per_min = 1e-3 mole / (1e-3 gram * 60 second);
  unit mg_per_litre = 1e-3 gram / litre;
end
