// SBML level 2 version 1

model clancy2()

  // Compartments:
  compartment cell = 1;  // isVersionOf GO:0005623

  // Species:
  species C1 in cell = 0;  // isVersionOf interpro:IPR001696 GO:0001518
  species C2 in cell = 0;  // isVersionOf interpro:IPR001696 GO:0001518
  species C3 in cell = 1;  // isVersionOf interpro:IPR001696 GO:0001518
  species IC2 in cell = 0;  // isVersionOf interpro:IPR001696 GO:0001518
  species IC3 in cell = 0;  // isVersionOf interpro:IPR001696 GO:0001518
  species IF in cell = 0;  // isVersionOf interpro:IPR001696 GO:0001518
  species IM1 in cell = 0;  // isVersionOf interpro:IPR001696 GO:0001518
  species IM2 in cell = 0;  // isVersionOf interpro:IPR001696 GO:0001518
  species O in cell = 0; O is "open states";  // isVersionOf interpro:IPR001696 GO:0001518

  // Parameters:
  Fara = 96485;
  Gna = 23.5;
  var Ina; Ina is "I_Na";
  Rk = 8314;
  Temp = 310;
  nai = 15; nai is "[Na]in";
  nao = 140; nao is "[Na]out";
  scale = 1000;
  vhold = -80;
  vtest = -30;

  // Assignment rules:
  a11 := 3.802/(0.1027*exp(-v/17) + 0.2*exp(-v/150));
  a12 := 3.802/(0.1027*exp(-v/15) + 0.23*exp(-v/150));
  a2 := 9.178*exp(v/29.68);
  b13 := 0.22*exp(-(v - 10)/20.3);
  b3 := 0.0084 + 2e-5*v;
  a4 := 9.178*exp(v/29.68)/100;
  b4 := 3.7933*1e-7*exp(-v/7.7);
  b5 := 3.7933*1e-7*exp(-v/7.7)/50;
  a5 := 9.178*exp(v/29.68)/(9.5*10000);
  Ena := Rk*Temp/Fara*ln(nao/nai);
  b11 := 0.1917*exp(-v/20.3);
  b2 := 3.802/(0.1027*exp(-v/12) + 0.25*exp(-v/150))*9.178*exp(v/29.68)*3.7933*1e-7*exp(-v/7.7)/(0.22*exp(-(v - 10)/20.3)*(0.0084 + 2e-5*v));
  b12 := 0.2*exp(-(v - 5)/20.3);
  Ina := Gna*(O/(IC3 + IC2 + IF + IM1 + IM2 + C3 + C2 + C1 + O))*(v - Rk*Temp/Fara*ln(nao/nai))/scale;
  a3 := 3.7933*1e-7*exp(-v/7.7);
  a13 := 3.802/(0.1027*exp(-v/12) + 0.25*exp(-v/150));
  v := piecewise(vtest, (5 < time) && (time <= 300), vhold);
  observable_task0_model0_clancy2_Ina := Ina;

  // Reactions:
  IC3_IC2: IC3 -> IC2; cell*(IC3*a11 - IC2*b11); IC3_IC2 is "IC3=IC2";  // isVersionOf GO:0017080 GO:0002028
  IC2_IF: IC2 -> IF; cell*(IC2*a12 - IF*b12); IC2_IF is "IC2=IF";  // isVersionOf GO:0017080 GO:0002028
  IF_IM1: IF -> IM1; cell*(IF*a4 - IM1*b4); IF_IM1 is "IF=IM1";  // isVersionOf GO:0017080 GO:0002028
  IM1_IM2: IM1 -> IM2; cell*(IM1*a5 - IM2*b5); IM1_IM2 is "IM1=IM2";  // isVersionOf GO:0017080 GO:0002028
  C3_IC3: C3 -> IC3; cell*(C3*b3 - IC3*a3); C3_IC3 is "C3=IC3";  // isVersionOf GO:0017080 GO:0002028
  C2_C3: C2 -> C3; cell*(C2*b11 - C3*a11); C2_C3 is "C2=C3";  // isVersionOf GO:0017080 GO:0002028
  C2_IC2: C2 -> IC2; cell*(C2*b3 - IC2*a3); C2_IC2 is "C2=IC2";  // isVersionOf GO:0017080 GO:0002028
  C1_C2: C1 -> C2; cell*(C1*b12 - C2*a12); C1_C2 is "C1=C2";  // isVersionOf GO:0017080 GO:0002028
  C1_IF: C1 -> IF; cell*(C1*b3 - IF*a3); C1_IF is "C1=IF";  // isVersionOf GO:0017080 GO:0002028
  IF_O: IF -> O; cell*(IF*b2 - a2*O); IF_O is "IF=O";  // isVersionOf GO:0017080 GO:0002028
  O_C1: O -> C1; cell*(-C1*a13 + O*b13); O_C1 is "O=C1";  // isVersionOf GO:0017080 GO:0002028

  // Unit definitions:
  unit time_ms = 1e-3 second; time_ms is "time(ms)";
  unit voltage_mV = 1e-3 volt; voltage_mV is "voltage(mV)";
end
