// SBML level 2 version 1

model clarke1()

  // Compartments:
  compartment cytoplasm = 1;  // GO:0005737
  compartment nucleus = 1;  // GO:0005634

  // Species:
  substanceOnly species Pi in nucleus = 0;  // CHEBI:18367 kegg.compound:C00009
  substanceOnly species R_smad_P_cyt in cytoplasm = 0; R_smad_P_cyt is "R-Smad-P_cyt";  // isHomologTo uniprot:Q15796
  substanceOnly species R_smad_P_nuc in nucleus = 0; R_smad_P_nuc is "R-Smad-P_nuc";  // isHomologTo uniprot:Q15796
  substanceOnly species R_smad_P_smad4_cyt in cytoplasm = 0; R_smad_P_smad4_cyt is "R-Smad-P-Smad4_cyt";  // hasPart uniprot:Q13485 uniprot:Q15796
  substanceOnly species R_smad_P_smad4_nuc in nucleus = 0; R_smad_P_smad4_nuc is "R-Smad-P-Smad4_nuc";  // hasPart uniprot:Q15796 uniprot:Q13485
  substanceOnly species R_smad_cyt in cytoplasm = 162000; R_smad_cyt is "R-Smad_cyt";  // isHomologTo uniprot:Q15796
  substanceOnly species R_smad_nuc in nucleus = 18000; R_smad_nuc is "R-Smad_nuc";  // isHomologTo uniprot:Q15796
  substanceOnly species receptor in cytoplasm = 10000; receptor is "receptors";  // hasPart uniprot:P36897 uniprot:P37173
  substanceOnly species smad4_cyt in cytoplasm = 120000; smad4_cyt is "Smad4_cyt";  // isHomologTo uniprot:Q13485
  substanceOnly species smad4_nuc in nucleus = 30000; smad4_nuc is "Smad4_nuc";  // isHomologTo uniprot:Q13485

  // Parameters:
  var sum_smad4_cyt; sum_smad4_cyt is "sum_Smad4_cyt";
  var sum_smad4_nuc; sum_smad4_nuc is "sum_Smad4_nuc";

  // Assignment rules:
  sum_smad4_cyt := smad4_cyt + R_smad_P_smad4_cyt;
  sum_R_smad_cyt := R_smad_cyt + R_smad_P_cyt + R_smad_P_smad4_cyt;
  sum_smad4_nuc := smad4_nuc + R_smad_P_smad4_nuc;
  sum_R_smad_nuc := R_smad_nuc + R_smad_P_nuc + R_smad_P_smad4_nuc;
  observable_task0_model0_clarke1_sum_R_smad_nuc := sum_R_smad_nuc;
  observable_task0_model0_clarke1_sum_smad4_nuc := sum_smad4_nuc;
  observable_task0_model0_clarke1_sum_R_smad_cyt := sum_R_smad_cyt;
  observable_task0_model0_clarke1_sum_smad4_cyt := sum_smad4_cyt;

  // Reactions:
  Receptor_degradation: receptor => ; 100*exp(-time/90);  // GO:0032801
  Phosphorylation: R_smad_cyt => R_smad_P_cyt; KCAT*receptor*R_smad_cyt/(K1 + R_smad_cyt);  // modifiers: receptor; ec-code:2.7.11.30 GO:0030618 GO:0004674
    KCAT = 3.51 min_inv; K1 = 289000 substance;
  Complex_formation: R_smad_P_cyt + smad4_cyt -> R_smad_P_smad4_cyt; k2a*R_smad_P_cyt*smad4_cyt - k2d*R_smad_P_smad4_cyt;  // GO:0030616 GO:0007183
    k2a = 6.5e-5; k2d = 0.0399 min_inv;
  Complex_translocation: R_smad_P_smad4_cyt => R_smad_P_smad4_nuc; k3*R_smad_P_smad4_cyt;  // GO:0007184
    k3 = 16.6 min_inv;
  Smad4_translocation: smad4_nuc -> smad4_cyt; k4nc*smad4_nuc - k4cn*smad4_cyt;  // GO:0006611
    k4nc = 0.783 min_inv; k4cn = 0.00497 min_inv;
  R_Smad_translocation: R_smad_nuc -> R_smad_cyt; k5nc*R_smad_nuc - k5cn*R_smad_cyt; R_Smad_translocation is "R-Smad translocation";  // GO:0007184
    k5nc = 5.63 min_inv; k5cn = 0.563 min_inv;
  Complex_in_nucleus: R_smad_P_smad4_nuc -> smad4_nuc + R_smad_P_nuc; k6d*R_smad_P_smad4_nuc - k6a*smad4_nuc*R_smad_P_nuc;  // GO:0043624
    k6d = 0.0492 min_inv; k6a = 0.000144;
  Dephosphorylation: R_smad_P_nuc => R_smad_nuc + Pi; Vmax7*R_smad_P_nuc/(K7 + R_smad_P_nuc);  // GO:0006470
    Vmax7 = 17100 items_per_min; K7 = 8950 substance;

  // Unit definitions:
  unit minutes = 60 second;
  unit substance = item;
  unit min_inv = 1 / (60 second);
  unit items_per_min = item / (60 second);
  unit per_item_per_min = 1 / (item * 60 second);
end
