// SBML level 2 version 4

function Lateral_inhibition_1(theta, a, Xj, n)
  theta/(theta + a*Xj^n);
end
Lateral_inhibition_1 is "Lateral inhibition [1]";

function Lateral_stabilisation_1(theta, b, Yi, Yj, n, c, Xi)
  (theta + b*(Yi*Yj)^n)/(theta + c*Xi^n + b*(Yi*Yj)^n);
end
Lateral_stabilisation_1 is "Lateral stabilisation [1]";

model deback1()

  // Compartments:
  compartment compartment_1 = 1;  // isVersionOf GO:0005623

  // Species:
  species Xi in compartment_1 = 0;  // isVersionOf uniprot:P70661
  species Yi in compartment_1 = 0;  // isVersionOf uniprot:Q9QX98
  species Xj in compartment_1 = 0;  // isVersionOf uniprot:P70661
  species Yj in compartment_1 = 0;  // isVersionOf uniprot:Q9QX98

  // Assignment rules:
  observable_task0_model0_deback1_species_1 := Xi;
  observable_task0_model0_deback1_species_2 := Yi;
  observable_task0_model0_deback1_species_3 := Xj;
  observable_task0_model0_deback1_species_4 := Yj;

  // Reactions:
  Xi_expr: => Xi; compartment_1*Lateral_inhibition_1(Xi_expr_theta, Xi_expr_a, Xj, Xi_expr_n);  // modifiers: Xj; isVersionOf GO:0006412
    Xi_expr_theta = 0.0001; Xi_expr_a = 1; Xi_expr_n = 4;
  Xi_degr: Xi => ; compartment_1*Xi_degr_k1*Xi;  // isVersionOf GO:0030163
    Xi_degr_k1 = 1;
  Yi_expr: => Yi; compartment_1*Lateral_stabilisation_1(Yi_expr_theta, Yi_expr_b, Yi, Yj, Yi_expr_n, Yi_expr_c, Xi);  // modifiers: Yj, Xi; isVersionOf GO:0006412
    Yi_expr_theta = 0.0001; Yi_expr_b = 21; Yi_expr_n = 4; Yi_expr_c = 1;
  Yi_degr: Yi => ; compartment_1*Yi_degr_k1*Yi;  // isVersionOf GO:0030163
    Yi_degr_k1 = 1;
  Xj_expr: => Xj; compartment_1*Lateral_inhibition_1(Xj_expr_theta, Xj_expr_a, Xi, Xj_expr_n);  // modifiers: Xi; isVersionOf GO:0006412
    Xj_expr_theta = 0.0001; Xj_expr_a = 1; Xj_expr_n = 4;
  Xj_degr: Xj => ; compartment_1*Xj_degr_k1*Xj;  // isVersionOf GO:0030163
    Xj_degr_k1 = 1;
  Yj_expr: => Yj; compartment_1*Lateral_stabilisation_1(Yj_expr_theta, Yj_expr_b, Yi, Yj, Yj_expr_n, Yj_expr_c, Xj);  // modifiers: Yi, Xj; isVersionOf GO:0006412
    Yj_expr_theta = 0.0001; Yj_expr_b = 21; Yj_expr_n = 4; Yj_expr_c = 1;
  Yj_degr: Yj => ; compartment_1*Yj_degr_k1*Yj;  // isVersionOf GO:0030163
    Yj_degr_k1 = 1;

  // Unit definitions:
  unit volume = 1e-3 litre;
  unit time = 60 second;
  unit substance = 1e-3 mole;
end
