// SBML level 2 version 4

model decroly1()

  // Compartments:
  compartment cell = 1;  // GO:0005622

  // Species:
  species alpha in cell = 29.19988;
  species beta in cell = 188.8;
  species gamma in cell = 0.3367;

  // Assignment rules:
  observable_task0_model0_decroly1_alpha := alpha;

  // Reactions:
  r1: => alpha; v_Km1;
    v_Km1 = 0.45 per_sec;
  r2: alpha => 50 beta; sigma1*alpha*(1 + alpha)*(1 + beta)^2/(L1 + (1 + alpha)^2*(1 + beta)^2);  // isVersionOf GO:0003824
    L1 = 500000000 dimensionless; sigma1 = 10 per_sec;
  r3: beta => 0.02 gamma; sigma2*beta*(1 + d*beta)*(1 + gamma)^2/(L2 + (1 + d*beta)^2*(1 + gamma)^2);  // isVersionOf GO:0003824
    L2 = 100 dimensionless; d = 0 dimensionless; sigma2 = 10 per_sec;
  r4: gamma => ; ks*gamma;
    ks = 1.99 per_sec;

  // Unit definitions:
  unit substance = dimensionless;
  unit volume = dimensionless;
  unit per_sec = 1 / second;
end
