// SBML level 3 version 1

model dixit1()

  // Compartments:
  compartment default = 1;

  // Species:
  species T in default = 1000000;
  species TStar in default = 0;
  species V in default = 100000000;

  // Parameters:
  NN = 1000;
  c = 0.35;
  delta = 1.44;
  k0 = 2e-9;
  lambda = 0.624;
  mu = 0.018;

  // Assignment rules:
  observable_task0_model0_dixit1_TStar := TStar;
  observable_task0_model0_dixit1_T := T;
  observable_task0_model0_dixit1_V := V;
  observable_task1_model1_dixit1_TStar := TStar;
  observable_task1_model1_dixit1_T := T;
  observable_task1_model1_dixit1_V := V;
  observable_task2_model2_dixit1_TStar := TStar;
  observable_task2_model2_dixit1_T := T;
  observable_task2_model2_dixit1_V := V;
  observable_task3_model3_dixit1_TStar := TStar;
  observable_task3_model3_dixit1_T := T;
  observable_task3_model3_dixit1_V := V;

  // Reactions:
  v1: -> T; lambda*T;
  v2: T -> ; mu*T;
  v3: T -> TStar; k0*T*V;  // modifiers: V
  v4: TStar -> ; delta*TStar;
  v5: -> V; delta*NN*TStar;  // modifiers: TStar
  v6: V -> ; c*V;
end
