// SBML level 2 version 1

model dupont1()

  // Compartments:
  compartment Cytosol = 1;  // isVersionOf GO:0005829
  compartment extracellular = 1;  // isVersionOf GO:0005576
  compartment intracellular_Ca_storepool = 1;  // isVersionOf GO:0044424

  // Species:
  species y in intracellular_Ca_storepool = 1.4; y is "Ca in the InsP3-insensitive pool";  // CHEBI:29108 kegg.compound:C00076
  species z in Cytosol = 0.1; z is "Ca in the cytosol";  // CHEBI:29108 kegg.compound:C00076

  // Parameters:
  K2 = 1;
  KA = 0.9;
  KR = 2;
  VM2 = 65;
  VM3 = 500;
  // when flag=0, beta=0, flag=1, beta=beta_f*exp[-0.2*(t-tp)]
  flag = 0;
  k = 10;
  kf = 1;
  m = 2;
  n = 2;
  p = 4;
  tstim = 4; tstim is "stimulation time";
  v0 = 1;
  v1 = 7.3;

  // Assignment rules:
  // According to the legend of Figure4B, beta decays from the initial value beta_f=96% according to the equation beta=beta_f*exp[-0.2*(t-tp)]. and tp=4s.
  beta := flag*0.96*exp(-0.2*(time - tstim));
  observable_task0_model0_dupont1_z := z;

  // Reactions:
  reaction_0000001: => z; v1*beta*Cytosol; reaction_0000001 is "InsP3 modulated release of Ca from the InsP3 sensitive store";  // isVersionOf GO:0006816 GO:0007204
  reaction_0000002: => z; v0*Cytosol; reaction_0000002 is "Constant input of Ca from the extracellular medium";  // isVersionOf GO:0006816 GO:0007204
  Leak_Ca_from_pool_to_cytosol: y => z; kf*y*Cytosol;  // isVersionOf GO:0006816 GO:0007204
  reaction_0000004: z => y; intracellular_Ca_storepool*VM2*z^n/(K2^n + z^n); reaction_0000004 is "Pumping Ca into the InsP3-insensitive store";  // isVersionOf GO:0005388 GO:0006816 GO:0051481
  reaction_0000005: y => z; Cytosol*VM3*(y^m/(KR^m + y^m))*(z^p/(KA^p + z^p)); reaction_0000005 is "Release of Ca from the pool into the cytosol";  // isVersionOf GO:0006816 GO:0007204
  reaction_0000006: z => ; k*z*extracellular; reaction_0000006 is "Transport of cytosolic ca into the extracellular medium";  // isVersionOf GO:0006816 GO:0051481

  // Events:
  event_0000001: at (time > tstim): flag = 1;

  // Unit definitions:
  unit microM = 1e-6 mole;
end
