// SBML level 2 version 3

model elowitz1()

  // Compartments:
  compartment cell = 1;  // GO:0005623

  // Species:
  // lacI inhibitor
  substanceOnly species PX in cell = 0; PX is "LacI protein";  // uniprot:P03023
  // Tet repressor protein
  substanceOnly species PY in cell = 0; PY is "TetR protein";  // uniprot:P04483
  // lambda repressor
  substanceOnly species PZ in cell = 0; PZ is "cI protein";  // uniprot:P03034
  substanceOnly species X in cell = 0; X is "LacI mRNA";  // isVersionOf CHEBI:33699 kegg.compound:C00046 uniprot:P03023
  substanceOnly species Y in cell = 20; Y is "TetR mRNA";  // isVersionOf CHEBI:33699 kegg.compound:C00046 uniprot:P04483
  substanceOnly species Z in cell = 0; Z is "cI mRNA";  // isVersionOf CHEBI:33699 kegg.compound:C00046 uniprot:P03034

  // Parameters:
  // Number of repressor molecules per cell giving half maximal repression, in monomers per cell
  KM = 40;
  // Average number of proteins per transcript
  eff = 20; eff is "translation efficiency";
  // Hill coefficient
  n = 2;
  // Transcrition from fully repressed promotor in transcripts per second and promotor
  ps_0 = 0.0005; ps_0 is "tps_repr";
  // Transcrition from free promotor in transcripts per second and promotor
  ps_a = 0.5; ps_a is "tps_active";
  var t_ave; t_ave is "average mRNA life time";
  tau_mRNA = 2; tau_mRNA is "mRNA half life";
  tau_prot = 10; tau_prot is "protein half life";

  // Assignment rules:
  alpha0 := a0_tr*eff*tau_prot/(ln(2)*KM);
  alpha := a_tr*eff*tau_prot/(ln(2)*KM);
  kd_mRNA := ln(2)/tau_mRNA;
  kd_prot := ln(2)/tau_prot;
  a0_tr := ps_0*60;
  a_tr := (ps_a - ps_0)*60;
  k_tl := eff/t_ave;
  beta := tau_mRNA/tau_prot;
  t_ave := tau_mRNA/ln(2);
  observable_task0_model0_elowitz1_PX := PX;
  observable_task0_model0_elowitz1_PY := PY;
  observable_task0_model0_elowitz1_PZ := PZ;

  // Reactions:
  degradation_of_LacI_transcripts: X => ; kd_mRNA*X;  // isVersionOf GO:0006402
  transcription_of_LacI: => X; a0_tr + a_tr*KM^n/(KM^n + PZ^n);  // modifiers: PZ; isVersionOf GO:0006351
  transcription_of_TetR: => Y; a0_tr + a_tr*KM^n/(KM^n + PX^n);  // modifiers: PX; isVersionOf GO:0006351
  transcription_of_CI: => Z; a0_tr + a_tr*KM^n/(KM^n + PY^n);  // modifiers: PY; isVersionOf GO:0006351
  degradation_of_TetR_transcripts: Y => ; kd_mRNA*Y;  // isVersionOf GO:0006402
  degradation_of_CI_transcripts: Z => ; kd_mRNA*Z;  // isVersionOf GO:0006402
  translation_of_LacI: => PX; k_tl*X;  // modifiers: X; isVersionOf GO:0006412
  translation_of_TetR: => PY; k_tl*Y;  // modifiers: Y; isVersionOf GO:0006412
  translation_of_CI: => PZ; k_tl*Z;  // modifiers: Z; isVersionOf GO:0006412
  degradation_of_LacI: PX => ; kd_prot*PX;  // isVersionOf GO:0030163
  degradation_of_TetR: PY => ; kd_prot*PY;  // isVersionOf GO:0030163
  degradation_of_CI: PZ => ; kd_prot*PZ;  // isVersionOf GO:0030163

  // Unit definitions:
  unit cubic_microns = 1e-15 litre;
  unit minute = 60 second;
end
