// SBML level 2 version 1

model fridlyand1()

  // Compartments:
  compartment Cytoplasm = 7.64e-13; Cytoplasm is "cytoplasm";  // GO:0005737
  compartment ER = 2.8e-13; ER is "endoplasmic reticulum";  // GO:0005783

  // Species:
  species ADP_cyt in Cytoplasm; ADP_cyt is "Cytosolic ADP";  // CHEBI:16761 kegg.compound:C00008
  species ATP_cyt in Cytoplasm = 932.1; ATP_cyt is "Cytosolic ATP";  // CHEBI:15422 kegg.compound:C00002
  species Ca_cyt in Cytoplasm = 0.085; Ca_cyt is "Cytosolic Calcium";  // CHEBI:29108 kegg.compound:C00076
  species Ca_er in ER = 22.8; Ca_er is "ER Calcium";  // CHEBI:29108 kegg.compound:C00076
  species IP3_cyt in Cytoplasm = 0.33; IP3_cyt is "Cytosolic IP3";  // CHEBI:16595 kegg.compound:C01245
  species Na_cyt in Cytoplasm = 9858; Na_cyt is "Cytosolic Sodium";  // CHEBI:29101 kegg.compound:C01330

  // Parameters:
  Ca_ec = 2600;
  Cm = 6158;
  F = 9.6485e16; F is "Faraday's constant";
  K_cyt = 132400;
  K_ec = 8000;
  Kcah = 9.5;
  Kcap = 0.1;
  Kcar = 200;
  Kcarp = 0.5;
  Kdd = 17;
  Kip3 = 3.2;
  Kipca = 0.4; Kipca is "half activation cytosolic Ca";
  Kkca = 0.1;
  Knaca = 0.75;
  Krca = 0.077;
  Ksup = 150400;
  Ktd = 26;
  Ktt = 1;
  Na_ec = 140000;
  O_infinity has dimensionless;
  Okatp has dimensionless;
  P = 4950;
  Pcaer = 0.105;
  Pip3 = 1.2e-15;
  Pleak = 1e-16;
  Pmcap = 2000;
  Pnak = 600;
  Sn = 7;
  TV = 26.73;
  V = -60.9;
  V_CRAN = 0;
  Vcah = -19;
  Vn = -14;
  Vtau = -75;
  a = 65;
  b = 20;
  b5_ast = 0.03;
  b_1 = 100;
  b_2 = 0.0001;
  b_3 = 1.72e-17;
  b_4 = 0.0002;
  b_6 = 6e-7;
  c = 20;
  f5_ast = 0.002;
  f_1 = 2.5e-10;
  f_2 = 10;
  f_3 = 0.172;
  f_4 = 1.5e-8;
  f_6 = 11.5;
  f_Ca has dimensionless;
  fer = 0.03 dimensionless;
  fi = 0.01 dimensionless;
  gmKDr = 3000;
  gm_CRAN = 0.7;
  gmkatp = 24000;
  gmkca = 130;
  gmna = 1200;
  gmvca = 770;
  gnaca = 271;
  kadp = 0.00037; kadp is "ATP production rate constant";
  katp = 5e-5; katp is "Rate constant of ATP consumption";
  katpca = 5e-5; katpca is "Ca dependent ATP consumption";
  kdip = 4e-5; kdip is "IP3 degradation rate constant";
  kip = 0.0003; kip is "IP3 production rate constant";
  ksg = 0.0001;
  n = 0.00123;
  n_infinity has dimensionless;
  pna has dimensionless;

  // Assignment rules:
  ADP_cyt := 4000 - ATP_cyt;
  Vca := TV/2*ln(Ca_ec/Ca_cyt);
  Vk := TV*ln(K_ec/K_cyt);
  Vna := TV*ln(Na_ec/Na_cyt);
  pvca := 1/(1 + exp((Vcah - V)/Kcah));
  p_CRAN := V - V_CRAN;
  I_CaPump := Pmcap*Ca_cyt^2/(Kcap^2 + Ca_cyt^2);
  f_5 := f5_ast*exp(V/(2*TV));
  b_5 := b5_ast*exp(-V/(2*TV));
  I_Vca := gmvca*1/(1 + exp((Vcah - V)/Kcah))*(V - TV/2*ln(Ca_ec/Ca_cyt));
  Jout := (Pleak + Pip3*O_infinity)*(Ca_er - Ca_cyt);
  B2 := b_2*(4000 - ATP_cyt);
  B3 := b_3*Na_ec^3;
  B4 := b_4*P;
  f_Ca := Ca_cyt^4/(Ca_cyt^4 + Kkca^4);
  B6 := b_6*Ksup^2;
  tau_n := c/(exp((V - Vtau)/a) + exp((Vtau - V)/b));
  F5 := f5_ast*exp(V/(2*TV))*ATP_cyt;
  n_infinity := 1/(1 + exp((Vn - V)/Sn));
  F4 := f_4*K_ec^2;
  Jerp := Pcaer*Ca_cyt^2/(Ca_cyt^2 + Kcarp^2);
  I_KDr := gmKDr*n*(V - TV*ln(K_ec/K_cyt));
  I_Na := gmna*(1/(1 + exp((104 + V)/8)))*(V - TV*ln(Na_ec/Na_cyt));
  I_NaK := Pnak*(f_1*Na_cyt^3*f_2*f_3*f_4*K_ec^2*f5_ast*exp(V/(2*TV))*ATP_cyt*f_6 - b_1*b_2*(4000 - ATP_cyt)*b_3*Na_ec^3*b_4*P*b5_ast*exp(-V/(2*TV))*b_6*Ksup^2)/D;
  D := f_2*f_3*f_4*K_ec^2*f5_ast*exp(V/(2*TV))*ATP_cyt*f_6 + b_1*f_3*f_4*K_ec^2*f5_ast*exp(V/(2*TV))*ATP_cyt*f_6 + b_1*b_2*(4000 - ATP_cyt)*f_4*K_ec^2*f5_ast*exp(V/(2*TV))*ATP_cyt*f_6 + b_1*b_2*(4000 - ATP_cyt)*b_3*Na_ec^3*f5_ast*exp(V/(2*TV))*ATP_cyt*f_6 + b_1*b_2*(4000 - ATP_cyt)*b_3*Na_ec^3*b_4*P*f_6 + b_1*b_2*(4000 - ATP_cyt)*b_3*Na_ec^3*b_4*P*b5_ast*exp(-V/(2*TV));
  I_KATP := gmkatp*((0.08*(1 + 0.33*((4000 - ATP_cyt)/Kdd)) + 0.89*(0.165*((4000 - ATP_cyt)/Kdd))^2)/((1 + 0.165*((4000 - ATP_cyt)/Kdd))^2*(1 + 0.135*((4000 - ATP_cyt)/Ktd) + 0.05*(ATP_cyt/Ktt))))*(V - TV*ln(K_ec/K_cyt));
  O_infinity := Ca_cyt*IP3_cyt^3/((Ca_cyt + Krca)*(IP3_cyt^3 + Kip3^3));
  I_KCa := gmkca*(Ca_cyt^4/(Ca_cyt^4 + Kkca^4))*(V - TV*ln(K_ec/K_cyt));
  I_CRAN := -gm_CRAN/(1 + exp((Ca_er - Kcar)/3))*(V - V_CRAN)*(V - TV*ln(Na_ec/Na_cyt));
  I_NaCa := gnaca*Ca_cyt^5*(V - TV*(3*ln(Na_ec/Na_cyt) - ln(Ca_ec/Ca_cyt)))/(Ca_cyt^5 + Knaca^5);
  Okatp := (0.08*(1 + 0.33*((4000 - ATP_cyt)/Kdd)) + 0.89*(0.165*((4000 - ATP_cyt)/Kdd))^2)/((1 + 0.165*((4000 - ATP_cyt)/Kdd))^2*(1 + 0.135*((4000 - ATP_cyt)/Ktd) + 0.05*(ATP_cyt/Ktt)));
  F1 := f_1*Na_cyt^3;
  pna := 1/(1 + exp((104 + V)/8));
  f_CRAN := -gm_CRAN/(1 + exp((Ca_er - Kcar)/3));
  Vnaca := TV*(3*ln(Na_ec/Na_cyt) - ln(Ca_ec/Ca_cyt));
  observable_task0_model0_fridlyand1_Ca_cyt := Ca_cyt;
  observable_task0_model0_fridlyand1_Ca_er := Ca_er;
  observable_task0_model0_fridlyand1_IP3_cyt := IP3_cyt;
  observable_task0_model0_fridlyand1_ATP_cyt := ATP_cyt;
  observable_task0_model0_fridlyand1_Na_cyt := Na_cyt;

  // Rate rules:
  V' = (0 - (I_Vca + I_CaPump + I_NaCa + I_CRAN + I_Na + I_NaK + I_KDr + I_KCa + I_KATP))/Cm;
  n' = (n_infinity - n)/tau_n;

  // Reactions:
  ATP_Ca_dependent_consumption: ATP_cyt => ; Cytoplasm*katpca*Ca_cyt*ATP_cyt;  // modifiers: Ca_cyt; GO:0030899
  ATP_Capump: ATP_cyt => ; I_CaPump/F;  // ec-code:3.6.3.8 GO:0005388
  ATP_Jerp: ATP_cyt => ; Cytoplasm*Jerp/2;  // ec-code:3.6.3.8 GO:0005388
  ATP_NaKATPase: ATP_cyt => ; I_NaK/F;  // ec-code:3.6.3.9 GO:0005391
  ATP_consumption: ATP_cyt => ; Cytoplasm*katp*ATP_cyt;  // GO:0006200
  ATP_production: => ATP_cyt; Cytoplasm*kadp*ADP_cyt;  // modifiers: ADP_cyt; GO:0006754
  Calcium_cyt_Icapump: Ca_cyt => ; fi*2*I_CaPump/(2*F);  // ec-code:3.6.3.8 GO:0005388 GO:0005524
  Calcium_cyt_Inaca: => Ca_cyt; fi*2*I_NaCa/(2*F);  // isVersionOf GO:0005432
  Calcium_cyt_Ivca: => Ca_cyt; fi*(-I_Vca)/(2*F);  // isVersionOf GO:0005245
  Calcium_cyt_Jerp: 0.01 Ca_cyt => 0.03 Ca_er; Cytoplasm*Jerp;  // ec-code:3.6.3.8 GO:0005388 GO:0005524
  Calcium_cyt_Jout: 0.03 Ca_er => 0.01 Ca_cyt; Jout;  // hasPart GO:0007204 GO:0005220
  Calcium_cyt_sequestration: Ca_cyt => ; Cytoplasm*ksg*Ca_cyt;  // GO:0051208
  IP3_degradation: IP3_cyt => ; Cytoplasm*kdip*IP3_cyt;
  IP3_synthesis: => IP3_cyt; Cytoplasm*kip*Ca_cyt^2/(Ca_cyt^2 + Kipca^2);  // modifiers: Ca_cyt; ec-code:3.1.4.11 GO:0004435
  Na_Icran: => Na_cyt; -I_CRAN/F;  // isVersionOf GO:0005227
  Na_Ina: => Na_cyt; -I_Na/F;  // isVersionOf GO:0005248
  Na_Inaca: Na_cyt => ; 3*I_NaCa/F;  // GO:0005432
  Na_Inak: Na_cyt => ; 3*I_NaK/F;  // ec-code:3.6.3.9 GO:0005391

  // Unit definitions:
  unit Capacitance = 1e-15 farad;
  unit Time_inverse = 1 / (1e-3 second);
  unit Micromole = 1e-6 mole;
  unit milliseconds = 1e-3 second;
  unit Voltage = 1e-3 volt;
  unit Current = 1e-15 ampere;
  unit Concentration = 1e-6 mole / litre;
  unit Conductance = 1e-12 siemens;
  unit Conductance_coefficient = 1e-12 siemens / (1e-3 volt);
  unit amount_per_time = 1e-6 mole / (1e-3 second);
  unit concentration_per_time = 1e-6 mole / (1e-3 second * litre);
  unit volume_per_time = litre / (1e-3 second);
  unit per_concentration_per_time = litre / (1e-6 mole * 1e-3 second);
  unit per_concentration_cubed_per_time = litre^3 / ((1e-6 mole)^3 * 1e-3 second);
  unit per_Concentration_square_per_time = litre^2 / ((1e-6 mole)^2 * 1e-3 second);
  unit per_concentration = litre / (1e-6 mole);
  unit Faraday_constant = 1e-15 ampere * 1e-3 second / (1e-6 mole);
end
