// SBML level 2 version 4

model friedland1()

  // Compartments:
  compartment cell = 1;  // GO:0005623

  // Species:
  species ara in cell = 0;  // kegg.compound:C00259 CHEBI:17535
  species mGFPcr in cell = 0.176991329;  // encodes interpro:IPR000786 CHEBI:33699
  species mT3cr in cell = 0.00566438;  // encodes uniprot:P07659 CHEBI:33699
  species mT7cr in cell = 0.3569405;  // encodes uniprot:P00573 CHEBI:33699
  species pGFP in cell = 6.338921;  // isHomologTo uniprot:P42212 interpro:IPR000786
  species pT3 in cell = 6.41674e-5;  // isVersionOf uniprot:P07659 GO:0000428
  species pT7 in cell = 0.05230745;  // isVersionOf uniprot:P00573 GO:0000428
  species taRNA in cell = 0.006796941;  // hasProperty GO:0045975 CHEBI:33697

  // Parameters:
  cAra = 0.0003;
  dAra = 0.1201;
  d_mGFP = 0.07;
  d_mT3 = 0.0701;
  d_mT7 = 0.0706;
  d_pGFP = 0.003;
  d_pT3 = 0.0069;
  d_pT7 = 0.0056;
  d_taRNA = 0.1177;
  k_ara = 0.0571;
  k_pT3 = 3.006;
  k_pT7 = 3.8009;
  km3 = 7.9075;
  km7 = 3.0455;
  n3 = 0.8892;
  n7 = 2.602;
  pulse1_length = 11;
  pulse1_start = 0.01;
  pulse2_length = 11;
  pulse3_length = 22;
  pulse_conc = 0.01;
  pulse_flag = 0;
  pulse_interval = 20;
  s0_mGFPcr = 0.0123;
  s0_mT3cr = 0.0003;
  s0_mT7cr = 0.0252;
  s0_pGFP = 0.1007;
  s0_pT3 = 0;
  s0_pT7 = 0.0003;
  s0_taRNA = 0.0008;
  sT = 0.8467;
  s_pGFPk = 0.9923;
  s_pT3k = 0.0115;
  s_pT7k = 0.0766;

  // Assignment rules:
  pulse3_start := pulse2_start + pulse2_length + pulse_interval;
  pulse2_start := pulse1_start + pulse1_length + pulse_interval;
  observable_task1_model1_friedland1_pGFP := pGFP;

  // Reactions:
  r0: ara => ; cell*piecewise(cAra, (pulse_flag == 1) && (ara > 0), dAra*ara);  // isVersionOf GO:0019572
  r10a: => mT3cr; cell*(s0_mT3cr + k_pT7*pT7^n7/(km7^n7 + pT7^n7));  // modifiers: pT7; isVersionOf GO:0006351
  r10b: mT3cr => ; cell*d_mT3*mT3cr;  // isVersionOf GO:0006402
  r11: => pT3; cell*(s0_pT3*mT3cr + s_pT3k*taRNA*mT3cr);  // modifiers: taRNA, mT3cr; isVersionOf GO:0006412 GO:0045974
  r12: pT3 => ; cell*d_pT3*pT3;  // hasVersion GO:0030163
  r1a: => taRNA; cell*(sT*ara/(ara + k_ara) + s0_taRNA);  // modifiers: ara; hasVersion GO:0051091 GO:0001121
  r1b: taRNA => ; cell*d_taRNA*taRNA;  // isVersionOf GO:0034661
  r2a: => mT7cr; cell*s0_mT7cr;  // isVersionOf GO:0001121
  r2b: mT7cr => ; cell*d_mT7*mT7cr;  // isVersionOf GO:0006402
  r3a: => mGFPcr; cell*(s0_mGFPcr + k_pT3*pT3^n3/(km3^n3 + pT3^n3));  // modifiers: pT3; isVersionOf GO:0006351
  r3b: mGFPcr => ; cell*d_mGFP*mGFPcr;  // isVersionOf GO:0006402
  r6: => pT7; cell*(s0_pT7*mT7cr + s_pT7k*mT7cr*taRNA);  // modifiers: taRNA, mT7cr; hasVersion GO:0045974 GO:0006412
  r7: => pGFP; cell*(s0_pGFP*mGFPcr + s_pGFPk*mGFPcr*taRNA);  // modifiers: taRNA, mGFPcr; hasVersion GO:0045974 GO:0006412
  r8: pT7 => ; cell*d_pT7*pT7;  // isVersionOf GO:0030163
  r9: pGFP => ; cell*d_pGFP*pGFP;  // isVersionOf GO:0030163

  // Events:
  pulse_end1: at ((time < pulse2_start) && (time > pulse1_start + pulse1_length)): pulse_flag = 0;
  pulse_start3: at ((time >= pulse3_start) && (time <= pulse3_start + pulse3_length)): ara = pulse_conc, pulse_flag = 1;
  pulse_end3: at (time > pulse3_start + pulse3_length): pulse_flag = 0;
  pulse_start2: at ((time >= pulse2_start) && (time <= pulse2_start + pulse2_length)): ara = pulse_conc, pulse_flag = 1;
  pulse_start1: at ((time >= pulse1_start) && (time <= pulse1_start + pulse1_length)): ara = pulse_conc, pulse_flag = 1;
  pulse_end2: at ((time < pulse3_start) && (time > pulse2_start + pulse2_length)): pulse_flag = 0;
end
