// SBML level 2 version 1

model goldbeter4()

  // Compartments:
  compartment cytosol = 1;  // GO:0005829
  compartment store = 1;  // GO:0005783

  // Species:
  species Y in store = 1.6;  // CHEBI:29108 kegg.compound:C00076
  species Z in cytosol = 0.15;  // CHEBI:29108 kegg.compound:C00076

  // Parameters:
  K2 = 1 uM;
  Ka = 0.9 uM;
  Kr = 2 uM;
  Vm2 = 65 uM_per_sec;
  Vm3 = 500 uM_per_sec;
  beta = 0.301 dimensionless;
  k = 10 sec_inv;
  kf = 1 sec_inv;
  m = 2 dimensionless;
  n = 2 dimensionless;
  p = 4 dimensionless;
  v0 = 1 uM_per_sec;
  v1 = 7.3 uM_per_sec;

  // Assignment rules:
  observable_task0_model0_goldbeter4_Y := Y;
  observable_task0_model0_goldbeter4_Z := Z;

  // Reactions:
  Ca_influx: => Z; cytosol*v0;  // GO:0006816
  InsP3_dependent_Ca_influx: => Z; cytosol*v1*beta;  // GO:0005220
  ATP_driven_Ca_pumping_into_store: Z => Y; cytosol*(Vm2*Z^n/(K2^n + Z^n));  // GO:0032470
  ATP_driven_pumping_into_cytosol: Y => Z; store*(Vm3*Y^m*Z^p/((Kr^m + Y^m)*(Ka^p + Z^p)));  // GO:0007204 GO:0048763
  R_eff: Z => ; cytosol*k*Z; R_eff is "Ca efflux";  // GO:0006816
  Rf: Y => Z; store*kf*Y; Rf is "Ca leak";  // GO:0007204

  // Unit definitions:
  unit micromole = 1e-6 mole;
  unit uM_per_sec = 1e-6 mole / (litre * second);
  unit sec_inv = 1 / second;
  unit uM = 1e-6 mole / litre;
end
