// SBML level 2 version 3

model goldbeter7()

  // Compartments:
  compartment cytosol = 1 litre;  // GO:0005829

  // Species:
  species A in cytosol = 0.1; A is "Axin2 protein";  // isHomologTo uniprot:Q9Y2T1
  species $AK in cytosol; AK is "Axin2/Gsk3 destruction complex";  // hasPart uniprot:Q9Y2T1 uniprot:P49841
  species B in cytosol = 0.1; B is "beta-catenin";  // isVersionOf interpro:IPR013284
  species BN in cytosol = 0.001; BN is "nuclear beta-catenin";  // isHomologTo uniprot:P35222 interpro:IPR013284
  species Bp in cytosol = 0.1; Bp is "phosph. beta-catenin";  // isHomologTo uniprot:P35222 interpro:IPR013284 kegg.compound:C00562
  species D in cytosol = 2; D is "Dsh protein";  // isVersionOf interpro:IPR003351 uniprot:O14640
  species Dusp in cytosol = 0.1; Dusp is "Dusp6 protein";  // isHomologTo uniprot:Q16828
  species ERKa in cytosol = 0.2; ERKa is "active ERK";  // isVersionOf interpro:IPR008349
  species $ERKi in cytosol; ERKi is "inactive ERK";  // isVersionOf interpro:IPR008349
  species ERKt in cytosol = 2; ERKt is "ERK total";  // isVersionOf interpro:IPR008349
  species F in cytosol = 0.001; F is "Lunatic Fringe protein";  // isVersionOf interpro:IPR017374 uniprot:Q8NES3
  species Fgf in cytosol = 1;  // isVersionOf interpro:IPR017338
  species K in cytosol = 3; K is "Gsk3";  // isHomologTo uniprot:P49841
  species Kt in cytosol = 3;  // isHomologTo uniprot:P49841
  species MAx in cytosol = 0.1; MAx is "Axin2 mRNA";  // isVersionOf CHEBI:33699 ensembl:ENSG00000168646 uniprot:Q9Y2T1
  species MDusp in cytosol = 0.1; MDusp is "Dusp6 mRNA";  // encodes uniprot:Q16828 ensembl:ENSG00000139318
  species MF in cytosol = 0.1; MF is "Lunatic fringe mRNA";  // isVersionOf CHEBI:33699 uniprot:Q8NES3 interpro:IPR017374
  species N in cytosol = 0.5; N is "Notch protein";  // isHomologTo uniprot:P46531 interpro:IPR008297
  species Na in cytosol = 0.2; Na is "cytosolic NicD";  // isPartOf interpro:IPR008297
  species Nan in cytosol = 0; Nan is "nuclear NicD";  // isPartOf interpro:IPR008297
  species Rasa in cytosol = 0.5; Rasa is "active Ras";  // hasVersion CHEBI:15996 interpro:IPR001806
  species $Rasi in cytosol; Rasi is "inactive Ras";  // hasVersion CHEBI:17552 interpro:IPR001806
  species Rast in cytosol = 2; Rast is "Ras total";  // isVersionOf interpro:IPR001806
  species Xa in cytosol = 0.1; Xa is "active TF X";  // isVersionOf interpro:IPR006715
  species $Xi in cytosol; Xi is "inactive TF X";  // isVersionOf interpro:IPR006715
  species Xt in cytosol = 2; Xt is "X total";  // isVersionOf interpro:IPR006715

  // Parameters:
  K1 = 0.28 nanomolar;
  K2 = 0.03 nanomolar;
  KA = 0.05 nanomolar;
  KID = 0.5 nanomolar;
  KIF = 0.5 nanomolar;
  KIG1 = 2.5 nanomolar;
  KaB = 0.7 nanomolar;
  KaErk = 0.05 nanomolar;
  KaFgf = 0.5 nanomolar;
  KaMDusp = 0.5 nanomolar;
  KaRas = 0.103 nanomolar;
  KaX = 0.05 nanomolar;
  KaXa = 0.05 nanomolar;
  KdAx = 0.63 nanomolar;
  KdDusp = 0.5 nanomolar;
  KdErk = 0.05 nanomolar;
  KdF = 0.37 nanomolar;
  KdMDusp = 0.5 nanomolar;
  KdMF = 0.768 nanomolar;
  KdN = 1.4 nanomolar;
  KdNa = 0.001 nanomolar;
  KdNan = 0.001 nanomolar;
  KdRas = 0.1 nanomolar;
  KdX = 0.05 nanomolar;
  Kmd = 0.48 nanomolar;
  VMK = 5.08 flux;
  VMP = 1 flux;
  VMaErk = 3.3 flux;
  VMaRas = 4.968 flux;
  VMaX = 1.6 flux;
  VMdMDusp = 0.5 flux;
  VMdRas = 0.41 flux;
  VMdX = 0.5 flux;
  VMsMDusp = 0.9 flux;
  VdNa = 0.01 flux;
  VdNan = 0.1 flux;
  a1 = 1.8 second_order_rate_constant;
  d1 = 0.1 first_order_rate_constant;
  epsilon = 0.3 dimensionless;
  eta = 0.3 dimensionless;
  j = 2 dimensionless;
  kc = 3.45 first_order_rate_constant;
  kcDusp = 1.35 first_order_rate_constant;
  kd1 = 0 first_order_rate_constant;
  kd2 = 7.062 first_order_rate_constant;
  ksAx = 0.02 first_order_rate_constant;
  ksDusp = 0.5 first_order_rate_constant;
  ksF = 0.3 first_order_rate_constant;
  kt1 = 0.1 first_order_rate_constant;
  kt2 = 0.1 first_order_rate_constant;
  kt3 = 0.7 first_order_rate_constant;
  kt4 = 1.5 first_order_rate_constant;
  m = 2 dimensionless;
  n = 2 dimensionless;
  p = 2 dimensionless;
  q = 2 dimensionless;
  r = 2 dimensionless;
  theta = 1.5 dimensionless;
  v0 = 0.06 flux;
  vMB = 1.64 flux;
  vMXa = 0.5 flux;
  vdAx = 0.6 flux;
  vdDusp = 2 flux;
  vdF = 0.39 flux;
  vdN = 2.82 flux;
  vmF = 1.92 flux;
  vmd = 0.8 flux;
  vsB = 0.087 flux;
  vsF = 3 flux;
  vsFK has flux;
  vsN = 0.23 flux;

  // Assignment rules:
  Xi := Xt - Xa;
  ERKi := ERKt - ERKa;
  Rasi := Rast - Rasa;
  AK := Kt - K;
  vsFK := vsF*(KIG1/(KIG1 + K));
  observable_task0_model0_goldbeter7_MAx := MAx;
  observable_task0_model0_goldbeter7_MDusp := MDusp;
  observable_task0_model0_goldbeter7_MF := MF;

  // Reactions:
  AK_dissoc: $AK -> A + K; theta*cytosol*(d1*AK - a1*A*K);  // isVersionOf GO:0043241
  A_degradation: A => ; theta*cytosol*vdAx*A/(KdAx + A);  // isVersionOf GO:0030163
  A_translation: => A; theta*cytosol*ksAx*MAx;  // modifiers: MAx; isVersionOf GO:0006412
  BP_dephosphorylation: Bp => B; theta*cytosol*VMP*Bp/(K2 + Bp);  // isVersionOf GO:0006470
  B_degradation: B => ; theta*cytosol*kd1*B;  // isVersionOf GO:0030163
  B_phosphorylation: B => Bp; theta*cytosol*VMK*KID/(KID + D)*B/(K1 + B)*AK/Kt;  // modifiers: AK, D, Kt; isVersionOf reactome:REACT_11065.1 GO:0006468
  B_shuttling: BN -> B; theta*cytosol*(kt4*BN - kt3*B);  // isVersionOf GO:0006913
  B_synth: => B; theta*cytosol*vsB;  // isVersionOf GO:0010467
  Bp_degradation: Bp => ; theta*cytosol*kd2*Bp;  // isVersionOf reactome:REACT_11063.1 GO:0030163
  Dusp_degradation: Dusp => ; eta*cytosol*vdDusp*Dusp/(KdDusp + Dusp);  // isVersionOf GO:0030163
  Dusp_translation: => Dusp; eta*cytosol*ksDusp*MDusp;  // modifiers: MDusp; isVersionOf GO:0006412
  Erk_activation: => ERKa; eta*cytosol*VMaErk*Rasa/Rast*ERKi/(KaErk + ERKi);  // modifiers: ERKi, Rasa, Rast; isVersionOf reactome:REACT_1482.4
  Erk_inactivation: ERKa => ; eta*cytosol*kcDusp*Dusp*ERKa/(KdErk + ERKa);  // modifiers: Dusp; isVersionOf reactome:REACT_12436.1
  F_degradation: F => ; epsilon*cytosol*vdF*F/(KdF + F);  // isVersionOf GO:0030163
  F_translation: => F; epsilon*cytosol*ksF*MF;  // modifiers: MF; isVersionOf GO:0006412
  MAx_degradation: MAx => ; theta*cytosol*vmd*MAx/(Kmd + MAx);  // isVersionOf GO:0006402
  MAx_trans_BN: => MAx; theta*cytosol*(vMB*BN^n/(KaB^n + BN^n));  // modifiers: BN; isVersionOf GO:0009299
  MAx_trans_Xa: => MAx; theta*cytosol*(vMXa*Xa^m/(KaXa^m + Xa^m));  // modifiers: Xa; isVersionOf GO:0009299
  MAx_trans_basal: => MAx; theta*cytosol*v0;  // modifiers: BN; isVersionOf GO:0009299
  MDusp_degradation: MDusp => ; eta*cytosol*VMdMDusp*MDusp/(KdMDusp + MDusp);  // isVersionOf GO:0006402
  MDusp_transkription: => MDusp; eta*cytosol*VMsMDusp*Xa^q/(KaMDusp^q + Xa^q);  // modifiers: Xa; isVersionOf GO:0009299
  MF_degradation: MF => ; epsilon*cytosol*vmF*MF/(KdMF + MF);  // isVersionOf GO:0006402
  MF_transkription: => MF; epsilon*cytosol*vsFK*Nan^p/(KA^p + Nan^p);  // modifiers: Nan; isVersionOf GO:0009299
  N_activation: N => Na; epsilon*cytosol*kc*N*KIF^j/(KIF^j + F^j); N_activation is "Notch_activation";  // modifiers: F; isVersionOf reactome:REACT_691.2 GO:0007220
  N_degradation: N => ; epsilon*cytosol*vdN*N/(KdN + N);  // isVersionOf GO:0030163
  Na_degradation: Na => ; epsilon*cytosol*VdNa*Na/(KdNa + Na);  // isVersionOf GO:0030163
  Na_transport: Na -> Nan; epsilon*cytosol*(kt1*Na - kt2*Nan);  // isVersionOf reactome:REACT_2155.3 GO:0006913
  Nan_degradation: Nan => ; epsilon*cytosol*VdNan*Nan/(KdNan + Nan);  // isVersionOf GO:0030163
  Ras_activation: => Rasa; eta*cytosol*VMaRas*Fgf^r/(KaFgf^r + Fgf^r)*Rasi/(KaRas + Rasi);  // modifiers: Rasi, Fgf; isVersionOf reactome:REACT_2010.5 GO:0032856
  Ras_inactivation: Rasa => ; eta*cytosol*VMdRas*Rasa/(KdRas + Rasa);  // isVersionOf GO:0034261
  X_activation: => Xa; eta*cytosol*VMaX*ERKa/ERKt*Xi/(KaX + Xi);  // modifiers: ERKa, ERKt, Xi; isVersionOf GO:0051091
  X_inactivation: Xa => ; eta*cytosol*VMdX*Xa/(KdX + Xa);  // isVersionOf GO:0043433
  n_synth: => N; cytosol*epsilon*vsN; n_synth is "Notch_synthesis";  // isVersionOf GO:0010467

  // Unit definitions:
  unit nanomole = 1e-9 mole;
  unit minute = 60 second;
  unit first_order_rate_constant = 1 / (60 second);
  unit second_order_rate_constant = litre / (1e-9 mole * 60 second);
  unit flux = 1e-9 mole / (litre * 60 second);
  unit nanomolar = 1e-9 mole / litre;
end
