// SBML level 2 version 3

model hong1()

  // Compartments:
  compartment system = 1;  // isVersionOf GO:0005623

  // Species:
  species CP in system = initialValue_CP; CP is "Monomer clock proteins (PER)";  // isHomologTo uniprot:O15516
  species CP2 in system = initialValue_CP2; CP2 is "Dimer form of clock proteins (PER/PER)";  // hasPart uniprot:O15516
  species M in system = initialValue_M; M is "Messenger RNA of the clock proteins (Per mRNA)";  // isVersionOf kegg.compound:C00046 CHEBI:33699
  species TF in system = initialValue_TF; TF is "Transcription factor (BMAL1/CLK)";  // hasPart uniprot:O00327 uniprot:P49759

  // Parameters:
  var CPtot; CPtot is "Total amount of clock proteins (PER on Fig. 2)";
  Dex = 0;  // isVersionOf CHEBI:41879
  var IC; IC is "Inactive complex of clock dimers and transcription factor";
  // Inactive complex of clock dimers and transcription factor: IC=TFtot-TF
  ICtot = 1; ICtot is "TFtot";
  IR_pulse_duration = 2;
  J = 0.3;
  Jp = 0.05;
  TFtot = 0.5;
  chk2ToggleOnOff = 1;
  chk2_value = 0.25;
  chk2c_value = 0.1;
  chk2pulseactive = 1;
  chk2pulseactive_elim = 1;
  chk2pulseactive_elim_elim = 0;
  initialValue_CP = 0.039;
  initialValue_CP2 = 0.088;
  initialValue_M = 1.35;
  initialValue_TF = 0.06;
  ka = 100;
  kcp2d = 0.0525;
  kcpd = 0.525;
  kcps = 0.5;
  kd = 0.01;
  kica = 20;
  kicd = 0.01;
  kmd = 0.1;
  kms = 1;
  kp1 = 10;
  kp2 = 0.1;
  n = 2;
  trigONtime = 4;

  // Assignment rules:
  IC := TFtot - TF;
  function_1 := kcps*M;
  function_4_r17 := kp2*IC/(Jp + CP + 2*CP2 + 2*IC)/system;
  function_4_r2 := kms*TF^n/(J^n + TF^n)/system;
  chk2pulseonoff := chk2pulseactive - (chk2pulseactive_elim_elim + chk2pulseactive_elim);
  function_4_r8 := kp1*CP/(Jp + CP + 2*CP2 + 2*IC)/system;
  function_4_r13 := kp2*CP2/(Jp + CP + 2*CP2 + 2*IC)/system;
  function_4_r1 := Dex/system;
  CPtot := CP + 2*CP2 + 2*IC;
  trigOFFtime := trigONtime + IR_pulse_duration;
  chk2c := chk2ToggleOnOff*chk2pulseonoff*(chk2c_value/IR_pulse_duration);
  chk2 := chk2ToggleOnOff*chk2pulseonoff*(chk2_value/IR_pulse_duration);
  observable_task0_model0_hong1_CPtot := task0_model0_hong1_CPtot;
  observable_task0_model0_hong1_TF := TF;
  observable_plot1_TF_datagen1 := task1_model1_hong1_TF;
  observable_plot1_CPtot_datagen1 := task1_model1_hong1_CPtot;

  // Reactions:
  r1: => M; system*function_4_r1;
  r10: => TF + CP2; system*kicd*IC;
  r11: CP2 => ; system*kcp2d*CP2;
  r12: TF + CP2 => ; system*kica*CP2*TF;
  r13: CP2 => ; system*function_4_r13;  // modifiers: CP
  r14: CP2 => ; system*chk2*CP2;
  r15: => TF; system*kcp2d*IC;
  r16: => TF; system*chk2c*IC;
  r17: => TF; system*function_4_r17;  // modifiers: CP, CP2
  r2: => M; system*function_4_r2;  // modifiers: TF
  r3: M => ; system*kmd*M;
  r4: => CP; system*function_1;  // modifiers: M
  r5: CP => ; system*kcpd*CP;
  r6: 2 CP => CP2; system*ka*CP^2;
  r7: CP2 => 2 CP; system*kd*CP2;
  r8: CP => ; system*function_4_r8;  // modifiers: CP2
  r9: CP => ; system*chk2*CP;

  // Events:
  trigON: at (time >= trigONtime): chk2pulseactive_elim = 0;
  trigOFF: at (time >= trigOFFtime): chk2pulseactive_elim_elim = 1;
end
