// SBML level 3 version 1

model huo1()

  // Compartments:
  compartment default = 1;

  // Species:
  species A in default = 10; A is "AIDS";
  species $EXT in default = 1;
  species I1 in default = 30; I1 is "Slow latent";
  species I2 in default = 40; I2 is "Fast latent";
  species J in default = 20; J is "Symptomatic";
  species S in default = 50; S is "Susceptible";

  // Parameters:
  Alpha = 0.01;
  Beta1 = 0.0001;
  Beta2 = 0.006;
  Epsilon = 0.002;
  Lambda = 0.55;
  Mu = 0.01;
  Xi1 = 0.8;
  Xi2 = 0.9;
  p = 0.9;
  p1 = 0.01;
  p2 = 0.03;
  q = 0.8;

  // Assignment rules:
  observable_task0_model0_huo1_I1 := I1;
  observable_task0_model0_huo1_I2 := I2;
  observable_task0_model0_huo1_S := S;
  observable_task1_model0_huo1_A := A;
  observable_task1_model0_huo1_J := J;

  // Reactions:
  v_1: $EXT -> S; Lambda;
  v_10: I2 -> J; p1*I2;
  v_11: I2 -> $EXT; Mu*I2;
  v_12: J -> I2; Xi2*J;
  v_13: J -> A; p2*J;
  v_14: J -> $EXT; Mu*J;
  v_15: A -> $EXT; Mu*A;
  v_16: A -> $EXT; Alpha*A;
  v_2: S -> I1; p*Beta1*I2*S;  // modifiers: I2
  v_3: S -> I2; (1 - p)*Beta1*I2*S;
  v_4: S -> $EXT; Mu*S;
  v_5: S -> I1; q*Beta2*J*S;  // modifiers: J
  v_6: I1 -> I2; Epsilon*I1;
  v_7: I1 -> $EXT; Mu*I1;
  v_8: J -> I1; Xi1*J;
  v_9: S -> I2; (1 - q)*Beta2*J*S;  // modifiers: J
end
