// SBML level 2 version 3

model ibrahim4()

  // Compartments:
  compartment Cytoplasm = 1;  // GO:0005737

  // Species:
  species Cdc20 in Cytoplasm = 2.2e-7;  // substance in mole; isVersionOf uniprot:Q12834
  species Cdc20_CMad2 in Cytoplasm = 0; Cdc20_CMad2 is "Cdc20:C-Mad2";  // substance in mole; hasPart uniprot:Q12834 uniprot:Q13257
  species Mad1_CMad2 in Cytoplasm = 5e-8; Mad1_CMad2 is "Mad1:C-Mad2";  // substance in mole; hasPart uniprot:Q9Y6D9 uniprot:Q13257
  species Mad1_CMad2_OMad2 in Cytoplasm = 0; Mad1_CMad2_OMad2 is "Mad1:C-Mad2:O-Mad2*";  // substance in mole; hasPart uniprot:Q9Y6D9 uniprot:Q13257
  // Open conformation of Mad2
  species OMad2 in Cytoplasm = 1.5e-7; OMad2 is "O-Mad2";  // substance in mole; isVersionOf uniprot:Q13257

  // Parameters:
  alpha_T = 200000;
  beta_T = 0.2;
  const_val_0 = 0 dimensionless;
  const_val_1 = 1 dimensionless;
  eta_T = 0.01;
  gamma_T = 1000000000;
  // u = 1 : kinetochore unattached
  // u = 0 : kinetochore attached
  u = 1 dimensionless;

  // Assignment rules:
  observable_task0_model0_ibrahim4_Cdc20 := Cdc20;
  observable_plot4_Cdc20_datagen1 := task4_model4_ibrahim4_Cdc20;
  observable_plot1_Cdc20_datagen1 := task1_model1_ibrahim4_Cdc20;
  observable_plot2_Cdc20_datagen1 := task2_model2_ibrahim4_Cdc20;
  observable_plot3_Cdc20_datagen1 := task3_model3_ibrahim4_Cdc20;

  // Reactions:
  R6: Mad1_CMad2 + OMad2 -> Mad1_CMad2_OMad2; Cytoplasm*(u*alpha_T*Mad1_CMad2*OMad2 - beta_T*Mad1_CMad2_OMad2);  // isVersionOf GO:0006461 GO:0043241 GO:0032092
  R7: Mad1_CMad2_OMad2 + Cdc20 => Mad1_CMad2 + Cdc20_CMad2; Cytoplasm*u*gamma_T*Mad1_CMad2_OMad2*Cdc20;  // isVersionOf GO:0006461 GO:0032092
  R8: Cdc20_CMad2 => Cdc20 + OMad2; Cytoplasm*eta_T*Cdc20_CMad2;  // isVersionOf GO:0043241

  // Events:
  mt_attachment: at (time > 2000): u = const_val_0; mt_attachment is "Microtubule attachment";  // GO:0008608

  // Unit definitions:
  unit per_second = 1 / second;
  unit liter_per_mole_per_second = litre / (mole * second);
end
