// SBML level 2 version 3

model ibrahim2()

  // Compartments:
  compartment Cytoplasm = 1;  // GO:0005737

  // Species:
  species APC in Cytoplasm = 9e-8;  // substance in mole; isVersionOf GO:0005680 uniprot:Q8NHZ8 uniprot:Q9BS18 uniprot:Q9NYG5
  species APC_Cdc20 in Cytoplasm = 0; APC_Cdc20 is "APC:Cdc20";  // substance in mole; hasPart uniprot:Q12834 uniprot:Q8NHZ8 uniprot:Q9BS18 uniprot:Q9NYG5
  species Bub3_BubR1 in Cytoplasm = 1.27e-7; Bub3_BubR1 is "Bub3:BubR1";  // substance in mole; hasPart uniprot:Q60566 uniprot:O43684
  species Bub3_BubR1_Cdc20 in Cytoplasm = 0; Bub3_BubR1_Cdc20 is "Bub3:BubR1:Cdc20";  // substance in mole; hasPart uniprot:Q12834 uniprot:Q60566 uniprot:O43684
  species Cdc20 in Cytoplasm = 2.2e-7;  // substance in mole; uniprot:Q12834
  species Cdc20_CMad2 in Cytoplasm = 0; Cdc20_CMad2 is "Cdc20:C-Mad2";  // substance in mole; hasPart uniprot:Q13257 uniprot:Q12834
  species MCC in Cytoplasm = 0;  // substance in mole; hasPart uniprot:Q12834 uniprot:Q13257 uniprot:Q60566 uniprot:O43684
  species MCC_APC in Cytoplasm = 0; MCC_APC is "MCC:APC";  // substance in mole; hasPart uniprot:Q12834 uniprot:Q13257 uniprot:Q60566 uniprot:O43684
  species Mad1_CMad2 in Cytoplasm = 5e-8; Mad1_CMad2 is "Mad1:C-Mad2";  // substance in mole; hasPart uniprot:Q13257 uniprot:Q9Y6D9 GO:0043234
  species Mad1_CMad2_OMad2 in Cytoplasm = 0; Mad1_CMad2_OMad2 is "Mad1:C-Mad2:O-Mad2*";  // substance in mole; isVersionOf GO:0043234 uniprot:Q13257 uniprot:Q9Y6D9
  // Open conformation of Mad2
  species OMad2 in Cytoplasm = 1.3e-7; OMad2 is "O-Mad2";  // substance in mole; uniprot:Q13257

  // Parameters:
  const_val_0 = 0 dimensionless;
  const_val_1 = 1 dimensionless;
  k1f = 200000;
  k1r = 0.2;
  k2f = 100000000;
  k3f = 0.01;
  k4f = 10000000;
  k4r = 0.02;
  k5f = 10000;
  k5r = 0.2;
  k7bf = 0.08;
  k7f = 100000000;
  k8f = 5000000;
  k8r = 0.08;
  kf6 = 1000;
  // u = 1 : kinetochore unattached
  // u = 0 : kinetochore attached
  u = 1 dimensionless;
  // u = 0 : kinetochore unattached
  // u = 1 : kinetochore attached
  u_prime = 0 dimensionless;

  // Assignment rules:
  observable_task0_model0_ibrahim2_MCC_APC := MCC_APC;
  observable_task0_model0_ibrahim2_Mad1_CMad2 := Mad1_CMad2;
  observable_task0_model0_ibrahim2_Mad1_CMad2_OMad2 := Mad1_CMad2_OMad2;
  observable_task0_model0_ibrahim2_OMad2 := OMad2;
  observable_task0_model0_ibrahim2_APC := APC;
  observable_task0_model0_ibrahim2_APC_Cdc20 := APC_Cdc20;
  observable_task0_model0_ibrahim2_Bub3_BubR1 := Bub3_BubR1;
  observable_task0_model0_ibrahim2_Bub3_BubR1_Cdc20 := Bub3_BubR1_Cdc20;
  observable_task0_model0_ibrahim2_Cdc20 := Cdc20;
  observable_task0_model0_ibrahim2_Cdc20_CMad2 := Cdc20_CMad2;
  observable_task0_model0_ibrahim2_MCC := MCC;

  // Reactions:
  R1: Mad1_CMad2 + OMad2 -> Mad1_CMad2_OMad2; Cytoplasm*(u*k1f*Mad1_CMad2*OMad2 - k1r*Mad1_CMad2_OMad2);  // isVersionOf GO:0032092 GO:0043241 GO:0006461
  R2: Mad1_CMad2_OMad2 + Cdc20 => Mad1_CMad2 + Cdc20_CMad2; u*k2f*Mad1_CMad2_OMad2*Cdc20*Cytoplasm;  // isVersionOf GO:0032092 GO:0006461
  R3: Cdc20_CMad2 => Cdc20 + OMad2; k3f*Cdc20_CMad2*Cytoplasm;  // isVersionOf GO:0043241
  R4: Cdc20_CMad2 + Bub3_BubR1 -> MCC; Cytoplasm*(u*k4f*Cdc20_CMad2*Bub3_BubR1 - k4r*MCC);  // isVersionOf reactome:REACT_36.2 GO:0043241 GO:0006461
  R5: Bub3_BubR1 + Cdc20 -> Bub3_BubR1_Cdc20; Cytoplasm*(u*k5f*Bub3_BubR1*Cdc20 - k5r*Bub3_BubR1_Cdc20);  // isVersionOf GO:0043241 GO:0006461
  R6: OMad2 + Cdc20 => Cdc20_CMad2; kf6*OMad2*Cdc20*Cytoplasm;  // isVersionOf GO:0006461
  R7: MCC + APC => MCC_APC; u*k7f*MCC*APC*Cytoplasm;  // isVersionOf GO:0043623 GO:0051436
  R7b: MCC_APC => OMad2 + Bub3_BubR1 + APC_Cdc20; u_prime*k7bf*MCC_APC*Cytoplasm;  // isVersionOf GO:0043624 GO:0007092
  R8: APC + Cdc20 -> APC_Cdc20; Cytoplasm*(k8f*APC*Cdc20 - k8r*APC_Cdc20);  // isVersionOf GO:0043623 GO:0007092

  // Events:
  mt_attachment: at (time > 2000): u_prime = const_val_1, u = const_val_0; mt_attachment is "Microtubule attachment";

  // Unit definitions:
  unit per_second = 1 / second;
  unit liter_per_mole_per_second = litre / (mole * second);
end
