// SBML level 2 version 3

model ibrahim3()

  // Compartments:
  compartment Cytoplasm = 1;  // GO:0005737

  // Species:
  species Bub3_BubR1 in Cytoplasm = 1.3e-7; Bub3_BubR1 is "Bub3:BubR1";  // substance in mole; hasPart uniprot:O43684 uniprot:O60566
  species Bub3_BubR1_Cdc20 in Cytoplasm = 0; Bub3_BubR1_Cdc20 is "Bub3:BubR1:Cdc20";  // substance in mole; hasPart uniprot:Q12834 uniprot:O60566 uniprot:O43684
  species Cdc20 in Cytoplasm = 2.2e-7;  // substance in mole; isVersionOf uniprot:Q12834
  species Cdc20_CMad2 in Cytoplasm = 0; Cdc20_CMad2 is "Cdc20:C-Mad2";  // substance in mole; hasPart uniprot:Q13257 uniprot:Q12834
  species MCC in Cytoplasm = 0;  // substance in mole; isVersionOf GO:0033597 uniprot:O60566 uniprot:Q13257 uniprot:Q12834
  species Mad1_CMad2 in Cytoplasm = 5e-8; Mad1_CMad2 is "Mad1:C-Mad2";  // substance in mole; hasPart uniprot:Q13257 uniprot:Q9Y6D9
  species Mad1_CMad2_OMad2 in Cytoplasm = 0; Mad1_CMad2_OMad2 is "Mad1:C-Mad2:O-Mad2*";  // substance in mole; hasPart uniprot:Q13257 uniprot:Q9Y6D9
  // Open conformation of Mad2
  species OMad2 in Cytoplasm = 1.3e-7; OMad2 is "O-Mad2";  // substance in mole; isVersionOf uniprot:Q13257

  // Parameters:
  const_val_0 = 0 dimensionless;
  const_val_1 = 1 dimensionless;
  k1f = 200000;
  k1r = 0.2;
  k2f = 10000000;
  k3f = 0.01;
  k4f = 10000000;
  k4r = 0.02;
  k5f = 10000;
  k5r = 0.2;
  kf6 = 1000;
  // u = 1 : kinetochore unattached
  // u = 0 : kinetochore attached
  u = 1 dimensionless;

  // Assignment rules:
  observable_task0_model0_ibrahim3_Bub3_BubR1 := Bub3_BubR1;
  observable_task0_model0_ibrahim3_Bub3_BubR1_Cdc20 := Bub3_BubR1_Cdc20;
  observable_task0_model0_ibrahim3_Cdc20 := Cdc20;
  observable_task0_model0_ibrahim3_Cdc20_CMad2 := Cdc20_CMad2;
  observable_task0_model0_ibrahim3_MCC := MCC;
  observable_task0_model0_ibrahim3_Mad1_CMad2 := Mad1_CMad2;
  observable_task0_model0_ibrahim3_Mad1_CMad2_OMad2 := Mad1_CMad2_OMad2;
  observable_task0_model0_ibrahim3_OMad2 := OMad2;

  // Reactions:
  R1: Mad1_CMad2 + OMad2 -> Mad1_CMad2_OMad2; Cytoplasm*(u*k1f*Mad1_CMad2*OMad2 - k1r*Mad1_CMad2_OMad2);  // isVersionOf GO:0032092 GO:0043241 GO:0006461
  R2: Mad1_CMad2_OMad2 + Cdc20 => Mad1_CMad2 + Cdc20_CMad2; Cytoplasm*u*k2f*Mad1_CMad2_OMad2*Cdc20;  // isVersionOf GO:0032092 GO:0006461
  R3: Cdc20_CMad2 => Cdc20 + OMad2; Cytoplasm*k3f*Cdc20_CMad2;  // isVersionOf GO:0043241
  R4: Cdc20_CMad2 + Bub3_BubR1 -> MCC; Cytoplasm*(u*k4f*Cdc20_CMad2*Bub3_BubR1 - k4r*MCC);  // isVersionOf reactome:REACT_36.2 GO:0006461 GO:0043241
  R5: Bub3_BubR1 + Cdc20 -> Bub3_BubR1_Cdc20; Cytoplasm*(u*k5f*Bub3_BubR1*Cdc20 - k5r*Bub3_BubR1_Cdc20);  // isVersionOf GO:0006461 GO:0043241
  R6: OMad2 + Cdc20 => Cdc20_CMad2; Cytoplasm*kf6*OMad2*Cdc20;  // isVersionOf GO:0006461

  // Events:
  mt_attachment: at (time > 2000): u = const_val_0; mt_attachment is "Microtubule attachment";  // GO:0008608

  // Unit definitions:
  unit per_second = 1 / second;
  unit liter_per_mole_per_second = litre / (mole * second);
end
