// SBML level 3 version 1

model iwami1()

  // Compartments:
  compartment default = 1;

  // Species:
  species v50 in default = 43.1;
  species vRNA in default = 9150000;
  species x in default = 6550000;
  species y in default = 647;

  // Parameters:
  a = 1.18;
  beta50 = 4.95e-5;
  d = 0.21;
  delta = 0.057;
  k = 26100;
  k50 = 0.22;
  rI = 0.93;
  rRNA = 0.039;
  rc = 7.31;

  // Assignment rules:
  observable_task0_model0_iwami1_v50 := v50;
  observable_task0_model0_iwami1_vRNA := vRNA;
  observable_task0_model0_iwami1_x := x;
  observable_task0_model0_iwami1_y := y;
  observable_task1_model1_iwami1_v50 := v50;
  observable_task1_model1_iwami1_vRNA := vRNA;
  observable_task1_model1_iwami1_x := x;
  observable_task1_model1_iwami1_y := y;
  observable_task2_model2_iwami1_v50 := v50;
  observable_task2_model2_iwami1_vRNA := vRNA;
  observable_task2_model2_iwami1_x := x;
  observable_task2_model2_iwami1_y := y;
  observable_task3_model3_iwami1_v50 := v50;
  observable_task3_model3_iwami1_vRNA := vRNA;
  observable_task3_model3_iwami1_x := x;
  observable_task3_model3_iwami1_y := y;

  // Reactions:
  v1: x -> y; beta50*v50*x;  // modifiers: v50
  v10: v50 -> ; rI*v50;
  v11: v50 -> ; rRNA*v50;
  v12: v50 -> ; rc*v50;
  v2: x -> ; d*x;
  v3: x -> ; delta*x;
  v4: y -> ; a*y;
  v5: y -> ; delta*y;
  v6: -> vRNA; k*y;  // modifiers: y
  v7: vRNA -> ; rRNA*vRNA;
  v8: vRNA -> ; rc*vRNA;
  v9: -> v50; k50*y;  // modifiers: y
end
