// SBML level 3 version 1

model jansen1()

  // Compartments:
  compartment default = 1;

  // Species:
  species B in default = 50;
  species II in default = 0;
  species T in default = 560000;
  species V in default = 0.04;

  // Parameters:
  a = 2.22e-7;
  beta = 1e-7;
  c = 4000;
  delta = 0.0025;
  gamma = 0.25;
  k = 0.025;
  lambda = 1400;
  mu = 0;
  phi = 32;

  // Assignment rules:
  observable_task0_model0_jansen1_V := V;
  observable_task0_model0_jansen1_B := B;
  observable_task0_model0_jansen1_V := V;
  observable_plot2_B_datagen1 := task1_model1_jansen1_B;
  observable_task1_model1_jansen1_B := B;
  observable_plot3_V_datagen1 := task1_model1_jansen1_V;
  observable_task1_model1_jansen1_V := V;

  // Reactions:
  v1: -> T; lambda;
  v2: T -> II; beta*T*V;  // modifiers: V
  v3: T -> ; delta*T;
  v4: II -> ; gamma*II;
  v5: -> V; c*gamma*II;  // modifiers: II
  v6: V -> ; phi*V;
  v7: V -> ; k*B*V;  // modifiers: B
  v8: -> B; a*B*V;  // modifiers: V
  v9: B -> ; mu*B;
end
