// SBML level 3 version 1

model jones1()

  // Compartments:
  compartment default = 1;

  // Species:
  species A in default = 1;
  species CC in default = 18800;
  species T in default = 323000;
  species Tstar in default = 7800;
  species V in default = 120000;

  // Parameters:
  KK = 3.36;
  NC = 4.11;
  NN = 285;
  a = 1.6;
  alpha = 0.195;
  c = 13;
  d = 0.01;
  delta = 0.7;
  gamma = 1.7475e-6;
  k = 1.7437e-7;
  lambda = 10000;
  mu = 0.07;

  // Assignment rules:
  observable_task0_model0_jones1_V := V;
  observable_task1_model1_jones1_V := V;
  observable_task2_model2_jones1_V := V;

  // Reactions:
  v1: A -> ; gamma*A*T;  // modifiers: T
  v10: -> V; delta*NN*Tstar;  // modifiers: Tstar
  v11: -> V; mu*NC*CC;  // modifiers: CC
  v2: -> T; lambda;
  v3: -> T; a*A*T/(KK + A);  // modifiers: A
  v4: T -> Tstar; k*T*V;  // modifiers: V
  v5: T -> ; d*T;
  v6: Tstar -> ; delta*Tstar;
  v7: CC -> ; mu*CC;
  v8: V -> ; c*V;
  v9: Tstar -> CC; alpha*k*T*V;  // modifiers: T, V
end
