// SBML level 3 version 1

model karin2()

  // Compartments:
  compartment default = 1;  // 0-D

  // Species:
  species y in default = 5;
  species z in default = 5;
  species zmut in default = 0;

  // Parameters:
  M = 25;
  k = 4;
  lambdaMinus = 0.5;
  mu = 0.25;

  // Assignment rules:
  lambdaPlus := y/10;
  observable_task0_model0_karin2_z := z;
  observable_task0_model0_karin2_zmut := zmut;

  // Reactions:
  v1: -> z; z*lambdaPlus;
  v2: z -> ; z*lambdaMinus;
  v3: -> y; mu*(M - (z + zmut)*y);  // modifiers: z, zmut
  v4: -> zmut; zmut*(k*y/10 - 0.5);  // modifiers: y

  // Events:
  at (time == 10), t0=false, persistent=false, fromTrigger=false: zmut = 1;
end
