// SBML level 3 version 1

model karin4()

  // Compartments:
  compartment default = 1;  // 0-D

  // Species:
  species y in default = 4.05785;
  species z in default = 6.1609;
  species zmut in default = 0;

  // Parameters:
  M = 25;
  lambdaMinus = 0.5;
  mu = 0.25;

  // Assignment rules:
  lambdaPlus := y/10;
  observable_task0_model0_karin4_z := z;
  observable_task0_model0_karin4_zmut := zmut;

  // Reactions:
  v1: -> z; z*(4.8/(1 + (7/y)^5) - 6/(1 + (8/y)^5) - 0.1);  // modifiers: y
  v2: -> y; mu*(M - (z + zmut)*y);  // modifiers: z, zmut
  v3: -> zmut; zmut*(4.8/(1 + (7/(4*y))^5) - 6/(1 + (8/(4*y))^5) - 0.1);  // modifiers: y

  // Events:
  at (time == 10), t0=false, persistent=false, fromTrigger=false: zmut = 1;
  trigger2: at (time == 47), t0=false, persistent=false, fromTrigger=false: zmut = 1;
end
