// SBML level 3 version 1

model karin6()

  // Compartments:
  compartment default = 1;

  // Species:
  species zd in default = 1;
  species zs in default = 0.5;
  species zsm in default = 0;

  // Parameters:
  k_pr = 1;
  k_prm = 0.15;
  lm = 0.5;
  lp = 1;

  // Assignment rules:
  pr := 1/(1 + (k_pr*zd)^0.5);
  prm := 1/(1 + (k_prm*zd)^0.5);
  observable_task0_model0_karin6_zd := zd;
  observable_task0_model0_karin6_zs := zs;
  observable_task0_model0_karin6_zsm := zsm;

  // Reactions:
  v1: -> zs; (2*pr - 1)*lp*zs;
  v2: -> zsm; (2*prm - 1)*lp*zsm;
  v3: -> zd; 2*(1 - pr)*lp*zs + 2*(1 - prm)*lp*zsm - lm*zd;  // modifiers: zs, zsm

  // Events:
  at (time == 10), t0=false, persistent=false, fromTrigger=false: zsm = 0.01;
end
