// SBML level 3 version 1

model karin7()

  // Compartments:
  compartment default = 1;  // 0-D

  // Species:
  species zd in default = 1;
  species zs in default = 0.5;
  species zsm in default = 0;

  // Parameters:
  k_pr = 1;
  k_prm = 0.166667;
  lm = 0.5;
  lp = 1;

  // Assignment rules:
  prm := 1/(1 + (k_prm*zd)^0.5)*1/(1 + 1/(5*k_prm*zd)^4);
  pr := 1/(1 + (k_pr*zd)^0.5)*1/(1 + 1/(5*k_pr*zd)^4);
  observable_task0_model0_karin7_zd := zd;
  observable_task0_model0_karin7_zs := zs;
  observable_task0_model0_karin7_zsm := zsm;

  // Reactions:
  v1: -> zs; (2*pr - 1)*lp*zs;
  v2: -> zsm; (2*prm - 1)*lp*zsm;
  v3: -> zd; 2*(1 - pr)*lp*zs + 2*(1 - prm)*lp*zsm - lm*zd;  // modifiers: zsm, zs

  // Events:
  at (time == 10), t0=false, persistent=false, fromTrigger=false: zsm = 0.01;
end
