// SBML level 2 version 3

model keizer1()

  // Compartments:
  compartment compartment = 1;  // GO:0005623

  // Species:
  substanceOnly species Pc1 in compartment = 0.963;  // isVersionOf uniprot:P21817
  substanceOnly species Pc2 in compartment = 0.037;  // isVersionOf uniprot:P21817
  substanceOnly species Po1 in compartment = 0;  // isVersionOf uniprot:P21817
  substanceOnly species Po2 in compartment = 0;  // isVersionOf uniprot:P21817

  // Parameters:
  Open_probability has dimensionless;

  // Assignment rules:
  Open_probability := Po1 + Po2;
  observable_task0_model0_keizer1_Open_probability := Open_probability;
  observable_task1_model0_keizer1_Open_probability := Open_probability;

  // Reactions:
  Closed_State_2: Po1 -> Pc2; kc_plus*Po1 - kc_minus*Pc2;  // isVersionOf GO:0005219
    kc_plus = 1.75 per_second; kc_minus = 0.1 per_second;
  Closed_state_1: Po1 -> Pc1; ka_minus*Po1 - ka_plus*Closed_state_1_Ca^n*Pc1;  // isVersionOf GO:0005219
    ka_minus = 28.8 per_second; ka_plus = 1500; Closed_state_1_Ca = 0.9 microM; n = 4 dimensionless;
  Open_state_2: Po1 -> Po2; kb_plus*Open_state_2_Ca^m*Po1 - kb_minus*Po2;  // isVersionOf GO:0005219
    kb_plus = 1500; Open_state_2_Ca = 0.9 microM; m = 3 dimensionless; kb_minus = 385.9 per_second;

  // Unit definitions:
  unit microM_4sec_1 = litre^4 / ((1e-6 mole)^4 * second); microM_4sec_1 is "microM-4sec-1";
  unit microM_3sec_1 = litre^3 / ((1e-6 mole)^3 * second); microM_3sec_1 is "microM-3sec-1";
  unit per_second = 1 / second;
  unit microM = 1e-6 mole / litre;
  unit normalized_substance = dimensionless;
end
