// SBML level 2 version 1

model klipp1()

  // Compartments:
  compartment cell = 1;  // isVersionOf GO:0005623

  // Species:
  species S in cell = 1;
  species X1 in cell = 0;
  species E1 in cell = 1;
  species E2 in cell;
  species P in cell = 0;
  // Etot=E1+E2 is constant.
  species Etot in cell = 1;

  // Assignment rules:
  E2 := Etot - E1;
  observable_task0_model0_klipp1_species_4 := P;
  observable_task0_model0_klipp1_species_2 := E1;
  observable_task0_model0_klipp1_species_3 := E2;
  observable_task0_model0_klipp1_species_0 := S;
  observable_task0_model0_klipp1_species_1 := X1;

  // Reactions:
  S_X1: S => X1; cell*S*E1*k1; S_X1 is "S->X1";  // modifiers: E1
    k1 = 1;
  X1_P: X1 => P; cell*k2*X1*E2; X1_P is "X1->P";  // modifiers: E2
    k2 = 1;

  // Events:
  // During the initial phase, t smaller than T1 (T1=1), the whole amount of protein is allocated to the first reaction(E1=Etot, E2=0). At the beginning of the second phase the concentration E2 undergoes an abrupt switch from zero to a finite vaule whereas the concentration E1 is descreased by the same extent.
  single_switch: at (time > 1): E1 = 0.4;
end
