// SBML level 2 version 1

model komarova2()

  // Compartments:
  compartment cell = 1;  // isVersionOf GO:0005623

  // Species:
  // x0(t) and y0(t) are the signal functions. The authors assume the network only receives one of the two signals at a time. Thus, if x0(t) is postive for some duration of time, then y0(t) is identically zero, and visa versa.
  species x0 in cell = 1;  // hasVersion interpro:IPR006210
  species x1 in cell = 0;  // hasVersion interpro:IPR003527
  species x2 in cell = 0;
  // x0(t) and y0(t) are the signal functions. The authors assume the network only receives one of the two signals at a time. Thus, if y0(t) is postive for some duration of time, then x0(t) is identically zero, and visa versa.
  species y0 in cell = 0;  // hasVersion interpro:IPR002072
  species y2 in cell = 0;

  // Parameters:
  a1 = 1;
  a2 = 2;
  b1 = 2;
  b2 = 1;
  d1 = 2;
  d2x = 1;
  d2y = 1;

  // Assignment rules:
  observable_task2_model2_komarova2_x0 := x0;
  observable_task2_model2_komarova2_x2 := x2;
  observable_task2_model2_komarova2_y2 := y2;
  observable_task3_model3_komarova2_x2 := x2;
  observable_task3_model3_komarova2_y0 := y0;
  observable_task3_model3_komarova2_y2 := y2;
  observable_task0_model1_komarova2_x0 := x0;
  observable_task0_model1_komarova2_x2 := x2;
  observable_task0_model1_komarova2_y2 := y2;
  observable_task1_model1_komarova2_x2 := x2;
  observable_task1_model1_komarova2_y0 := y0;
  observable_task1_model1_komarova2_y2 := y2;

  // Reactions:
  x0_activates_x1: => x1; cell*a1*x0;  // modifiers: x0; isVersionOf GO:0032147 GO:0045860
  y0_activates_x1: => x1; cell*b1*y0;  // modifiers: y0; isVersionOf GO:0032147 GO:0045860
  x1_activates_x2: => x2; cell*x1*a2;  // modifiers: x1; isVersionOf GO:0032147 GO:0045860
  x1_activates_y2: => y2; cell*x1*b2;  // modifiers: x1; isVersionOf GO:0032147 GO:0045860
  x1_deactivation: x1 => ; cell*d1*x1;  // isVersionOf GO:0006469
  x2_deactivation: x2 => ; cell*d2x*x2;  // isVersionOf GO:0006469
  y2_deactivation: y2 => ; cell*d2y*y2;  // isVersionOf GO:0006469

  // Events:
  // x0 signaling applied as square pulses of magnitude 1 and duration 1.
  event_0000001: at (time > 1): x0 = 0;  // isVersionOf GO:0051716
  at (time > 1): y0 = 0;
end
