// SBML level 3 version 1

model kouril3()
  // model units - substance: mmol, time: min, volume: L

  // Compartments:
  compartment default_compartment = 1;

  // Species:
  species adp in default_compartment = 0;  // kegg.compound:C00008 CHEBI:16761
  species atp in default_compartment = 10;  // obo.chebi:CHEBI/15422 kegg.compound:C00002
  species bpg in default_compartment = 0;  // CHEBI:28907 kegg.compound:C00236
  species dhap in default_compartment = 0.03;  // CHEBI:16108 kegg.compound:C00111
  species f6p in default_compartment = 0.12;  // kegg.compound:C00085 CHEBI:15946
  species $ga in default_compartment = 0;
  species gap in default_compartment = 0.06;  // obo.chebi:CHEBI/17138 kegg.compound:C00661
  species glc in default_compartment = 10; glc is "glucose";  // CHEBI:17234 kegg.compound:C00031
  species nadp in default_compartment = 0;  // kegg.compound:C00006 CHEBI:18009
  species nadph in default_compartment = 0.2;  // kegg.compound:C00005 CHEBI:16474
  species p3g in default_compartment = 1.8;  // kegg.compound:C00197 CHEBI:17794
  species pep in default_compartment = 5;  // kegg.compound:C00074 CHEBI:44897
  species pyr in default_compartment = 0.4;  // kegg.compound:C00022 CHEBI:32816

  // Parameters:
  KaldDHAP = 0.170995;
  KaldF6P = 1;
  KaldGAP = 0.0522437;
  KbisP = 0.000406744;
  Kgap = 0.83766;
  KiADP = 1.14174;
  Knadp = 0.271013;
  Knadph = 0.0735253;
  KpgkADP = 0.0848049;
  KpgkATP = 9.68404;
  KpgkP3G = 0.541454;
  KpgkbisP = 5.59;
  Kpi = 408.523;
  KtimDHAP = 0.811626;
  KtimGAP = 0.245106;
  KtimP3G = 0.399822;
  KtimPEP = 0.660519;
  Vmarev = 24.054;
  VmfALD = 2.64096;
  VmfPGK = 17.3221;
  VmfTIM = 239.835;
  Vmfor = 20.6526;
  VmrPGK = 30.04;
  VmrTIM = 239.414;
  kGDH = 10;
  kPK = 10;
  kdbpg = 1.05824;
  kddhap = 0.0225;
  kdgap = 0.0559;
  n = 1.56416;
  pie = 0;
  protALDPase = 0.0036;
  protGAPDH = 0.0421;
  protPGK = 0.0034;
  protTIM = 0.00085;
  noiseParameter1_DHAP = 1;
  noiseParameter1_F6P = 1;
  noiseParameter1_GAP = 1;
  noiseParameter1_3PG = 1;

  // Assignment rules:
  sigma_DHAP := noiseParameter1_DHAP;
  observable_DHAP := dhap;
  sigma_F6P := noiseParameter1_F6P;
  observable_F6P := f6p;
  sigma_GAP := noiseParameter1_GAP;
  observable_GAP := gap;
  sigma_3PG := noiseParameter1_3PG;
  observable_3PG := p3g;

  // Reactions:
  phosphoglycerate_kinase: atp + p3g -> adp + bpg; protPGK*(-VmrPGK*adp*bpg/(KpgkADP*KpgkbisP) + VmfPGK*atp*p3g/(KpgkATP*KpgkP3G))/((1 + adp/KiADP)*(1 + p3g/KpgkP3G*(1 + atp/KpgkATP) + bpg/KpgkbisP*(1 + adp/KpgkADP)));  // kegg.reaction:R01512
  v_2: bpg + nadph -> gap + nadp; protGAPDH*(-Vmarev*gap*nadp/(Kgap*Knadp)*(pie/Kpi) + Vmfor*bpg*nadph/(KbisP*Knadph))*(gap/Kgap*pie/Kpi + bpg/KbisP)^(n - 1)/((1 + nadp/Knadp + nadph/Knadph)*(1 + (gap/Kgap)^n + (pie/Kpi)^n + (gap/Kgap*(pie/Kpi) + bpg/KbisP)^n)); v_2 is "glyceraldehyde-3-phosphate dehydrogenase";  // kegg.reaction:R01061
  triose_phosphate_isomerase: gap -> dhap; protTIM*(-VmrTIM*dhap/KtimDHAP + VmfTIM*gap/KtimGAP)/(1 + dhap/KtimDHAP + gap/KtimGAP + pep/KtimPEP + p3g/KtimP3G); triose_phosphate_isomerase is "triose-phosphate isomerase";  // modifiers: pep, p3g; kegg.reaction:R01015
  fructose_bisphosphate_aldolase: dhap + gap -> f6p; protALDPase*(VmfALD*gap*dhap/(KaldGAP*KaldDHAP))/(1 + gap/KaldGAP + dhap/KaldDHAP + gap*dhap/(KaldGAP*KaldDHAP)); fructose_bisphosphate_aldolase is "fructose-bisphosphate aldolase";  // kegg.reaction:R01068
  v_5: gap -> ; kdgap*gap;
  v_6: dhap -> ; kddhap*dhap;
  v_7: bpg -> ; kdbpg*bpg;
  v_8: glc + nadp -> nadph + $ga; kGDH*nadp*glc;
  v_9: adp + pep -> atp + pyr; kPK*adp*pep;

  // Unit definitions:
  unit min = 60 second;
  unit mmol = 1e-3 mole;
  unit L = litre;
end
