// SBML level 2 version 4

function linear_activation(constant, Activator)
  constant*Activator;
end

function Irr_Michaelis_Menten__enzyme__userdefined(V, E, S, Km)
  V*E*S/(Km + S);
end
Irr_Michaelis_Menten__enzyme__userdefined is "Irr Michaelis-Menten (enzyme)[userdefined]";

function Henri_Michaelis_Menten__irreversible(substrate, Km, V)
  V*substrate/(Km + substrate);
end
Henri_Michaelis_Menten__irreversible is "Henri-Michaelis-Menten (irreversible)";

function Constant_flux__irreversible(v)
  v;
end
Constant_flux__irreversible is "Constant flux (irreversible)";

model kummer1()

  // Compartments:
  compartment compartment = 1e-13;  // isVersionOf GO:0005623

  // Species:
  species a in compartment = 0.01; a is "G-alpha";  // isVersionOf uniprot:Q9JID2
  species b in compartment = 0.01; b is "activePLC";  // isVersionOf uniprot:P10687
  species c in compartment = 0.01; c is "Calcium";  // isVersionOf CHEBI:29108

  // Assignment rules:
  observable_task0_model0_kummer1_c := c;

  // Reactions:
  R1: => a; compartment*Constant_flux__irreversible(v);
    v = 0.212;
  R2: => a; compartment*linear_activation(R2_constant, a);
    R2_constant = 2.9;
  R3: a => ; compartment*Irr_Michaelis_Menten__enzyme__userdefined(R3_V, b, a, R3_Km);  // modifiers: b
    R3_V = 1.52; R3_Km = 0.19;
  R4: a => ; compartment*Irr_Michaelis_Menten__enzyme__userdefined(R4_V, c, a, R4_Km);  // modifiers: c
    R4_V = 4.88; R4_Km = 1.18;
  R5: => b; compartment*linear_activation(R5_constant, a);  // modifiers: a
    R5_constant = 1.24;
  R6: b => ; compartment*Henri_Michaelis_Menten__irreversible(b, R6_Km, R6_V);
    R6_Km = 29.09; R6_V = 32.24;
  R7: => c; compartment*linear_activation(R7_constant, a);  // modifiers: a
    R7_constant = 13.58;
  R8: c => ; compartment*Henri_Michaelis_Menten__irreversible(c, R8_Km, R8_V);
    R8_Km = 0.16; R8_V = 153;

  // Unit definitions:
  unit substance = 1e-9 mole;
end
