// SBML level 3 version 1

model landi1()

  // Compartments:
  compartment default = 1;

  // Species:
  species r in default = 4e-7;
  species v in default = 104;
  species w in default = 0.001;
  species x in default = 1000;
  species y in default = 0;
  species z in default = 1e-7;

  // Parameters:
  a = 0.0999;
  b = 0.003;
  c = 5e-6;
  d = 0.007;
  fP = 0;
  fT = 0;
  h = 0.01;
  k = 300;
  lambda = 7;
  mu = 0.2;
  muP = 0.7;
  muT = 9e-10;
  p = 2;
  q = 120;
  r0 = 1e-9;

  // Assignment rules:
  observable_task0_model0_landi1_x := x;
  observable_task0_model0_landi1_v := v;

  // Reactions:
  v1: -> x; lambda;
  v10: -> v; k*y;  // modifiers: y
  v11: v -> ; fP*k*muP*y;  // modifiers: y
  v12: v -> ; mu*v;
  v13: -> r; r0;
  v14: r -> ; fT*muT;
  v2: x -> ; d*x;
  v3: x -> y; r*v*x;  // modifiers: r, v
  v4: y -> ; a*y;
  v5: y -> ; p*y*z;  // modifiers: z
  v6: -> w; c*w*x*y;  // modifiers: y, x
  v7: w -> z; c*q*w*y;  // modifiers: y
  v8: w -> ; b*w;
  v9: z -> ; h*z;
end
