// SBML level 2 version 3

model lavrentovich1()

  // Compartments:
  compartment ER = 1; ER is "Endoplasmic Reticulum";  // GO:0005783
  compartment compartment = 1; compartment is "Cytoplasm";  // GO:0005737

  // Species:
  species X in compartment = 0.1; X is "Cytoplasmic Calcium";  // CHEBI:29108 kegg.compound:C00076
  species Y in ER = 1.5; Y is "Calcium in ER";  // CHEBI:29108 kegg.compound:C00076
  species Z in compartment = 0.1; Z is "IP3";  // CHEBI:16595 kegg.compound:C01245

  // Parameters:
  k2 = 0.1 uM;
  k_CaA = 0.15 uM;
  k_CaI = 0.15 uM;
  kdeg = 0.08 sec_1;
  kf = 0.5 sec_1;
  kip3 = 0.1 uM;
  kout = 0.5 sec_1;
  kp = 0.3 uM;
  m = 2.2 dimensionless;
  n = 2.02 dimensionless;
  vM2 = 15 uM_sec_1;
  vM3 = 40 sec_1;
  vin = 0.05 uM_sec_1;
  vp = 0.05 uM_sec_1;

  // Assignment rules:
  observable_task0_model0_lavrentovich1_X := X;

  // Reactions:
  R1: => X; compartment*vin; R1 is "vin";  // isVersionOf GO:0007204 GO:0006816
  Calcium_export_from_cell: X => ; compartment*kout*X;  // isVersionOf GO:0051481
  CICR: Y => X; ER*4*vM3*k_CaA^n*(X^n/((X^n + k_CaA^n)*(X^n + k_CaI^n)))*(Z^m/(Z^m + kip3^m))*(Y - X);  // modifiers: Z; isVersionOf GO:0048763
  serca: X => Y; compartment*vM2*X^2/(X^2 + k2^2);  // isVersionOf GO:0005388
  Leak_flux: Y => X; ER*kf*(Y - X);  // isVersionOf GO:0022840 GO:0007204
  PLC: => Z; compartment*vp*X^2/(X^2 + kp^2);  // modifiers: X; isVersionOf GO:0004435 GO:0032957
  IP3_degradation: Z => ; compartment*kdeg*Z;

  // Unit definitions:
  unit micro_mole = 1e-6 mole;
  unit uM = 1e-6 mole / litre;
  unit uM_sec_1 = 1e-6 mole / (litre * second);
  unit sec_1 = 1 / second;
end
