// SBML level 2 version 3

model lebeda1()

  // Compartments:
  compartment endosome = 1;  // GO:0031904
  compartment extracellular = 1;  // GO:0005615
  compartment neuroplasm = 1;  // isVersionOf GO:0005829 GO:0043679

  // Species:
  species $BoNT in extracellular; BoNT is "tot_free_BoNT/A";  // kegg.compound:C07946
  species bound in extracellular = 0; bound is "bound_BoNT/A";  // hasPart kegg.compound:C07946
  species bulk in extracellular = 1; bulk is "bulk_BoNT/A";  // kegg.compound:C07946
  species free in extracellular = 0; free is "free_BoNT/A";  // kegg.compound:C07946
  species lytic in neuroplasm = 0; lytic is "lytic_BoNT/A";  // isVersionOf kegg.compound:C07946
  species translocate in endosome = 0; translocate is "transloc_BoNT/A";  // hasPart kegg.compound:C07946

  // Assignment rules:
  BoNT := bulk + free;
  tension := 1 - lytic;
  observable_task0_model0_lebeda1_bound := bound;
  observable_task0_model0_lebeda1_free := free;
  observable_task0_model0_lebeda1_lytic := lytic;
  observable_task0_model0_lebeda1_translocate := translocate;
  observable_task0_model0_lebeda1_tension := tension;

  // Reactions:
  binding: free => bound; kB*free*extracellular;  // isVersionOf reactome:REACT_11084.1
    kB = 0.058;
  bulk_movement: bulk => free; kS*bulk*extracellular;  // isVersionOf GO:0006858
    kS = 0.00015;
  endocytosis: bound => translocate; kT*bound*extracellular;  // isHomologTo reactome:REACT_11086.1
    kT = 0.141;
  translocation: translocate => lytic; kL*translocate*endosome;  // isVersionOf reactome:REACT_11085.1
    kL = 0.013;

  // Unit definitions:
  unit relative_concentration = dimensionless;
  unit normalized_volume = dimensionless;
  unit min = 60 second;
  unit perminute = 1 / (60 second);
end
