// SBML level 2 version 4

function CK_1S_2P_irr_mod(Vmax, S1, KmS1, P1, KmP1, P2, KmP2)
  Vmax*(S1/KmS1)/(S1/KmS1 + (1 + P1/KmP1)*(1 + P2/KmP2));
end

function CK_3S_2P_mod_GAPDH(Vmax, S1, KmS1, S2, KmS2, S3, KmS3, Keq, KmP1, KmP2, P1, P2)
  (Vmax*(S1/KmS1)*(S2/KmS2)*(S3/KmS3) - Vmax/Keq*(KmP1*KmP2/(KmS1*KmS2*KmS3))*(P1/KmP1)*(P2/KmP2))/((1 + S1/KmS1)*(1 + S2/KmS2)*(1 + S3/KmS3) + (1 + P1/KmP1)*(1 + P2/KmP2) - 1);
end

function CK_1S_2P_double_mod_FBA(Vmax, S1, KmS1, Keq, KmP1, P1, P2)
  (Vmax*(S1/KmS1) - Vmax/Keq*(KmP1*KmP1/KmS1)*(P1/KmP1)*(P2/KmP1))/(1 + S1/KmS1 + P1/KmP1 + (P1/KmP1)^2);
end
CK_1S_2P_double_mod_FBA is "CK 1S 2P (double) mod FBA";

function CK_2S_2P_1_double_1Mm_irr_mod(Ki, Ivar, Vmax, S1, KmS1, S2, KmS2, P1, KmP1, P2, KmP2, P3)
  Ki/(Ki + Ivar)*Vmax*(S1/KmS1)*(S2/KmS2)/((1 + S1/KmS1)*(1 + S2/KmS2) + (1 + P1/KmP1)*(1 + P2/KmP2 + (P3/KmP2)^2) - 1);
end
CK_2S_2P_1_double_1Mm_irr_mod is "CK 2S 2P (1 double) 1Mm irr mod";

function CK_mixed_acid_irr_2_mod(Km_trioseP, n, trioseP, Vmax, pyruvate, Km_pyruvate, NADH, Km_NADH, ADP, Km_ADP, , Km_Pi, mixedacid, Km_mixedacid, NAD, Km_NAD, ATP, Km_ATP)
  Km_trioseP^n/(Km_trioseP^n + trioseP^n)*Vmax*(pyruvate/Km_pyruvate)^2*(NADH/Km_NADH)^2*(ADP/Km_ADP)*(pi/Km_Pi)/((1 + pyruvate/Km_pyruvate + (pyruvate/Km_pyruvate)^2)*(1 + NADH/Km_NADH + (NADH/Km_NADH)^2)*(1 + ADP/Km_ADP)*(1 + pi/Km_Pi) + (1 + mixedacid/Km_mixedacid + (mixedacid/Km_mixedacid)^2)*(1 + NAD/Km_NAD + (NAD/Km_NAD)^2)*(1 + ATP/Km_ATP) - 1);
end

function CK_2S_2P_1Mp_1Mm_irr_mod(KmMm, Mm, Mp, KmMp, Vmax, S1, KmS1, S2, KmS2, P1, KmP1, P2, KmP2)
  KmMm/(KmMm + Mm)*(Mp/(KmMp + Mp))*Vmax*(S1/KmS1)*(S2/KmS2)/((1 + S1/KmS1)*(1 + S2/KmS2) + (1 + P1/KmP1)*(1 + P2/KmP2) - 1);
end

function CK_LDH_irr_2_mod(FBP, , Km_FBPPi, Vmax, S1, KmS1, S2, KmS2, P1, KmP1, P2, KmP2)
  FBP/pi/(FBP/pi + Km_FBPPi)*Vmax*(S1/KmS1)*(S2/KmS2)/((1 + S1/KmS1)*(1 + S2/KmS2) + (1 + P1/KmP1)*(1 + P2/KmP2) - 1);
end

function CK_atpase_mod(Vmax, S1, KmS1, n)
  Vmax*(S1/KmS1)^n/(1 + (S1/KmS1)^n);
end

function CK_2S_2P_irr_mod(Vmax, S1, KmS1, S2, KmS2, P1, KmP1, P2, KmP2)
  Vmax*(S1/KmS1)*(S2/KmS2)/((1 + S1/KmS1)*(1 + S2/KmS2) + (1 + P1/KmP1)*(1 + P2/KmP2) - 1);
end

function CK_2S_2P_1Mp_1Mm_PYK_mod(KmMm, n, Mm, Mp, KmMp, Vmax, S1, KmS1, S2, KmS2, P1, KmP1, P2, KmP2)
  KmMm^n/(KmMm^n + Mm^n)*(Mp/(KmMp + Mp))*Vmax*(S1/KmS1)*(S2/KmS2)/((1 + S1/KmS1)*(1 + S2/KmS2) + (1 + P1/KmP1)*(1 + P2/KmP2) - 1);
end

function CK_2S_2P_mod_ENO(Vmax, S1, KmS1, S2, KmS2, Keq, KmP1, KmP2, P1, P2)
  (Vmax*(S1/KmS1)*(S2/KmS2) - Vmax/Keq*(KmP1*KmP2/(KmS1*KmS2))*(P1/KmP1)*(P2/KmP2))/((1 + S1/KmS1)*(1 + S2/KmS2) + (1 + P1/KmP1)*(1 + P2/KmP2) - 1);
end

model levering1()

  // Compartments:
  compartment Intracellular = 0.029;
  compartment Extracellular = 1;

  // Species:
  species G6P in Intracellular = 0.15;
  species NAD in Intracellular = 0.2949807;
  species NADH in Intracellular = 0;
  species lactate in Extracellular = 0.1295121;
  species Pi_extra in Extracellular = 50;
  species mixed_acids in Extracellular = 0;
  species Glucose in Extracellular = 5.5;
  species FBP in Intracellular = 1.07;
  species triose_P in Intracellular = 0; triose_P is "triose-P";
  species BPG in Intracellular = 0;
  species PEP_pool in Intracellular = 1.810591e-6;
  species pyruvate in Intracellular = 0;
  species Pi_intra in Intracellular = 20.01192;
  species ADP in Intracellular = 7.17602;
  species ATP in Intracellular = 0.41;

  // Assignment rules:
  observable_task0_model0_levering1_species_15 := Glucose;
  observable_task0_model0_levering1_species_2 := FBP;
  observable_plot5_species_12_datagen1 := task0_model0_levering1_species_12;
  observable_task0_model0_levering1_species_9 := ATP;
  observable_plot2_species_1_datagen1 := task0_model0_levering1_species_1;
  observable_plot4_species_9_datagen1 := task1_model1_levering1_species_9;
  observable_task1_model1_levering1_species_12 := lactate;
  observable_plot1_species_15_datagen1 := task1_model1_levering1_species_15;
  observable_plot3_species_2_datagen1 := task1_model1_levering1_species_2;
  observable_task1_model1_levering1_species_1 := G6P;

  // Reactions:
  pfk: G6P + ATP => FBP + ADP; Intracellular*CK_2S_2P_irr_mod(pfk_Vmax, G6P, pfk_KmS1, ATP, pfk_KmS2, FBP, pfk_KmP1, ADP, pfk_KmP2);
    pfk_Vmax = 20.1788; pfk_KmS1 = 0.435043; pfk_KmS2 = 1.24214; pfk_KmP1 = 57.9978; pfk_KmP2 = 0.0300039;
  pfl: 2 pyruvate + 2 NADH + ADP + Pi_intra => 2 mixed_acids + 2 NAD + ATP; CK_mixed_acid_irr_2_mod(Km_trioseP, pfl_n, triose_P, pfl_Vmax, pyruvate, Km_pyruvate, NADH, Km_NADH, ADP, Km_ADP, Pi_intra, Km_Pi, mixed_acids, Km_mixedacid, NAD, Km_NAD, ATP, Km_ATP);  // modifiers: triose_P
    Km_trioseP = 0.000636807; pfl_n = 3; pfl_Vmax = 1.98963; Km_pyruvate = 0.512794; Km_NADH = 0.595578; Km_ADP = 0.0010005; Km_Pi = 98.5706; Km_mixedacid = 34.4637; Km_NAD = 0.0366518; Km_ATP = 97.0156;
  pts: Glucose + PEP_pool => G6P + pyruvate; CK_2S_2P_1Mp_1Mm_irr_mod(pts_KmMm, FBP, Pi_intra, pts_KmMp, pts_Vmax, Glucose, pts_KmS1, PEP_pool, pts_KmS2, G6P, pts_KmP1, pyruvate, pts_KmP2);  // modifiers: FBP, Pi_intra
    pts_KmMm = 30.1418; pts_KmMp = 1.0273; pts_Vmax = 0.22786; pts_KmS1 = 0.149998; pts_KmS2 = 0.0215991; pts_KmP1 = 99.0911; pts_KmP2 = 67.0551;
  fba: FBP -> 2 triose_P; Intracellular*CK_1S_2P_double_mod_FBA(fba_Vmax, FBP, fba_KmS1, fba_Keq, fba_KmP1, triose_P, triose_P);
    fba_Keq = 0.056; fba_KmP1 = 17.6344; fba_Vmax = 2.64502; fba_KmS1 = 1.69961;
  fbp: FBP => G6P + Pi_intra; Intracellular*CK_1S_2P_irr_mod(fbp_Vmax, FBP, fbp_KmS1, G6P, fbp_KmP1, Pi_intra, fbp_KmP2);
    fbp_Vmax = 183.348; fbp_KmS1 = 48.7658; fbp_KmP1 = 0.0147529; fbp_KmP2 = 10.8927;
  gapdh: triose_P + NAD + Pi_intra -> BPG + NADH; Intracellular*CK_3S_2P_mod_GAPDH(gapdh_Vmax, triose_P, gapdh_KmS1, NAD, gapdh_KmS2, Pi_intra, KmS3, gapdh_Keq, gapdh_KmP1, gapdh_KmP2, BPG, NADH);
    gapdh_Vmax = 37.1894; gapdh_KmS1 = 0.080501; gapdh_KmS2 = 1.71631; KmS3 = 2.01006; gapdh_Keq = 0.0007; gapdh_KmP1 = 0.00500025; gapdh_KmP2 = 0.0565221;
  eno: BPG + ADP -> PEP_pool + ATP; Intracellular*CK_2S_2P_mod_ENO(eno_Vmax, BPG, eno_KmS1, ADP, eno_KmS2, eno_Keq, eno_KmP1, eno_KmP2, PEP_pool, ATP);
    eno_Vmax = 5.96394; eno_KmS1 = 0.0184256; eno_KmS2 = 0.02; eno_Keq = 27.55; eno_KmP1 = 0.0598516; eno_KmP2 = 1.71656;
  pyk: PEP_pool + ADP => pyruvate + ATP; Intracellular*CK_2S_2P_1Mp_1Mm_PYK_mod(pyk_KmMm, pyk_n, Pi_intra, FBP, pyk_KmMp, pyk_Vmax, PEP_pool, pyk_KmS1, ADP, pyk_KmS2, pyruvate, pyk_KmP1, ATP, pyk_KmP2);  // modifiers: Pi_intra, FBP
    pyk_KmMm = 12.3101; pyk_n = 3; pyk_KmMp = 0.732078; pyk_Vmax = 28.4132; pyk_KmS1 = 0.0957467; pyk_KmS2 = 8.06159; pyk_KmP1 = 80.2894; pyk_KmP2 = 13.267;
  ldh: pyruvate + NADH => lactate + NAD; CK_LDH_irr_2_mod(FBP, Pi_intra, Km_FBPPi, ldh_Vmax, pyruvate, ldh_KmS1, NADH, ldh_KmS2, lactate, ldh_KmP1, NAD, ldh_KmP2);  // modifiers: FBP, Pi_intra
    Km_FBPPi = 0.00020138; ldh_Vmax = 996.558; ldh_KmS1 = 0.664325; ldh_KmS2 = 0.020014; ldh_KmP1 = 99.8592; ldh_KmP2 = 21.7749;
  atpase: ATP => ADP + Pi_intra; Intracellular*CK_atpase_mod(atpase_Vmax, ATP, atpase_KmS1, atpase_n);
    atpase_Vmax = 18.8352; atpase_KmS1 = 4.65629; atpase_n = 3;
  Pi_transport: Pi_extra + ATP => 2 Pi_intra + ADP; CK_2S_2P_1_double_1Mm_irr_mod(Ki, Pi_intra, Pi_transport_Vmax, Pi_extra, Pi_transport_KmS1, ATP, Pi_transport_KmS2, ADP, Pi_transport_KmP1, Pi_intra, Pi_transport_KmP2, Pi_intra);
    Ki = 0.885733; Pi_transport_Vmax = 1.91757; Pi_transport_KmS1 = 8.91361; Pi_transport_KmS2 = 5.84632; Pi_transport_KmP1 = 90.6089; Pi_transport_KmP2 = 0.205858;

  // Unit definitions:
  unit substance = 1e-3 mole;
end
