// SBML level 2 version 4

function LD(tod, length)
  ceil(sin(pi*tod/length + 0.001)/2);
end

model locke1()

  // Compartments:
  compartment compartment = 1;  // GO:0005623

  // Species:
  species cLc in compartment = 0.015; cLc is "LHY protein in cytoplasm";  // uniprot:O81713
  species cLm in compartment = 0.539; cLm is "LHY mRNA";  // isVersionOf CHEBI:33699 kegg.compound:C00046
  species cLn in compartment = 0.0855; cLn is "LHY protein in nucleus";  // uniprot:O81713
  species cPn in compartment = 0.835; cPn is "light sensitive protein P";
  species cTc in compartment = 8.7; cTc is "TOC1 protein in cytoplasm";  // uniprot:Q9LKL2
  species cTm in compartment = 0.456; cTm is "TOC1 mRNA";  // isVersionOf CHEBI:33699 kegg.compound:C00046
  species cTn in compartment = 0.4; cTn is "TOC1 protein in nucleus";  // uniprot:Q9LKL2
  species cXc in compartment = 1.34; cXc is "X protein in cytoplasm";
  species cXm in compartment = 0.08; cXm is "X mRNA";  // isVersionOf CHEBI:33699 kegg.compound:C00046
  species cXn in compartment = 0.4; cXn is "X protein in nucleus";  // isVersionOf GO:0005667
  species cYc in compartment = 0.004; cYc is "Y protein in cytoplasm";
  species cYm in compartment = 0.037; cYm is "Y mRNA";  // isVersionOf CHEBI:33699 kegg.compound:C00046
  species cYn in compartment = 0.013; cYn is "Y protein in nucleus";  // isVersionOf GO:0005667

  // Parameters:
  CP = 24;
  Lmax = 1;
  Lmin = 0;
  a = 3.3064;
  b = 1.0258;
  c = 1.0258;
  d = 1.4422;
  dayLength = 12;
  e = 3.6064;
  f = 1.0237;
  g1 = 0.876738488;
  g2 = 0.036805783;
  g3 = 0.26593318;
  g4 = 0.538811228;
  g5 = 1.17803247;
  g6 = 0.064455137;
  k1 = 1.817;
  k10 = 1.7303;
  k11 = 1.8258;
  k12 = 1.8066;
  k13 = 1.2;
  k2 = 1.5644;
  k3 = 1.2765;
  k4 = 2.5734;
  k5 = 2.7454;
  k6 = 0.4033;
  k7 = 6.5585;
  k8 = 0.6632;
  k9 = 17.1111;
  m1 = 1.5283;
  m10 = 0.2179;
  m11 = 3.3442;
  m12 = 4.297;
  m13 = 0.1347;
  m14 = 0.6114;
  m15 = 1.2;
  m2 = 20.44;
  m3 = 3.6888;
  m4 = 3.8231;
  m5 = 0.0013;
  m6 = 3.1741;
  m7 = 0.0492;
  m8 = 4.0424;
  m9 = 10.1132;
  n1 = 5.1694;
  n2 = 3.0087;
  n3 = 0.2431;
  n4 = 0.0857;
  n5 = 0.1649;
  p1 = 0.8295;
  p2 = 4.324;
  p3 = 2.147;
  p4 = 0.2485;
  p5 = 0.5;
  q1 = 2.4514;
  q2 = 2.40178;
  q3 = 1;
  r1 = 16.8363;
  r2 = 0.1687;
  r3 = 0.3166;
  r4 = 2.1509;
  r5 = 1.0352;
  r6 = 3.3017;
  r7 = 2.2123;
  r8 = 0.2002;

  // Assignment rules:
  observable_task0_model0_locke1_cLm := cLm;
  observable_task0_model0_locke1_cTm := cTm;

  // Reactions:
  four12: cLc => ; compartment*(m2*cLc/(k2 + cLc)); four12 is "Cytoplasmic LHY degradation";  // isVersionOf GO:0030163
    four12_Fch_0 = 8;
  four15: cTc => ; compartment*((1 - LD(time, dayLength))*m5 + m6)*(cTc/(k5 + cTc)); four15 is "Cytoplasmic TOC1 degradation";  // isVersionOf GO:0030163
  four18: cXc => ; compartment*(m10*cXc/(k8 + cXc)); four18 is "Cytoplasmic Protein X degradation";  // isVersionOf GO:0030163
  four21: cYc => ; compartment*(m13*cYc/(k11 + cYc)); four21 is "Cytoplasmic Protein Y degradation";  // isVersionOf GO:0030163
  one11: => cLm; compartment*LD(time, dayLength)*q1*cPn; one11 is "LHY transcription by light activation";  // modifiers: cPn; isVersionOf GO:0009642 GO:0006351
  one12: => cLc; compartment*p1*cLm; one12 is "LHY translation";  // modifiers: cLm; isVersionOf GO:0006412
  one13: cLc => cLn; compartment*r1*cLc; one13 is "LHY transport into nucleus";  // isVersionOf GO:0006886
  one14: => cTm; compartment*(n2*cYn^b/(g2^b + cYn^b))*(g3^c/(g3^c + cLn^c)); one14 is "TOC1 transcription";  // modifiers: cYn, cLn; isVersionOf GO:0006351
  one15: => cTc; compartment*p2*cTm; one15 is "TOC1 translation";  // modifiers: cTm; isVersionOf GO:0006412
  one16: cTc => cTn; compartment*r3*cTc; one16 is "TOC1 movement into nucleus";  // isVersionOf GO:0006886
  one17: => cXm; compartment*(n3*cTn^d/(g4^d + cTn^d)); one17 is "Protein X transcription";  // modifiers: cTn; isVersionOf GO:0006351
  one18: => cXc; compartment*p3*cXm; one18 is "Protein X translation";  // modifiers: cXm; isVersionOf GO:0006412
  one19: cXc => cXn; compartment*r5*cXc; one19 is "Protein X movement into nucleus";  // isVersionOf GO:0006886
  one20: => cYm; compartment*(LD(time, dayLength)*q2*cPn + (LD(time, dayLength)*n4 + n5)*g5^e/(g5^e + cTn^e))*(g6^f/(g6^f + cLn^f)); one20 is "Protein Y transcription";  // modifiers: cPn, cTn, cLn; isVersionOf GO:0006351
  one21: => cYc; compartment*p4*cYm; one21 is "Protein Y translation";  // modifiers: cYm; isVersionOf GO:0006412
  one22: cYc => cYn; compartment*r7*cYc; one22 is "Protein Y into nucleus";  // isVersionOf GO:0006886
  one23: => cPn; compartment*(1 - LD(time, dayLength))*p5; one23 is "Light dependent production of Protein P";  // isVersionOf GO:0009642 GO:0006412
  three11: cLm => ; compartment*(m1*cLm/(k1 + cLm)); three11 is "LHY mRNA degradation";  // isVersionOf GO:0006402
  three12: cLn => cLc; compartment*r2*cLn; three12 is "LHY transport out of nucleus";  // isVersionOf GO:0006886
  three13: cLn => ; compartment*(m3*cLn/(k3 + cLn)); three13 is "Nuclear LHY degradation";  // isVersionOf GO:0030163
  three15: cTn => cTc; compartment*r4*cTn; three15 is "TOC1 transport out of nucleus";  // isVersionOf GO:0006886
  three16: cTn => ; compartment*((1 - LD(time, dayLength))*m7 + m8)*(cTn/(k6 + cTn)); three16 is "Nuclear TOC1 degradation";  // isVersionOf GO:0030163
  three18: cXn => cXc; compartment*r6*cXn; three18 is "ProteinX movement out of nucleus";  // isVersionOf GO:0006886
  three19: cXn => ; compartment*(m11*cXn/(k9 + cXn)); three19 is "Nuclear Protein X degradation";  // isVersionOf GO:0030163
  three21: cYn => cYc; compartment*r8*cYn; three21 is "Protein Y out of nucleus";  // isVersionOf GO:0006886
  three22: cYn => ; compartment*(m14*cYn/(k12 + cYn)); three22 is "Nuclear Protein Y degradation";  // isVersionOf GO:0030163
  three23: cPn => ; compartment*q3*LD(time, dayLength)*cPn; three23 is "Light activated Protein P degradation";  // isVersionOf GO:0045732 GO:0009642
  two11: => cLm; compartment*(n1*cXn^a/(g1^a + cXn^a)); two11 is "Light independent LHY transcription";  // modifiers: cXn; isVersionOf GO:0006351
    two11_Fch_0 = 8;
  two14: cTm => ; compartment*(m4*cTm/(k4 + cTm)); two14 is "TOC mRNA degradation";  // isVersionOf GO:0006402
  two17: cXm => ; compartment*(m9*cXm/(k7 + cXm)); two17 is "Protein X degradation";  // isVersionOf GO:0006402
  two20: cYm => ; compartment*(m12*cYm/(k10 + cYm)); two20 is "Protein Y mRNA degradation";  // isVersionOf GO:0006402
  two23: cPn => ; compartment*(m15*cPn/(k13 + cPn)); two23 is "Protein P degradation";  // isVersionOf GO:0030163

  // Unit definitions:
  unit nM_default = 1e-9 mole; nM_default is "nM (default)";
  unit hour_default = 3600 second; hour_default is "hour (default)";
end
