// SBML level 3 version 1

model maher1()

  // Compartments:
  compartment default = 1;

  // Species:
  species $XX in default = 0;
  species amp in default = 1e-6;
  species ampE in default = 1e-6;
  species arg in default = 1e-6;
  species argE in default = 1e-6;
  species argQ in default = 0;
  species argQE in default = 0;
  species argR in default = 0;
  species argRE in default = 0;
  species as in default = 1e-6;
  species asE in default = 1e-6;
  species asR in default = 0;
  species asRE in default = 0;
  species asp in default = 0.0001;
  species aspE in default = 0.0001;
  species $asppool in default = 0.001;
  species atp in default = 0.0015;
  species atpE in default = 0.0015;
  species $atppool in default = 0.002;
  species cit in default = 1e-6;
  species citE in default = 1e-6;
  species citR in default = 0;
  species citRE in default = 0;
  species citims in default = 1e-6;
  species citimsR in default = 0;
  species citmat in default = 1e-6;
  species citmatR in default = 0;
  species cp in default = 1e-5;
  species cpR in default = 0;
  species cpe in default = 1e-5;
  species cpeE in default = 0.0005;
  species cpeR in default = 0;
  species cpeRE in default = 2.26667e-6;
  species cpims in default = 1e-5;
  species cpimsR in default = 0;
  species $cppool in default = 0.015;
  species fum in default = 1e-6;
  species fumE in default = 1e-6;
  species orn in default = 0.0002;
  species ornE in default = 0.0002;
  species ornims in default = 0.00045;
  species ornmat in default = 1e-6;
  species pi in default = 0.0001;
  species ppi in default = 1e-6;
  species ppiE in default = 1e-6;
  species ure in default = 1e-6;
  species ureE in default = 1e-6;
  species ureR in default = 0;
  species ureRE in default = 0;

  // Parameters:
  Kiarg = 0.0007;
  ampfinal = 5e-5;
  argfac = 1;
  aslAdj = 1;
  assAdj = 2;
  cellV = 3.868e-5;
  cytV = 2.47552e-5;
  e10 = 1.49288e-5;
  e20 = 6.25e-6;
  e30 = 3.4375e-6;
  e40 = 1.20984e-5;
  e40E = 2.28177e-8;
  eV = 0.00196132;
  fm = 1;
  fmE = 1;
  fumfinal = 1e-5;
  imsV = 4.09389e-6;
  k10e2 = 640000;
  k11e2 = 50;
  k12e2 = 170000;
  k1e1 = 17000000;
  k1e2 = 240000;
  k1e3 = 2700000;
  k1e4 = 10000000;
  k2e1 = 63;
  k2e2 = 2.3;
  k2e3 = 70;
  k2e4 = 54000;
  k3e1 = 2100000;
  k3e2 = 350000;
  k3e3 = 75;
  k3e4 = 5300;
  k4e1 = 1000;
  k4e2 = 10;
  k4e3 = 1500000;
  k4e4 = 30000;
  k5e1 = 3000;
  k5e2 = 480000;
  k5e3 = 1100;
  k5e4 = 10000000;
  k6e1 = 90000;
  k6e2 = 10;
  k6e3 = 700000;
  k7e1 = 2600;
  k7e2 = 20;
  k8e1 = 500000;
  k8e2 = 890000;
  k9e2 = 50;
  kamp = 0.00630208;
  kampCE = 10000000;
  kampCEREV = 126217;
  kargCE = 10000000;
  kargCEREV = 126217;
  kargQCE = 10000000;
  kargQCEREV = 126217;
  kargRCE = 10000000;
  kargRCEREV = 126217;
  kasCE = 10000000;
  kasCEREV = 126217;
  kasRCE = 10000000;
  kasRCEREV = 126217;
  kasp = 0.000315104;
  kaspCE = 10000000;
  kaspCEREV = 126217;
  katp = 0.000157552;
  katpCE = 10000000;
  katpCEREV = 126217;
  kcitCE = 10000000;
  kcitCEREV = 126217;
  kcitRCE = 10000000;
  kcitRCEREV = 126217;
  kcitci = 10000;
  kcitic = 60468.6;
  kcitim = 100;
  kcitmi = 60.7717;
  kcp = 2.65143e-7;
  kcpeCE = 10000000;
  kcpeCEREV = 126217;
  kcpeRCE = 10000000;
  kcpeRCEREV = 126217;
  kcpei = 10000;
  kcpie = 60468.6;
  kcpim = 0.822751;
  kcpmi = 0.5;
  kfum = 0.0315104;
  kfumCE = 10000000;
  kfumCEREV = 126217;
  kornCE = 10000000;
  kornCEREV = 126217;
  kornci = 10000;
  kornic = 60468.6;
  kornim = 110;
  kornmi = 66.8489;
  kpi = 0.0231588;
  kppi = 0.0315104;
  kppiCE = 10000000;
  kppiCEREV = 126217;
  kure = 0.315104;
  kureCE = 10000000;
  kureCEREV = 126217;
  kureRCE = 10000000;
  kureRCEREV = 126217;
  matV = 6.73651e-6;
  mitoV = 1.08304e-5;
  nucV = 3.0944e-6;
  otcAdj = 1;
  pifinal = 5e-5;
  ppifinal = 1e-5;
  sampleV = 0.002;
  steadyStateUreaProdn = 7.80047e-12;
  urefinal = 1e-6;

  // Assignment rules:
  observable_task1_model1_maher1_cit := 1000*cit;
  observable_task1_model1_maher1_ure := 1000*ure;
  observable_task1_model1_maher1_as := 1000*as;
  observable_task1_model1_maher1_arg := 1000*arg;
  observable_task1_model1_maher1_orn := 1000*orn;

  // Reactions:
  v_1: 148445 ornmat + 148445 cp -> 148445 pi + 148445 citmat; otcAdj*k1e1*k3e1*k5e1*k7e1*cp*ornmat*e10/(k2e1*k7e1*(k4e1 + k5e1) + k1e1*k7e1*(k4e1 + k5e1)*(cp + cpR) + k2e1*k8e1*(k4e1 + k5e1)*pi + k3e1*k5e1*k7e1*ornmat + k2e1*k4e1*k6e1*(citmat + citmatR) + k1e1*k3e1*(k5e1 + k7e1)*(cp + cpR)*ornmat + k6e1*k8e1*(k2e1 + k4e1)*pi*(citmat + citmatR) + k1e1*k4e1*k6e1*(cp + cpR)*(citmat + citmatR) + k1e1*k3e1*k6e1*(cp + cpR)*ornmat*(citmat + citmatR) + k3e1*k5e1*k8e1*ornmat*pi + k3e1*k6e1*k8e1*ornmat*pi*(citmat + citmatR))*matV - otcAdj*k2e1*k4e1*k6e1*k8e1*citmat*pi*e10/(k2e1*k7e1*(k4e1 + k5e1) + k1e1*k7e1*(k4e1 + k5e1)*(cp + cpR) + k2e1*k8e1*(k4e1 + k5e1)*pi + k3e1*k5e1*k7e1*ornmat + k2e1*k4e1*k6e1*(citmat + citmatR) + k1e1*k3e1*(k5e1 + k7e1)*(cp + cpR)*ornmat + k6e1*k8e1*(k2e1 + k4e1)*pi*(citmat + citmatR) + k1e1*k4e1*k6e1*(cp + cpR)*(citmat + citmatR) + k1e1*k3e1*k6e1*(cp + cpR)*ornmat*(citmat + citmatR) + k3e1*k5e1*k8e1*ornmat*pi + k3e1*k6e1*k8e1*ornmat*pi*(citmat + citmatR))*matV;  // modifiers: citmatR, cpR
  v_10: 40395.6 asR -> 40395.6 fum + 40395.6 argR; aslAdj*k1e3*k3e3*k5e3*asR*e30/(k5e3*(k2e3 + k3e3) + (as + asR)*k1e3*(k3e3 + k5e3) + fum*k2e3*k4e3 + (arg + argR + fm*argQ)*k6e3*(k2e3 + k3e3) + fum*(arg + argR + fm*argQ)*k4e3*k6e3 + (as + asR + fm*argQ)*fum*k1e3*k4e3)*cytV - aslAdj*k2e3*k4e3*k6e3*fum*argR*e30/(k5e3*(k2e3 + k3e3) + (as + asR)*k1e3*(k3e3 + k5e3) + fum*k2e3*k4e3 + (arg + argR + fm*argQ)*k6e3*(k2e3 + k3e3) + fum*(arg + argR + fm*argQ)*k4e3*k6e3 + (as + asR + fm*argQ)*fum*k1e3*k4e3)*cytV;  // modifiers: argQ, as, arg
  v_11: 40395.6 arg -> 40395.6 ure + 40395.6 orn; argfac*k1e4*k3e4*k4e4*arg*e40/(k4e4*(k2e4 + k3e4) + k5e4*(k2e4 + k3e4)*orn + k1e4*(k3e4 + k4e4)*(arg + argR + fm*argQ))*cytV;  // modifiers: argR, argQ
  v_12: 40395.6 argR -> 40395.6 ureR + 40395.6 orn; argfac*k1e4*k3e4*k4e4*argR*e40/(k4e4*(k2e4 + k3e4) + k5e4*(k2e4 + k3e4)*orn + k1e4*(k3e4 + k4e4)*(arg + argR + fm*argQ))*cytV;  // modifiers: argQ, arg
  v_13: 40395.6 argQ -> 40395.6 ure + 40395.6 orn; argfac*fm*k1e4*k3e4*k4e4*argQ*e40/(k4e4*(k2e4 + k3e4) + k5e4*(k2e4 + k3e4)*orn + k1e4*(k3e4 + k4e4)*(arg + argR + fm*argQ))*cytV;  // modifiers: argR, arg
  v_14: 509.861 argE -> 509.861 ureE + 509.861 ornE; argfac*k1e4*k3e4*k4e4*argE*e40E/(k4e4*(k2e4 + k3e4) + k5e4*(k2e4 + k3e4)*ornE + k1e4*(k3e4 + k4e4)*(argE + argRE + fmE*argQE))*eV;  // modifiers: argQE, argRE
  v_15: 509.861 argRE -> 509.861 ureRE + 509.861 ornE; argfac*k1e4*k3e4*k4e4*argRE*e40E/(k4e4*(k2e4 + k3e4) + k5e4*(k2e4 + k3e4)*ornE + k1e4*(k3e4 + k4e4)*(argE + argRE + fmE*argQE))*eV;  // modifiers: argQE, argE
  v_16: 509.861 argQE -> 509.861 ureE + 509.861 ornE; argfac*fm*k1e4*k3e4*k4e4*argQE*e40E/(k4e4*(k2e4 + k3e4) + k5e4*(k2e4 + k3e4)*ornE + k1e4*(k3e4 + k4e4)*(argE + argRE + fmE*argQE))*eV;  // modifiers: argRE, argE
  v_17: 40395.6 orn -> 244266 ornims; kornci*orn*cytV - kornic*ornims*imsV;
  v_18: 244266 ornims -> 148445 ornmat; kornim*ornims*imsV - kornmi*ornmat*matV;
  v_19: 509.861 $cppool -> 509.861 cpeE; kcp*cppool*eV;
  v_2: 148445 ornmat + 148445 cpR -> 148445 pi + 148445 citmatR; otcAdj*k1e1*k3e1*k5e1*k7e1*cpR*ornmat*e10/(k2e1*k7e1*(k4e1 + k5e1) + k1e1*k7e1*(k4e1 + k5e1)*(cp + cpR) + k2e1*k8e1*(k4e1 + k5e1)*pi + k3e1*k5e1*k7e1*ornmat + k2e1*k4e1*k6e1*(citmat + citmatR) + k1e1*k3e1*(k5e1 + k7e1)*(cp + cpR)*ornmat + k6e1*k8e1*(k2e1 + k4e1)*pi*(citmat + citmatR) + k1e1*k4e1*k6e1*(cp + cpR)*(citmat + citmatR) + k1e1*k3e1*k6e1*(cp + cpR)*ornmat*(citmat + citmatR) + k3e1*k5e1*k8e1*ornmat*pi + k3e1*k6e1*k8e1*ornmat*pi*(citmat + citmatR))*matV - otcAdj*k2e1*k4e1*k6e1*k8e1*citmatR*pi*e10/(k2e1*k7e1*(k4e1 + k5e1) + k1e1*k7e1*(k4e1 + k5e1)*(cp + cpR) + k2e1*k8e1*(k4e1 + k5e1)*pi + k3e1*k5e1*k7e1*ornmat + k2e1*k4e1*k6e1*(citmat + citmatR) + k1e1*k3e1*(k5e1 + k7e1)*(cp + cpR)*ornmat + k6e1*k8e1*(k2e1 + k4e1)*pi*(citmat + citmatR) + k1e1*k4e1*k6e1*(cp + cpR)*(citmat + citmatR) + k1e1*k3e1*k6e1*(cp + cpR)*ornmat*(citmat + citmatR) + k3e1*k5e1*k8e1*ornmat*pi + k3e1*k6e1*k8e1*ornmat*pi*(citmat + citmatR))*matV;  // modifiers: cp, citmat
  v_20: 40395.6 cpe -> 244266 cpims; kcpei*cpe*cytV - kcpie*cpims*imsV;
  v_21: 244266 cpims -> 148445 cp; kcpim*cpims*imsV - kcpmi*cp*matV;
  v_22: 40395.6 cpeR -> 244266 cpimsR; kcpei*cpeR*cytV - kcpie*cpimsR*imsV;
  v_23: 244266 cpimsR -> 148445 cpR; kcpim*cpimsR*imsV - kcpmi*cpR*matV;
  v_24: 40395.6 $atppool -> 40395.6 atp; katp*atppool*cytV;
  v_25: 40395.6 $asppool -> 40395.6 asp; kasp*asppool*cytV;
  v_26: 40395.6 ppi -> $XX; kppi*ppi*cytV;
  v_27: 40395.6 fum -> $XX; kfum*fum*cytV;
  v_28: 148445 pi -> $XX; kpi*pi*matV;
  v_29: 40395.6 amp -> $XX; kamp*amp*cytV;
  v_3: 148445 citmat -> 244266 citims; kcitmi*citmat*matV - kcitim*citims*imsV;
  v_30: 40395.6 ure -> $XX; kure*ure*cytV;
  v_31: 40395.6 ureR -> $XX; 0*kure*ureR*cytV;
  v_32: 40395.6 cit -> 509.861 citE; kcitCE*cit*cytV - kcitCEREV*citE*eV;
  v_33: 40395.6 citR -> 509.861 citRE; kcitRCE*citR*cytV - kcitRCEREV*citRE*eV;
  v_34: 40395.6 atp -> 509.861 atpE; katpCE*atp*cytV - katpCEREV*atpE*eV;
  v_35: 40395.6 asp -> 509.861 aspE; kaspCE*asp*cytV - kaspCEREV*aspE*eV;
  v_36: 40395.6 amp -> 509.861 ampE; kampCE*amp*cytV - kampCEREV*ampE*eV;
  v_37: 40395.6 ppi -> 509.861 ppiE; kppiCE*ppi*cytV - kppiCEREV*ppiE*eV;
  v_38: 40395.6 as -> 509.861 asE; kasCE*as*cytV - kasCEREV*asE*eV;
  v_39: 40395.6 asR -> 509.861 asRE; kasRCE*asR*cytV - kasRCEREV*asRE*eV;
  v_4: 148445 citmatR -> 244266 citimsR; kcitmi*citmatR*matV - kcitim*citimsR*imsV;
  v_40: 40395.6 fum -> 509.861 fumE; kfumCE*fum*cytV - kfumCEREV*fumE*eV;
  v_41: 40395.6 argQ -> 509.861 argQE; kargQCE*argQ*cytV - kargQCEREV*argQE*eV;
  v_42: 40395.6 arg -> 509.861 argE; kargCE*arg*cytV - kargCEREV*argE*eV;
  v_43: 40395.6 argR -> 509.861 argRE; kargRCE*argR*cytV - kargRCEREV*argRE*eV;
  v_44: 40395.6 ure -> 509.861 ureE; kureCE*ure*cytV - kureCEREV*ureE*eV;
  v_45: 40395.6 ureR -> 509.861 ureRE; kureRCE*ureR*cytV - kureRCEREV*ureRE*eV;
  v_46: 40395.6 orn -> 509.861 ornE; kornCE*orn*cytV - kornCEREV*ornE*eV;
  v_47: 40395.6 cpe -> 509.861 cpeE; kcpeCE*cpe*cytV - kcpeCEREV*cpeE*eV;
  v_48: 40395.6 cpeR -> 509.861 cpeRE; kcpeRCE*cpeR*cytV - kcpeRCEREV*cpeRE*eV;
  v_5: 244266 citims -> 40395.6 cit; kcitic*citims*imsV - kcitci*cit*cytV;
  v_6: 244266 citimsR -> 40395.6 citR; kcitic*citimsR*imsV - kcitci*citR*cytV;
  v_7: 40395.6 cit + 40395.6 atp + 40395.6 asp -> 40395.6 ppi + 40395.6 as + 40395.6 amp; k1e2*k3e2*k5e2*k7e2*k9e2*k11e2*cit*atp*asp*assAdj*e20*(1 + (arg + argR + argQ)/Kiarg)^(-1)/(k2e2*k4e2*k9e2*k11e2*(k6e2 + k7e2) + k1e2*k4e2*k6e2*k8e2*k11e2*(cit + citR)*ppi + k1e2*k4e2*k9e2*k11e2*(k6e2 + k7e2)*(cit + citR) + k2e2*k5e2*k7e2*k9e2*k12e2*asp*(as + asR) + k2e2*k5e2*k7e2*k9e2*k11e2*asp + k1e2*k3e2*k6e2*k8e2*k11e2*(cit + citR)*atp*ppi + k1e2*k3e2*k9e2*k11e2*(k6e2 + k7e2)*(cit + citR)*atp + k1e2*k4e2*k6e2*k8e2*k10e2*(cit + citR)*ppi*amp + k1e2*k5e2*k7e2*k9e2*k11e2*(cit + citR)*asp + k3e2*k5e2*k7e2*k9e2*k12e2*atp*asp*(as + asR) + k3e2*k5e2*k7e2*k9e2*k11e2*atp*asp + k2e2*k5e2*k7e2*k10e2*k12e2*asp*amp*(as + asR) + k1e2*k3e2*k5e2*(k7e2*k9e2 + k7e2*k11e2 + k9e2*k11e2)*(cit + citR)*atp*asp + k1e2*k3e2*k5e2*k8e2*k11e2*(cit + citR)*atp*asp*ppi + k2e2*k4e2*k6e2*k8e2*k11e2*ppi + k1e2*k3e2*k5e2*k7e2*k10e2*(cit + citR)*atp*asp*amp + k2e2*k4e2*k9e2*k12e2*(k6e2 + k7e2)*(as + asR) + k1e2*k3e2*k6e2*k8e2*k10e2*(cit + citR)*atp*ppi*amp + k2e2*k4e2*k6e2*k8e2*k10e2*ppi*amp + k3e2*k5e2*k7e2*k10e2*k12e2*atp*asp*amp*(as + asR) + k2e2*k4e2*k6e2*k8e2*k12e2*ppi*(as + asR) + k3e2*k6e2*k8e2*k10e2*k12e2*atp*ppi*amp*(as + asR) + k2e2*k4e2*k10e2*k12e2*(k6e2 + k7e2)*amp*(as + asR) + k2e2*k5e2*k8e2*k10e2*k12e2*asp*ppi*amp*(as + asR) + k8e2*k10e2*k12e2*(k2e2*k4e2 + k2e2*k6e2 + k4e2*k6e2)*ppi*amp*(as + asR) + k1e2*k3e2*k5e2*k8e2*k10e2*(cit + citR)*atp*asp*ppi*amp + k3e2*k5e2*k8e2*k10e2*k12e2*atp*asp*ppi*amp*(as + asR))*cytV - k2e2*k4e2*k6e2*k8e2*k10e2*k12e2*ppi*amp*as*assAdj*e20*(1 + (arg + argR + argQ)/Kiarg)^(-1)/(k2e2*k4e2*k9e2*k11e2*(k6e2 + k7e2) + k1e2*k4e2*k6e2*k8e2*k11e2*(cit + citR)*ppi + k1e2*k4e2*k9e2*k11e2*(k6e2 + k7e2)*(cit + citR) + k2e2*k5e2*k7e2*k9e2*k12e2*asp*(as + asR) + k2e2*k5e2*k7e2*k9e2*k11e2*asp + k1e2*k3e2*k6e2*k8e2*k11e2*(cit + citR)*atp*ppi + k1e2*k3e2*k9e2*k11e2*(k6e2 + k7e2)*(cit + citR)*atp + k1e2*k4e2*k6e2*k8e2*k10e2*(cit + citR)*ppi*amp + k1e2*k5e2*k7e2*k9e2*k11e2*(cit + citR)*asp + k3e2*k5e2*k7e2*k9e2*k12e2*atp*asp*(as + asR) + k3e2*k5e2*k7e2*k9e2*k11e2*atp*asp + k2e2*k5e2*k7e2*k10e2*k12e2*asp*amp*(as + asR) + k1e2*k3e2*k5e2*(k7e2*k9e2 + k7e2*k11e2 + k9e2*k11e2)*(cit + citR)*atp*asp + k1e2*k3e2*k5e2*k8e2*k11e2*(cit + citR)*atp*asp*ppi + k2e2*k4e2*k6e2*k8e2*k11e2*ppi + k1e2*k3e2*k5e2*k7e2*k10e2*(cit + citR)*atp*asp*amp + k2e2*k4e2*k9e2*k12e2*(k6e2 + k7e2)*(as + asR) + k1e2*k3e2*k6e2*k8e2*k10e2*(cit + citR)*atp*ppi*amp + k2e2*k4e2*k6e2*k8e2*k10e2*ppi*amp + k3e2*k5e2*k7e2*k10e2*k12e2*atp*asp*amp*(as + asR) + k2e2*k4e2*k6e2*k8e2*k12e2*ppi*(as + asR) + k3e2*k6e2*k8e2*k10e2*k12e2*atp*ppi*amp*(as + asR) + k2e2*k4e2*k10e2*k12e2*(k6e2 + k7e2)*amp*(as + asR) + k2e2*k5e2*k8e2*k10e2*k12e2*asp*ppi*amp*(as + asR) + k8e2*k10e2*k12e2*(k2e2*k4e2 + k2e2*k6e2 + k4e2*k6e2)*ppi*amp*(as + asR) + k1e2*k3e2*k5e2*k8e2*k10e2*(cit + citR)*atp*asp*ppi*amp + k3e2*k5e2*k8e2*k10e2*k12e2*atp*asp*ppi*amp*(as + asR))*cytV;  // modifiers: asR, citR, argQ, argR, arg
  v_8: 40395.6 citR + 40395.6 atp + 40395.6 asp -> 40395.6 ppi + 40395.6 asR + 40395.6 amp; k1e2*k3e2*k5e2*k7e2*k9e2*k11e2*citR*atp*asp*assAdj*e20*(1 + (arg + argR + argQ)/Kiarg)^(-1)/(k2e2*k4e2*k9e2*k11e2*(k6e2 + k7e2) + k1e2*k4e2*k6e2*k8e2*k11e2*(cit + citR)*ppi + k1e2*k4e2*k9e2*k11e2*(k6e2 + k7e2)*(cit + citR) + k2e2*k5e2*k7e2*k9e2*k12e2*asp*(as + asR) + k2e2*k5e2*k7e2*k9e2*k11e2*asp + k1e2*k3e2*k6e2*k8e2*k11e2*(cit + citR)*atp*ppi + k1e2*k3e2*k9e2*k11e2*(k6e2 + k7e2)*(cit + citR)*atp + k1e2*k4e2*k6e2*k8e2*k10e2*(cit + citR)*ppi*amp + k1e2*k5e2*k7e2*k9e2*k11e2*(cit + citR)*asp + k3e2*k5e2*k7e2*k9e2*k12e2*atp*asp*(as + asR) + k3e2*k5e2*k7e2*k9e2*k11e2*atp*asp + k2e2*k5e2*k7e2*k10e2*k12e2*asp*amp*(as + asR) + k1e2*k3e2*k5e2*(k7e2*k9e2 + k7e2*k11e2 + k9e2*k11e2)*(cit + citR)*atp*asp + k1e2*k3e2*k5e2*k8e2*k11e2*(cit + citR)*atp*asp*ppi + k2e2*k4e2*k6e2*k8e2*k11e2*ppi + k1e2*k3e2*k5e2*k7e2*k10e2*(cit + citR)*atp*asp*amp + k2e2*k4e2*k9e2*k12e2*(k6e2 + k7e2)*(as + asR) + k1e2*k3e2*k6e2*k8e2*k10e2*(cit + citR)*atp*ppi*amp + k2e2*k4e2*k6e2*k8e2*k10e2*ppi*amp + k3e2*k5e2*k7e2*k10e2*k12e2*atp*asp*amp*(as + asR) + k2e2*k4e2*k6e2*k8e2*k12e2*ppi*(as + asR) + k3e2*k6e2*k8e2*k10e2*k12e2*atp*ppi*amp*(as + asR) + k2e2*k4e2*k10e2*k12e2*(k6e2 + k7e2)*amp*(as + asR) + k2e2*k5e2*k8e2*k10e2*k12e2*asp*ppi*amp*(as + asR) + k8e2*k10e2*k12e2*(k2e2*k4e2 + k2e2*k6e2 + k4e2*k6e2)*ppi*amp*(as + asR) + k1e2*k3e2*k5e2*k8e2*k10e2*(cit + citR)*atp*asp*ppi*amp + k3e2*k5e2*k8e2*k10e2*k12e2*atp*asp*ppi*amp*(as + asR))*cytV - k2e2*k4e2*k6e2*k8e2*k10e2*k12e2*ppi*amp*asR*assAdj*e20*(1 + (arg + argR + argQ)/Kiarg)^(-1)/(k2e2*k4e2*k9e2*k11e2*(k6e2 + k7e2) + k1e2*k4e2*k6e2*k8e2*k11e2*(cit + citR)*ppi + k1e2*k4e2*k9e2*k11e2*(k6e2 + k7e2)*(cit + citR) + k2e2*k5e2*k7e2*k9e2*k12e2*asp*(as + asR) + k2e2*k5e2*k7e2*k9e2*k11e2*asp + k1e2*k3e2*k6e2*k8e2*k11e2*(cit + citR)*atp*ppi + k1e2*k3e2*k9e2*k11e2*(k6e2 + k7e2)*(cit + citR)*atp + k1e2*k4e2*k6e2*k8e2*k10e2*(cit + citR)*ppi*amp + k1e2*k5e2*k7e2*k9e2*k11e2*(cit + citR)*asp + k3e2*k5e2*k7e2*k9e2*k12e2*atp*asp*(as + asR) + k3e2*k5e2*k7e2*k9e2*k11e2*atp*asp + k2e2*k5e2*k7e2*k10e2*k12e2*asp*amp*(as + asR) + k1e2*k3e2*k5e2*(k7e2*k9e2 + k7e2*k11e2 + k9e2*k11e2)*(cit + citR)*atp*asp + k1e2*k3e2*k5e2*k8e2*k11e2*(cit + citR)*atp*asp*ppi + k2e2*k4e2*k6e2*k8e2*k11e2*ppi + k1e2*k3e2*k5e2*k7e2*k10e2*(cit + citR)*atp*asp*amp + k2e2*k4e2*k9e2*k12e2*(k6e2 + k7e2)*(as + asR) + k1e2*k3e2*k6e2*k8e2*k10e2*(cit + citR)*atp*ppi*amp + k2e2*k4e2*k6e2*k8e2*k10e2*ppi*amp + k3e2*k5e2*k7e2*k10e2*k12e2*atp*asp*amp*(as + asR) + k2e2*k4e2*k6e2*k8e2*k12e2*ppi*(as + asR) + k3e2*k6e2*k8e2*k10e2*k12e2*atp*ppi*amp*(as + asR) + k2e2*k4e2*k10e2*k12e2*(k6e2 + k7e2)*amp*(as + asR) + k2e2*k5e2*k8e2*k10e2*k12e2*asp*ppi*amp*(as + asR) + k8e2*k10e2*k12e2*(k2e2*k4e2 + k2e2*k6e2 + k4e2*k6e2)*ppi*amp*(as + asR) + k1e2*k3e2*k5e2*k8e2*k10e2*(cit + citR)*atp*asp*ppi*amp + k3e2*k5e2*k8e2*k10e2*k12e2*atp*asp*ppi*amp*(as + asR))*cytV;  // modifiers: argR, argQ, as, cit, arg
  v_9: 40395.6 as -> 40395.6 fum + 40395.6 arg; aslAdj*k1e3*k3e3*k5e3*as*e30/(k5e3*(k2e3 + k3e3) + (as + asR)*k1e3*(k3e3 + k5e3) + fum*k2e3*k4e3 + (arg + argR + fm*argQ)*k6e3*(k2e3 + k3e3) + fum*(arg + argR + fm*argQ)*k4e3*k6e3 + (as + asR + fm*argQ)*fum*k1e3*k4e3)*cytV - aslAdj*k2e3*k4e3*k6e3*fum*arg*e30/(k5e3*(k2e3 + k3e3) + (as + asR)*k1e3*(k3e3 + k5e3) + fum*k2e3*k4e3 + (arg + argR + fm*argQ)*k6e3*(k2e3 + k3e3) + fum*(arg + argR + fm*argQ)*k4e3*k6e3 + (as + asR + fm*argQ)*fum*k1e3*k4e3)*cytV;  // modifiers: asR, argQ, argR
end
