// SBML level 3 version 1

model martins2()
  // model units - substance: mole, time: second, extent: mole

  // Compartments:
  compartment compartment = 1 litre;

  // Species:
  substanceOnly species PsbA1 in compartment = 0;
  substanceOnly species PsbA1mut in compartment = 0;
  substanceOnly species SigC in compartment = 0;
  substanceOnly species SigC_a in compartment = 0;
  species SigCtot in compartment;

  // Parameters:
  A = 1;
  K_theta_p = 0.1;
  K_theta_s = 0.9;
  Ksp = 2.5;
  Kss = 1.4;
  Tc = 24;
  Td = 19.5;
  Ts = 6;
  Ty = 5.6;
  Vp = 0.2;
  Vs = 3.7;
  bas = 0;
  delcc = 1;
  delcp = 1;
  h_theta_p = 2;
  h_theta_s = 5;
  hsp = 5;
  hss = 2;
  kb = 0.1;
  kf = 10;
  m = 1;

  // Assignment rules:
  theta := bas + (A - bas)*(1/2*(1 + cos(2*pi*time/Tc)))^m;
  SigCtot := SigC + SigC_a;
  observable_task0_model0_sigcpsba_PsbA1_0 := PsbA1;
  observable_task0_model0_sigcpsba_PsbA1mut := PsbA1mut;
  observable_plot2_PsbA1_datagen1 := task0_model0_sigcpsba_PsbA1;
  observable_plot1_PsbA1_datagen1 := task1_model1_sigcpsba_PsbA1;
  observable_plot2_PsbA1_datagen3 := task2_model2_sigcpsba_PsbA1;
  observable_plot3_PsbA1_datagen1 := task3_model3_sigcpsba_PsbA1;

  // Reactions:
  v1: SigC -> SigC_a; kf*SigC;
  v2: SigC_a -> SigC; kb*SigC_a;
  v3: SigC_a -> ; (1/Td + 1/Ts)*ln(2)*SigC_a;
  v4: SigC -> ; (1/Td + 1/Ts)*ln(2)*SigC;
  v5: -> SigC; Vs*(theta/K_theta_s)^h_theta_s/(1 + (theta/K_theta_s)^h_theta_s + delcc*(SigC_a/Kss)^hss + delcc*(theta/K_theta_s)^h_theta_s*(SigC_a/Kss)^hss);  // modifiers: SigC_a
  v6: PsbA1 -> ; (1/Td + 1/Ty)*ln(2)*PsbA1;
  v7: -> PsbA1; Vp*(theta/K_theta_p)^h_theta_p/(1 + (theta/K_theta_p)^h_theta_p + delcp*(SigC_a/Ksp)^hsp + delcp*(theta/K_theta_p)^h_theta_p*(SigC_a/Ksp)^hsp);  // modifiers: SigC_a
  v8: -> PsbA1mut; Vp*(theta/K_theta_p)^h_theta_p/(1 + (theta/K_theta_p)^h_theta_p + 0*(SigC_a/Ksp)^hsp + 0*(theta/K_theta_p)^h_theta_p*(SigC_a/Ksp)^hsp);  // modifiers: SigC_a
  v9: PsbA1mut -> ; (1/Td + 1/Ty)*ln(2)*PsbA1mut;

  // Unit definitions:
  unit per_hour = 3600 second;
end
