// SBML level 2 version 1

model mayya1()

  // Compartments:
  compartment nm = 1 um2;  // 2-D; GO:0031965
  compartment nuc = 1 litre;  // GO:0005634
  compartment sol = 14.625 litre;  // GO:0005576

  // Species:
  species PstatDimer_nuc in nuc = 0;  // isVersionOf uniprot:P42224
  species PstatDimer_sol in sol = 0;  // isVersionOf uniprot:P42224
  species Pstat_nuc in nuc = 0;  // isVersionOf uniprot:P42224
  species Pstat_sol in sol = 0;  // isVersionOf uniprot:P42224
  species species_test in sol = 0;
  species $statKinase_sol in sol;
  species statPhosphatase_nuc in nuc = 0.05;
  species stat_nuc in nuc = 0;  // isVersionOf uniprot:P42224
  species stat_sol in sol = 1;  // isVersionOf uniprot:P42224

  // Assignment rules:
  statKinase_sol := piecewise(0.01*sin(0.001571*(-500 + t)), (t > 500) && (t < 2502.546), 0);
  observable_task0_model0_mayya1_PstatDimer_sol := PstatDimer_sol;
  observable_task0_model0_mayya1_stat_sol := stat_sol;
  observable_task0_model0_mayya1_statKinase_sol := statKinase_sol;

  // Reactions:
  PstatDimer__import: PstatDimer_sol -> PstatDimer_nuc; PstatDimer_impMax*PstatDimer_sol*(1/(Kpsd_imp + PstatDimer_sol))*nm;  // isVersionOf GO:0007262
    Kpsd_imp = 0.3 uM; PstatDimer_impMax = 0.045 uM_um_s_1;
  PstatDimerisation: 2 Pstat_sol -> PstatDimer_sol; (PstatDimerisation_Kf_PstatDimerisation*Pstat_sol^2 + (-(PstatDimerisation_Kr_PstatDimerisation*PstatDimer_sol)))*sol;  // isVersionOf GO:0046983
    PstatDimerisation_Kr_PstatDimerisation = 0.03 s_1; PstatDimerisation_Kf_PstatDimerisation = 0.6 uM_1_s_1;
  PstatDimerisationNuc: 2 Pstat_nuc -> PstatDimer_nuc; (PstatDimerisationNuc_Kf_PstatDimerisation*Pstat_nuc^2 + (-(PstatDimerisationNuc_Kr_PstatDimerisation*PstatDimer_nuc)))*nuc;  // isVersionOf GO:0046983
    PstatDimerisationNuc_Kr_PstatDimerisation = 0.03 s_1; PstatDimerisationNuc_Kf_PstatDimerisation = 0.6 uM_1_s_1;
  statDephosphorylation: Pstat_nuc -> stat_nuc; Kcat_dephos*statPhosphatase_nuc*Pstat_nuc*(1/(Km_dephos + Pstat_nuc))*nuc;  // modifiers: statPhosphatase_nuc; isVersionOf GO:0006470
    Km_dephos = 2 uM; Kcat_dephos = 1 s_1;
  statPhosphorylation: stat_sol -> species_test + Pstat_sol; Kcat_phos*statKinase_sol*stat_sol*(1/(Km_phos + stat_sol))*sol;  // modifiers: statKinase_sol; isVersionOf GO:0042508
    Km_phos = 4 uM; Kcat_phos = 1 s_1;
  stat_export: stat_sol -> stat_nuc; nuc*stat_expMax*stat_nuc*(1/(Ks_exp + stat_nuc))*nm;
    Ks_exp = 0.6 uM; stat_expMax = -0.06 uM_um_s_1;
  stat_import: stat_sol -> stat_nuc; nuc*stat_impMax*stat_sol*(1/(Ks_imp + stat_sol))*nm;  // isVersionOf GO:0007262
    Ks_imp = 3 uM; stat_impMax = 0.003 uM_um_s_1;

  // Unit definitions:
  unit uM = 1e-6 mole / litre;
  unit uM_um_s_1 = 1e-6 mole / (second * (1e-6 metre)^2 * litre);
  unit uM_1_s_1 = litre / (second * 1e-6 mole);
  unit s_1 = 1 / second;
  unit um2 = (1e-6 metre)^2;
  unit molecules = item;
  unit area = (1e-6 metre)^2;
  unit volume = litre;
  unit substance = 1e-6 mole;
end
