// SBML level 2 version 4

model middleton1()

  // Compartments:
  compartment default = 1 volume;  // isVersionOf GO:0005623

  // Species:
  substanceOnly species GA4 in default = 0.01;  // isVersionOf CHEBI:32902
  substanceOnly species $ga20ox_source in default = 0;
  substanceOnly species $gid_source in default = 0;
  substanceOnly species DELLA in default = 0.01;  // isVersionOf uniprot:Q9LQT8
  substanceOnly species GID in default = 0.01;  // isVersionOf uniprot:Q9MAA7
  substanceOnly species DELLA_U in default = 0.01;  // isVersionOf uniprot:Q9LQT8
  substanceOnly species GA12 in default = 0.01;  // isVersionOf CHEBI:30088
  substanceOnly species GA15 in default = 0.01;  // isVersionOf CHEBI:29590
  substanceOnly species GA24 in default = 0.01;  // isVersionOf CHEBI:32906
  substanceOnly species GA9 in default = 0.01;  // isVersionOf CHEBI:29605
  substanceOnly species GA20ox in default = 0.01;  // isVersionOf ath:AT4G25420
  substanceOnly species GA3ox in default = 0.01;  // isVersionOf ath:AT4G21690
  substanceOnly species GA9_GA3ox in default = 0.01; GA9_GA3ox is "GA9-GA3ox";  // hasPart ath:AT4G21690 CHEBI:29605
  substanceOnly species $GA12_source in default = 0;
  substanceOnly species GA24_GA20ox in default = 0.01; GA24_GA20ox is "GA24-GA20ox";  // hasPart ath:AT4G25420 CHEBI:32906
  substanceOnly species GA15_GA20ox in default = 0.01; GA15_GA20ox is "GA15-GA20ox";  // hasPart ath:AT4G25420 CHEBI:29590
  substanceOnly species GA12_GA20ox in default = 0.01; GA12_GA20ox is "GA12-GA20ox";  // hasPart ath:AT4G25420 CHEBI:30088
  substanceOnly species $GID_source in default = 0;
  substanceOnly species $della_source in default = 0;
  substanceOnly species $ga3ox_source in default = 0;
  substanceOnly species GA4_GID_DELLA2 in default = 0.01; GA4_GID_DELLA2 is "GA4-GID-DELLA2";  // hasPart uniprot:Q9LQT8 uniprot:Q9MAA7 CHEBI:32902
  substanceOnly species ga20ox in default = 0.01;  // isVersionOf ath:AT4G25420
  substanceOnly species della in default = 0.01;  // isVersionOf uniprot:Q9LQT8
  substanceOnly species ga3ox in default = 0.01;  // isVersionOf ath:AT4G21690
  substanceOnly species gid in default = 0.01;  // isVersionOf uniprot:Q9MAA7
  substanceOnly species GA4_GID_DELLA1 in default = 0.01; GA4_GID_DELLA1 is "GA4-GID-DELLA1";  // hasPart uniprot:Q9MAA7 uniprot:Q9LQT8 CHEBI:32902
  substanceOnly species $GA3ox_source in default = 0;
  substanceOnly species $GA20ox_source in default = 0;
  substanceOnly species GA4_GID_closed in default = 0.01; GA4_GID_closed is "GA4-GID-closed";  // hasPart uniprot:Q9MAA7 CHEBI:32902
  substanceOnly species GA4_GID in default = 0.01; GA4_GID is "GA4-GID";  // hasPart uniprot:Q9MAA7 CHEBI:32902
  substanceOnly species $GA4_source in default = 0;
  substanceOnly species $sa5_degraded in default = 0;
  substanceOnly species $sa6_degraded in default = 0;
  substanceOnly species $sa7_degraded in default = 0;
  substanceOnly species $DELLA_source in default = 0;
  substanceOnly species $sa8_degraded in default = 0;
  substanceOnly species $sa1_degraded in default = 0;

  // Parameters:
  Pmem = 2.66664 substance;
  R = 1 substance;
  appliedGA4 = 2 substance;
  muDELLA = 0.07079458 substance;
  muGA = 0.2908042 substance;
  muGA20ox = 0.04777076 substance;
  muGA3ox = 0.1026 substance;
  muGID = 0.04570882 substance;
  omegaGA12 has substance;
  omegaGA12ga13 = 0.006602804 substance;
  omegaGA4 = 0 substance;
  tGA4off = 620 substance;
  tGA4on = 500 substance;

  // Assignment rules:
  omegaGA12 := R*omegaGA12ga13;
  observable_task0_model0_middleton1_s16 := DELLA;

  // Reactions:
  GA4_GID_association: GID + GA4 => GA4_GID; la*GA4*GID; GA4_GID_association is "GA4-GID association";
    la = 1.35 substance;
  GA15_GA20ox_association: GA20ox + GA15 => GA15_GA20ox; ka15*GA15*GA20ox; GA15_GA20ox_association is "GA15-GA20ox association";
    ka15 = 2073.224 substance;
  GA15_GA20ox_dissociation: GA15_GA20ox => GA20ox + GA15; kd15*GA15_GA20ox; GA15_GA20ox_dissociation is "GA15.GA20ox dissociation";
    kd15 = 0.008827838 substance;
  GA24_production: GA15_GA20ox => GA24 + GA20ox; km15*GA15_GA20ox;
    km15 = 763.7771 substance;
  GA24_GA20ox_association: GA20ox + GA24 => GA24_GA20ox; ka24*GA24*GA20ox; GA24_GA20ox_association is "GA24-GA20ox association";
    ka24 = 3099.189 substance;
  GA24_GA20ox_dissociation: GA24_GA20ox => GA20ox + GA24; kd24*GA24_GA20ox; GA24_GA20ox_dissociation is "GA24.GA20ox dissociation";
    kd24 = 0.01588493 substance;
  GA9_production: GA24_GA20ox => GA9 + GA20ox; km24*GA24_GA20ox;
    km24 = 2.588461 substance;
  GA9_GA3ox_association: GA3ox + GA9 => GA9_GA3ox; ka9*GA9*GA3ox; GA9_GA3ox_association is "GA9-GA3ox association";
    ka9 = 2073.224 substance;
  GA9_GA3ox_dissociation: GA9_GA3ox => GA3ox + GA9; kd9*GA9_GA3ox; GA9_GA3ox_dissociation is "GA9.GA3ox dissociation";
    kd9 = 0.008827838 substance;
  GA4_production: GA9_GA3ox => GA4 + GA3ox; km9*GA9_GA3ox;
    km9 = 763.7771 substance;
  GA4_GID_lid_closing: GA4_GID => GA4_GID_closed; q*GA4_GID; GA4_GID_lid_closing is "GA4.GID lid closing";
    q = 0.02511886 substance;
  GA4_GID_dissociation: GA4_GID => GID + GA4; ld*GA4_GID; GA4_GID_dissociation is "GA4.GID dissociation";
    ld = 2.843151 substance;
  GA4_GID_Closed_lid_opening: GA4_GID_closed => GA4_GID; p*GA4_GID_closed; GA4_GID_Closed_lid_opening is "GA4.GID-Closed lid opening";
    p = 0.07762471 substance;
  della_translation: $DELLA_source => DELLA; deltaDELLA*della;  // modifiers: della
    deltaDELLA = 0.0005277491 substance;
  ga20ox_translation: $GA20ox_source => GA20ox; deltaGA20ox*ga20ox;  // modifiers: ga20ox
    deltaGA20ox = 0.1929903 substance;
  ga3ox_translation: $GA3ox_source => GA3ox; deltaGA3ox*ga3ox;  // modifiers: ga3ox
    deltaGA3ox = 0.01929903 substance;
  gid_translation: $GID_source => GID; deltaGID*gid;  // modifiers: gid
    deltaGID = 19.29903 substance;
  re27: $ga20ox_source => ga20ox; muGA20ox*DELLA/(DELLA + thetaGA20ox); re27 is "ga20ox transcription (activated by DELLA)";  // modifiers: DELLA
    thetaGA20ox = 0.6383 substance;
  re28: $gid_source => gid; muGID*DELLA/(DELLA + thetaGID); re28 is "gid transcription (activated by DELLA)";  // modifiers: DELLA
    thetaGID = 0.00055995 substance;
  re29: $della_source => della; muDELLA*thetaDELLA/(DELLA + thetaDELLA); re29 is "della transcription (repressed by DELLA)";  // modifiers: DELLA
    thetaDELLA = 0.01 substance;
  GA4_GID_DELLA1_association: DELLA + GA4_GID_closed => GA4_GID_DELLA1; ua1*GA4_GID_closed*DELLA; GA4_GID_DELLA1_association is "GA4.GID-DELLA1 association";
    ua1 = 10 substance;
  re30: $ga3ox_source => ga3ox; muGA3ox*DELLA/(DELLA + thetaGA3ox); re30 is "ga3ox transcription (activated by DELLA)";  // modifiers: DELLA
    thetaGA3ox = 0.0082 substance;
  della_decay: della => $della_source; muDELLA*della;
  gid_decay: gid => $gid_source; muGID*gid;
  ga20ox_decay: ga20ox => $ga20ox_source; muGA20ox*ga20ox;
  ga3ox_decay: ga3ox => $ga3ox_source; muGA3ox*ga3ox;
  GA20ox_decay: GA20ox => $GA20ox_source; gammaGA20ox*GA20ox;
    gammaGA20ox = 3.514 substance;
  GID_decay: GID => $GID_source; gammaGID*GID;
    gammaGID = 3.514 substance;
  GA3ox_decay: GA3ox => $GA3ox_source; gammaGA3ox*GA3ox;
    gammaGA3ox = 3.514 substance;
  GA4_GID_DELLA2_association: DELLA + GA4_GID_closed => GA4_GID_DELLA2; ua2*GA4_GID_closed*DELLA; GA4_GID_DELLA2_association is "GA4.GID-DELLA2 association";
    ua2 = 316.2278 substance;
  GA4_GID_DELLA1_dissociation: GA4_GID_DELLA1 => DELLA + GA4_GID_closed; ud1*GA4_GID_DELLA1; GA4_GID_DELLA1_dissociation is "GA4.GID.DELLA1 dissociation";
    ud1 = 0.1330454 substance;
  GA4_GID_DELLA2_dissociation: GA4_GID_DELLA2 => DELLA + GA4_GID_closed; ud2*GA4_GID_DELLA2; GA4_GID_DELLA2_dissociation is "GA4.GID.DELLA2 dissociation";
    ud2 = 2.8184 substance;
  GA4_supply: $GA4_source => GA4; Pmem*A1*omegaGA4;
    A1 = 0.0307 substance;
  degradation_of_GA12: GA12 => $sa5_degraded; muGA*GA12;
  degradation_of_GA15: GA15 => $sa6_degraded; muGA*GA15;
  degradation_of_GA24: GA24 => $sa7_degraded; muGA*GA24;
  degradation_of_GA9: GA9 => $sa8_degraded; muGA*GA9;
  degradation_of_GA4: GA4 => $sa1_degraded; (muGA + Pmem*B1)*GA4;
    B1 = 0.00039795 substance;
  DELLA_ubiquitination: GA4_GID_DELLA1 => DELLA_U + GA4_GID_closed; um*GA4_GID_DELLA1;
    um = 6.922089 substance;
  GA12_supply: $GA12_source => GA12; omegaGA12;
  GA12_GA20ox_association: GA20ox + GA12 => GA12_GA20ox; ka12*GA12*GA20ox; GA12_GA20ox_association is "GA12-GA20ox association";
    ka12 = 2904.119 substance;
  GA12_GA20ox_dissociation: GA12_GA20ox => GA20ox + GA12; kd12*GA12_GA20ox; GA12_GA20ox_dissociation is "GA12.GA20ox dissociation";
    kd12 = 2.672986 substance;
  GA15_production: GA12_GA20ox => GA15 + GA20ox; km12*GA12_GA20ox;
    km12 = 198.8043 substance;

  // Events:
  AddGA4: at (time > tGA4on): omegaGA4 = appliedGA4;
  RemoveGA4: at (time > tGA4off): omegaGA4 = 0;

  // Unit definitions:
  unit time = second;
  unit length = metre;
  unit area = metre^2;
  unit volume = litre;
  unit substance = mole;
end
