// SBML level 2 version 4

model montagne1()

  // Compartments:
  compartment sample = 1;

  // Species:
  species Inh in sample = 0;  // isVersionOf kegg.compound:C00039 CHEBI:16991
  species Inh_T1 in sample = 0;  // hasVersion kegg.compound:C00039 CHEBI:16991
  species T1 in sample = 38.5;  // isVersionOf kegg.compound:C00039 CHEBI:16991
  species T1_alpha in sample = 0;  // hasVersion kegg.compound:C00039 CHEBI:16991
  species T2 in sample = 3.89;  // isVersionOf kegg.compound:C00039 CHEBI:16991
  species T2_beta in sample = 0;  // hasVersion kegg.compound:C00039 CHEBI:16991
  species T3 in sample = 38.5;  // isVersionOf kegg.compound:C00039 CHEBI:16991
  species T3_Inh in sample = 0;  // hasVersion kegg.compound:C00039 CHEBI:16991
  species alpha in sample = 10;  // isVersionOf kegg.compound:C00039 CHEBI:16991
  species alpha_T1 in sample = 0;  // hasVersion kegg.compound:C00039 CHEBI:16991
  species alpha_T1_alpha in sample = 0;  // hasVersion kegg.compound:C00039 CHEBI:16991
  species alpha_T2 in sample = 0;  // hasVersion kegg.compound:C00039 CHEBI:16991
  species alpha_T2_beta in sample = 0;  // hasVersion kegg.compound:C00039 CHEBI:16991
  species alpha_alpha_T1 in sample = 0;  // hasVersion kegg.compound:C00039 CHEBI:16991
  species alpha_beta_T2 in sample = 0;  // hasVersion kegg.compound:C00039 CHEBI:16991
  species beta in sample = 0;  // isVersionOf kegg.compound:C00039 CHEBI:16991
  species beta_Inh_T3 in sample = 0;  // hasVersion kegg.compound:C00039 CHEBI:16991
  species beta_T3 in sample = 0;  // hasVersion kegg.compound:C00039 CHEBI:16991
  species beta_T3_Inh in sample = 0;  // hasVersion kegg.compound:C00039 CHEBI:16991
  species $empty in sample = 0;

  // Parameters:
  Bp_concentration has nM;
  Inh_total has nM;
  alpha_total has nM;
  beta_total has nM;
  k0d = 0.0294;
  k0r = 3.434579 per_min;
  k10d = 3.434579 per_min;
  k10r = 0.0294;
  k11d = 11.8408 per_min;
  k12d = 9.2239832 per_min;
  k13d = 2.60186 per_min;
  k14d = 0.0171;
  k14r = 0.6107143 per_min;
  k15d = 0.001862968 per_min;
  k15r = 0.027;
  k16d = 0.027;
  k16r = 0.001862968 per_min;
  k17d = 0.0171;
  k17r = 0.6107143 per_min;
  k18d = 17.024 per_min;
  k19d = 5.566848 per_min;
  k1d = 3.434579 per_min;
  k1r = 0.0294;
  k20d = 3.2064 per_min;
  k21d = 0.027;
  k21r = 0.006081081 per_min;
  k22d = 0.021546;
  k22r = 4.153914e-5;
  k23d = 4.153914e-5;
  k23r = 0.021546;
  k24d = 0.411 per_min;
  k25d = 0.485802 per_min;
  k26d = 1.7262 per_min;
  k2d = 3.434579 per_min;
  k2r = 0.0294;
  k3d = 3.434579 per_min;
  k3r = 0.0294;
  k4d = 15.2 per_min;
  k5d = 11.8408 per_min;
  k6d = 3.34 per_min;
  k7d = 0.0294;
  k7r = 3.434579 per_min;
  k8d = 0.6107143 per_min;
  k8r = 0.0171;
  k9d = 0.6107143 per_min;
  k9r = 0.0171;

  // Assignment rules:
  alpha_total := alpha + alpha_T1 + T1_alpha + 2*alpha_T1_alpha + alpha_T2 + alpha_T2_beta + alpha_T2;
  beta_total := beta + T2_beta + alpha_T2_beta + beta_T3 + beta_T3_Inh;
  Inh_total := Inh + T3_Inh + beta_T3_Inh + Inh_T1;
  fluorescence := -0.38 + 0.00093*(11*(alpha_T1 + T1_alpha + alpha_T2 + T2_beta + beta_T3) + 16*(T3_Inh + Inh_T1) + 22*(alpha_T1_alpha + alpha_alpha_T1 + alpha_T2_beta + alpha_beta_T2) + 27*(beta_T3_Inh + beta_Inh_T3));
  Bp_concentration := 11*(alpha_T1 + T1_alpha + alpha_T2 + T2_beta + beta_T3) + 16*(T3_Inh + Inh_T1) + 22*(alpha_T1_alpha + alpha_alpha_T1 + alpha_T2_beta + alpha_beta_T2) + 27*(beta_T3_Inh + beta_Inh_T3);
  observable_task0_model0_montagne1_alpha_total := alpha_total;
  observable_task0_model0_montagne1_Inh_total := Inh_total;
  observable_task0_model0_montagne1_beta_total := task0_model0_montagne1_beta_total;
  observable_task0_model0_montagne1_fluorescence := task0_model0_montagne1_fluorescence;

  // Reactions:
  ass_aa_l: alpha + T1 -> alpha_T1; sample*(k0d*T1*alpha - k0r*alpha_T1);  // isVersionOf GO:0003677
  ass_ab_l: T2 + alpha -> alpha_T2; sample*(k7d*alpha*T2 - k7r*alpha_T2);  // isVersionOf GO:0003677
  ass_bc_l: T3 + beta -> beta_T3; sample*(k14d*beta*T3 - k14r*beta_T3);  // isVersionOf GO:0003677
  ass_bc_r: Inh + T3 -> T3_Inh; sample*(k16d*T3*Inh - k16r*T3_Inh);  // isVersionOf GO:0003677
  ass_bc_rl: T3_Inh + beta -> beta_T3_Inh; sample*(k17d*beta*T3_Inh - k17r*beta_T3_Inh);  // isVersionOf GO:0003677
  dis_aa: alpha_T1_alpha => alpha_alpha_T1 + alpha; sample*k5d*alpha_T1_alpha;  // isVersionOf GO:0003887 ec-code:2.7.7.7
  dis_ab: alpha_T2_beta => alpha_beta_T2 + beta; sample*k12d*alpha_T2_beta;  // isVersionOf GO:0003887 ec-code:2.7.7.7
  dis_bc: beta_T3_Inh => beta_Inh_T3 + Inh; sample*k19d*beta_T3_Inh;  // isVersionOf GO:0003887 ec-code:2.7.7.7
  exo_a: alpha -> $empty; sample*k24d*alpha;  // isVersionOf GO:0004527
  exo_b: beta -> $empty; sample*k25d*beta;  // isVersionOf GO:0004527
  exo_c: Inh -> $empty; sample*k26d*Inh;  // isVersionOf GO:0004527
  inh_ac: Inh + T1 -> Inh_T1; sample*(k21d*T1*Inh - k21r*Inh_T1);  // isVersionOf GO:0003677
  inh_displ_ac: Inh + T1_alpha -> Inh_T1 + alpha; sample*(k22d*T1_alpha*Inh - k22r*alpha*Inh_T1);  // isVersionOf GO:0003677
  m_ass_aa_lr: alpha_T1_alpha -> alpha_T1 + alpha; sample*(k1d*alpha_T1_alpha - k1r*alpha*alpha_T1);  // isVersionOf GO:0003677
  m_ass_aa_r: T1_alpha -> alpha + T1; sample*(k2d*T1_alpha - k2r*T1*alpha);  // isVersionOf GO:0003677
  m_ass_aa_rl: alpha_T1_alpha -> T1_alpha + alpha; sample*(k3d*alpha_T1_alpha - k3r*alpha*T1_alpha);  // isVersionOf GO:0003677
  m_ass_ab_lr: alpha_T2_beta -> beta + alpha_T2; sample*(k8d*alpha_T2_beta - k8r*alpha_T2*beta);  // isVersionOf GO:0003677
  m_ass_ab_r: T2_beta -> beta + T2; sample*(k9d*T2_beta - k9r*T2*beta);  // isVersionOf GO:0003677
  m_ass_ab_rl: alpha_T2_beta -> T2_beta + alpha; sample*(k10d*alpha_T2_beta - k10r*alpha*T2_beta);  // isVersionOf GO:0003677
  m_ass_bc_lr: beta_T3_Inh -> Inh + beta_T3; sample*(k15d*beta_T3_Inh - k15r*beta_T3*Inh);  // isVersionOf GO:0003677
  m_inh_displ_ca: Inh_T1 + alpha -> Inh + alpha_T1; sample*(k23d*alpha*Inh_T1 - k23r*alpha_T1*Inh);  // isVersionOf GO:0003677
  nick_aa: alpha_alpha_T1 => alpha_T1_alpha; sample*k6d*alpha_alpha_T1;  // isVersionOf GO:0004519
  nick_ab: alpha_beta_T2 => alpha_T2_beta; sample*k13d*alpha_beta_T2;  // isVersionOf GO:0004519
  nick_bc: beta_Inh_T3 => beta_T3_Inh; sample*k20d*beta_Inh_T3;  // isVersionOf GO:0004519
  pol_aa: alpha_T1 => alpha_alpha_T1; sample*k4d*alpha_T1;  // isVersionOf GO:0003887 ec-code:2.7.7.7
  pol_ab: alpha_T2 => alpha_beta_T2; sample*k11d*alpha_T2;  // isVersionOf GO:0003887 ec-code:2.7.7.7
  pol_bc: beta_T3 => beta_Inh_T3; sample*k18d*beta_T3;  // isVersionOf GO:0003677

  // Unit definitions:
  unit per_min = 1 / (60 second);
  unit nM_per_min = litre / (60 second * 1e-9 mole);
  unit nM = 1e-9 mole / litre;
  unit nanomole = 1e-9 mole;
  unit min = 60 second;
end
