// SBML level 2 version 4

model muraro1()

  // Compartments:
  compartment cell = 1;  // isVersionOf GO:0005623

  // Species:
  species AHKph in cell = 1;  // isVersionOf kegg.compound:C00562 uniprot:Q9C5U0
  species ARF in cell;  // isVersionOf uniprot:Q94JM3
  species ARF2 in cell = 0;  // isVersionOf uniprot:Q94JM3
  species ARFIAA in cell = 0;  // isVersionOf uniprot:P49677 uniprot:Q94JM3
  species ARRAm in cell = 0;  // encodes uniprot:Q940D0
  species ARRAp in cell = 0;  // isVersionOf uniprot:Q940D0
  species ARRAph in cell = 0;  // isVersionOf kegg.compound:C00562 uniprot:Q9ZWJ9
  species ARRBp in cell;  // isVersionOf uniprot:Q940D0
  species ARRBph in cell = 0;  // isVersionOf kegg.compound:C00562 uniprot:Q940D0
  species ARm in cell = 0;  // encodes uniprot:Q9FZ33
  species ARp in cell = 0;  // isVersionOf uniprot:Q9FZ33
  species Aux in cell = 1;  // isVersionOf CHEBI:22676
  species AuxTIAA in cell = 0;  // hasPart uniprot:P49677 uniprot:Q570C0 CHEBI:22676
  species AuxTIR1 in cell = 0;  // hasPart uniprot:Q570C0 CHEBI:22676
  species CRm in cell = 0;  // encodes uniprot:O82503
  species CRp in cell = 0;  // isVersionOf uniprot:O82503
  species Ck in cell = 1;  // isVersionOf CHEBI:23530
  species CkAHK in cell;  // hasPart uniprot:Q9C5U0 CHEBI:23530
  species CkAHKph in cell;  // hasPart uniprot:Q9C5U0 CHEBI:23530
  species F1 in cell;
  species F2 in cell;
  species F3 in cell;
  species F4 in cell;
  species F5a in cell;
  species F5b in cell;
  species F6 in cell;
  species IAAm in cell = 0;  // encodes CHEBI:33699 uniprot:P49677
  species IAAp in cell = 0;  // isVersionOf uniprot:P49677
  species IAAs in cell = 0;  // isVersionOf uniprot:P49677
  species PINm in cell = 0;  // encodes uniprot:Q9SL42
  species PINp in cell = 0;  // isVersionOf uniprot:Q9SL42
  species TIR1 in cell;  // isVersionOf uniprot:Q570C0

  // Parameters:
  alphaAHK = 1;
  alphaARF = 1;
  alphaARRB = 2;
  alphaAux = 1;
  alphaCk = 1;
  alphaPH = 1;
  alphaTIR1 = 1;
  deltaARRAp = 1;
  deltaARp = 1;
  deltaCRp = 1;
  deltaIAAp = 1;
  deltaPINp = 1;
  eps = 0.01;
  etaAHKph = 1;
  etaARFIAA = 1;
  etaAuxTIR1 = 10;
  etaCkPh = 1;
  ka = 100;
  kd = 1;
  la = 0.5;
  lambda1 = 0.1;
  lambda3 = 0.02;
  ld = 0.1;
  muAux = 0.1;
  muCk = 0.1;
  muIAAs = 1;
  pa = 10;
  pd = 10;
  phiARRAp = 100;
  phiARp = 2;
  phiCRp = 2;
  phiIAAp = 100;
  phiPINp = 100;
  psiARF = 0.1;
  psiARFIAA = 0.1;
  qa = 1;
  qd = 1;
  ra = 1;
  rd = 1;
  sa = 1;
  sd = 1;
  thARFIAA = 0.1;
  thARRAph = 0.1;
  thARRBph = 0.1;
  thetaARF = 0.1;
  thetaARF2 = 0.01;
  thetaARp = 0.1;
  thetaIAAp = 0.1;
  ua = 1;
  ud = 1;

  // Assignment rules:
  F6 := ARp/thetaARp/(1 + ARp/thetaARp);
  F5b := (ARF2/thetaARF2 + ARF^2/psiARF)/(1 + ARF/thetaARF + ARF2/thetaARF2 + ARFIAA/thARFIAA + ARF*IAAp/psiARFIAA + ARF^2/psiARF);
  F5a := ARF/thetaARF/(1 + ARF/thetaARF + ARF2/thetaARF2 + ARFIAA/thARFIAA + ARF*IAAp/psiARFIAA + ARF^2/psiARF);
  F4 := ARRBph/thARRBph/(1 + ARRAph/thARRAph + ARRBph/thARRBph);
  F3 := ARRBph/thARRBph/(1 + ARF/thetaARF + ARF2/thetaARF2 + ARFIAA/thARFIAA + ARF*IAAp/psiARFIAA + ARF^2/psiARF + ARRBph/thARRBph);
  F2 := (ARF2/thetaARF2 + ARF^2/psiARF)/(1 + ARF/thetaARF + ARF2/thetaARF2 + ARFIAA/thARFIAA + ARF*IAAp/psiARFIAA + ARF^2/psiARF + ARRBph/thARRBph);
  F1 := ARF/thetaARF/(1 + ARF/thetaARF + ARF2/thetaARF2 + ARFIAA/thARFIAA + ARF*IAAp/psiARFIAA + ARF^2/psiARF + ARRBph/thARRBph);
  CkAHK := alphaAHK - etaAHKph*(AHKph + CkAHKph);
  CkAHKph := alphaPH - AHKph - ARRAph - ARRBph;
  ARRBp := alphaARRB - etaAHKph*ARRBph;
  ARF := alphaARF - 2*ARF2 - ARFIAA;
  TIR1 := alphaTIR1 - AuxTIR1 - AuxTIAA;
  observable_task1_model1_muraro1_PINm := PINm;
  observable_task0_model0_muraro1_PINm := PINm;

  // Reactions:
  r1: => IAAm; phiIAAp*(lambda1*F1 + F2 + lambda3*F3) - IAAm;  // modifiers: F3, F2, F1; isVersionOf GO:0009299
  r10: => PINp; 1/eps*(deltaPINp*PINm - PINp);  // modifiers: PINm; isVersionOf GO:0006412
  r11: => ARm; phiARp*(lambda1*F5a + F5b) - ARm;  // modifiers: F5b, F5a; isVersionOf GO:0009299
  r12: => ARp; 1/eps*(deltaARp*ARm - ARp);  // modifiers: ARm; isVersionOf GO:0006412
  r13: => CRm; phiCRp*F4 - CRm;  // modifiers: F4; isVersionOf GO:0009299
  r14: => CRp; 1/eps*(deltaCRp*CRm - CRp);  // modifiers: CRm; isVersionOf GO:0006412
  r15: => AHKph; 1/eps*(rd*CkAHKph - ra*AHKph*Ck);  // modifiers: Ck, CkAHKph; isVersionOf GO:0016310
  r16: => Ck; muCk*(alphaCk - Ck) - etaCkPh/eps*(ra*AHKph*Ck - rd*CkAHKph);  // modifiers: CkAHKph, AHKph; isVersionOf GO:0009691
  r17: => ARRBph; 1/eps*(ua*CkAHKph*ARRBp - ud*CkAHK*ARRBph);  // modifiers: ARRBp, CkAHK, CkAHKph; isVersionOf GO:0016310
  r18: => ARRAph; 1/eps*(sa*CkAHKph*ARRAp - sd*CkAHK*ARRAph);  // modifiers: CkAHK, ARRAp, CkAHKph; isVersionOf GO:0016310
  r19: => ARRAm; phiARRAp*F6 - ARRAm;  // modifiers: F6; isVersionOf GO:0009299
  r2: => IAAp; 1/eps*(deltaIAAp*IAAm - la*IAAp*AuxTIR1 + ld*AuxTIAA) + etaARFIAA*(pd*ARFIAA - pa*IAAp*ARF);  // modifiers: ARF, ARFIAA, AuxTIAA, AuxTIR1, IAAm; isVersionOf GO:0006412
  r20: => ARRAp; 1/eps*(deltaARRAp*ARRAm - ARRAp + etaAHKph*(sd*CkAHK*ARRAph - sa*CkAHKph*ARRAp));  // modifiers: CkAHKph, ARRAph, CkAHK, ARRAm; isVersionOf GO:0006412
  r3: => AuxTIR1; 1/eps*(ka*Aux*TIR1 - kd*AuxTIR1 + (ld + 1)*AuxTIAA - la*AuxTIR1*IAAp);  // modifiers: IAAp, AuxTIAA, TIR1, Aux; isVersionOf GO:0006461
  r4: => AuxTIAA; 1/eps*(la*IAAp*AuxTIR1 - (ld + 1)*AuxTIAA);  // modifiers: AuxTIR1, IAAp; isVersionOf GO:0006461
  r5: => IAAs; 1/eps*(AuxTIAA - muIAAs*IAAs);  // modifiers: AuxTIAA; isVersionOf GO:0043241
  r6: => ARFIAA; pa*ARF*IAAp - pd*ARFIAA;  // modifiers: IAAp, ARF; isVersionOf GO:0006461
  r7: => ARF2; qa*ARF^2 - qd*ARF2;  // modifiers: ARF; isVersionOf GO:0006412
  r8: => Aux; muAux*(alphaAux - Aux) - 1/eps*etaAuxTIR1*(ka*Aux*TIR1 - kd*AuxTIR1);  // modifiers: AuxTIR1, TIR1; isVersionOf GO:0009851
  r9: => PINm; phiPINp*(lambda1*F5a + F5b) - PINm;  // modifiers: F5b, F5a; isVersionOf GO:0009299
end
