// SBML level 2 version 4

function function_4_v019(KexDUSPP, KimDUSPP, Vc, Vn, pDUSP_c, pDUSP_n)
  KimDUSPP*Vc*pDUSP_c - KexDUSPP*Vn*pDUSP_n;
end

function function_4_v029(K29, V29, ppERK_n, Elk1_n)
  V29*ppERK_n*Elk1_n/(K29 + Elk1_n);
end

function function_4_v031(K31, KF31, V31, n31, nF31, Fn, pCREB_n, pElk1_n)
  V31*(pCREB_n*pElk1_n)^n31/(K31^n31 + (pCREB_n*pElk1_n)^n31 + (Fn/KF31)^nF31);
end

function function_4_v114(K114, V114, Kin_2, pMEK_c)
  V114*Kin_2*pMEK_c/(K114 + pMEK_c);
end

function function_4_v110(K110, V110, A3_2)
  V110*A3_2/(K110 + A3_2);
end

function function_4_v107(K107, V107, A1_2, RsT)
  V107*A1_2*RsT/(K107 + RsT);
end

function function_4_v040(KexFOS, KimFOS, Vc, Vn, c_FOS_c, FOSn)
  KimFOS*Vc*c_FOS_c - KexFOS*Vn*FOSn;
end

function function_4_v037(K37, V37, pc_FOS_c)
  V37*pc_FOS_c/(K37 + pc_FOS_c);
end

function function_4_v036(K36, V36, c_FOS_c, pRSK_c)
  V36*pRSK_c*c_FOS_c/(K36 + c_FOS_c);
end

function function_4_v002(Fct, K1, K2, V2, ERK_c, pERK_c, MEKc)
  V2*Fct*MEKc*pERK_c/(K2*(1 + ERK_c/K1) + pERK_c);
end

function function_4_v014(K14, V14, ppERK_c, DUSP_c)
  V14*ppERK_c*DUSP_c/(K14 + DUSP_c);
end

function function_4_v003(K3, K4, V3, pERK_c, ppERK_c)
  V3*pERK_c/(K3*(1 + ppERK_c/K4) + pERK_c);
end

function function_4_v005(K5, K6, V5, pERK_n, ppERK_n)
  V5*pERK_n/(K5*(1 + ppERK_n/K6) + pERK_n);
end

function function_4_v006(K5, K6, V6, pERK_n, ppERK_n)
  V6*ppERK_n/(K6*(1 + pERK_n/K5) + ppERK_n);
end

function function_4_v008(KexERKP, KimERKP, Vc, Vn, pERK_c, pERK_n)
  KimERKP*Vc*pERK_c - KexERKP*Vn*pERK_n;
end

function function_4_v015(K15, V15, pDUSP_c)
  V15*pDUSP_c/(K15 + pDUSP_c);
end

function function_4_v018(KexDUSP, KimDUSP, Vc, Vn, DUSP_n, DUSP_c)
  KimDUSP*Vc*DUSP_c - KexDUSP*Vn*DUSP_n;
end

function function_4_v020(K20, V20, ppERK_n, DUSP_n)
  V20*ppERK_n*DUSP_n/(K20 + DUSP_n);
end

function function_4_v021(K21, V21, pDUSP_n)
  V21*pDUSP_n/(K21 + pDUSP_n);
end

function function_4_v024(K24, V24, ppERK_c, RSK_c)
  V24*ppERK_c*RSK_c/(K24 + RSK_c);
end

function function_4_v009(KexERKPP, KimERKPP, Vc, Vn, ppERK_c, ppERK_n)
  KimERKPP*Vc*ppERK_c - KexERKPP*Vn*ppERK_n;
end

function function_4_v011(Vn, p11, PreDUSPmRNA)
  p11*Vn*PreDUSPmRNA;
end

function function_4_v013(p13, DUSPmRNA)
  p13*DUSPmRNA;
end

function function_4_v025(K25, V25, pRSK_c)
  V25*pRSK_c/(K25 + pRSK_c);
end

function function_4_v026(KexRSKP, KimRSKP, Vc, Vn, pRSK_n, pRSK_c)
  KimRSKP*Vc*pRSK_c - KexRSKP*Vn*pRSK_n;
end

function function_4_v032(Vn, p32, PreFOSmRNA)
  p32*Vn*PreFOSmRNA;
end

function function_4_v034(p34, c_FOSmRNA)
  p34*c_FOSmRNA;
end

function function_4_v027(K27, V27, CREB_n, pRSK_n)
  V27*pRSK_n*CREB_n/(K27 + CREB_n);
end

function function_4_v028(K28, V28, pCREB_n)
  V28*pCREB_n/(K28 + pCREB_n);
end

function function_4_v030(K30, V30, pElk1_n)
  V30*pElk1_n/(K30 + pElk1_n);
end

function function_4_v042(K42, V42, ppERK_n, FOSn)
  V42*ppERK_n*FOSn/(K42 + FOSn);
end

function function_4_v044(K44, V44, FOSn_2)
  V44*FOSn_2/(K44 + FOSn_2);
end

function function_4_v057(K57, V57, n57, FOSn_2)
  V57*FOSn_2^n57/(K57^n57 + FOSn_2^n57);
end

function function_4_v058(Vn, p58, PreFmRNA)
  p58*Vn*PreFmRNA;
end

function function_4_v060(p60, FmRNA)
  p60*FmRNA;
end

function function_4_v063(cytoplasm, nucleus, p63, Fn)
  cytoplasm*p63*Fn/nucleus;
end

function function_4_v101(K101, V101, A1, EGF)
  V101*EGF*A1/(K101 + A1);
end

function function_4_v102(K102, V102, A1_2)
  V102*A1_2/(K102 + A1_2);
end

function function_4_v103(K103, V103, A2, HRG)
  V103*HRG*A2/(K103 + A2);
end

function function_4_v105(K105, V105, EGF, RsD)
  V105*EGF*RsD/(K105 + RsD);
end

function function_4_v106(K106, V106, HRG, RsD)
  V106*HRG*RsD/(K106 + RsD);
end

function function_4_v108(K108, V108, A2_2, RsT)
  V108*A2_2*RsT/(K108 + RsT);
end

function function_4_v111(K111, V111, HRG, Kin)
  V111*HRG*Kin/(K111 + Kin);
end

function function_4_v112(K112, V112, A3_2, Kin_2)
  V112*A3_2*Kin_2/(K112 + Kin_2);
end

function function_4_v113(K113, V113, RsT, pMEK_c)
  V113*RsT*pMEK_c/(K113 + pMEK_c);
end

function function_4_v115(K115, V115, MEKc)
  V115*MEKc/(K115 + MEKc);
end

function function_4_v109(K109, V109, HRG, A3)
  V109*HRG*A3/(K109 + A3);
end

function function_4_v104(K104, V104, A2_2)
  V104*A2_2/(K104 + A2_2);
end

function function_4_v062(KexF, KimF, Vc, Vn, F, Fn)
  KimF*Vc*F - KexF*Vn*Fn;
end

function function_4_v043(K43, V43, FOSn, pRSK_n)
  V43*pRSK_n*FOSn/(K43 + FOSn);
end

function function_4_v041(KexFOSP, KimFOSP, Vc, Vn, pc_FOS_c, FOSn_2)
  KimFOSP*Vc*pc_FOS_c - KexFOSP*Vn*FOSn_2;
end

function function_4_v035(K35, V35, c_FOS_c, ppERK_c)
  V35*ppERK_c*c_FOS_c/(K35 + c_FOS_c);
end

function function_4_v010(K10, V10, n10, ppERK_n)
  V10*ppERK_n^n10/(K10^n10 + ppERK_n^n10);
end

function function_4_v001(Fct, K1, K2, V1, ERK_c, pERK_c, MEKc)
  V1*Fct*MEKc*ERK_c/(K1*(1 + pERK_c/K2) + ERK_c);
end

function function_4_v007(KexERK, KimERK, Vc, Vn, ERK_c, ERK_n)
  KimERK*Vc*ERK_c - KexERK*Vn*ERK_n;
end

function function_4_v004(K3, K4, V4, pERK_c, ppERK_c)
  V4*ppERK_c/(K4*(1 + pERK_c/K3) + ppERK_c);
end

model nakakuki1()

  // Compartments:
  compartment cytoplasm = 940;
  compartment default = 1;
  compartment nucleus = 220;

  // Species:
  species A1 in cytoplasm = 182.3524;
  species A1_2 in cytoplasm = 0;
  species A2 in cytoplasm = 25.38702;
  species A2_2 in cytoplasm = 0;
  species A3 in cytoplasm = 13.09262;
  species A3_2 in cytoplasm = 0;
  species CREB_n in nucleus = 1000;
  species DUSP_c in cytoplasm = 0;
  species DUSP_n in nucleus = 0;
  species DUSP_n_ERK_n in nucleus = 0;
  species DUSP_n_pERK_n in nucleus = 0;
  species DUSP_n_ppERK_n in nucleus = 0;
  species DUSPmRNA in cytoplasm = 0;
  species $EGF in default = 1;
  species ERK_c in cytoplasm = 570.4179;
  species ERK_n in nucleus = 1624.9;
  species Elk1_n in nucleus = 1510;
  species F in cytoplasm = 0;
  species FOSn in nucleus = 0;
  species FOSn_2 in nucleus = 0;
  species FmRNA in cytoplasm = 0;
  species Fn in nucleus = 0;
  species $HRG in default = 1;
  species Kin in cytoplasm = 82.66574;
  species Kin_2 in cytoplasm = 0;
  species MEK in cytoplasm = 637.3212;
  species PreDUSPmRNA in nucleus = 0;
  species PreFOSmRNA in nucleus = 0;
  species PreFmRNA in nucleus = 0;
  species RSK_c in cytoplasm = 353;
  species RsD in cytoplasm = 247.4035;
  species RsT in cytoplasm = 0;
  species c_FOS_c in cytoplasm = 0;
  species c_FOSmRNA in cytoplasm = 0;
  species pCREB_n in nucleus = 0;
  species pDUSP_c in cytoplasm = 0;
  species pDUSP_n in nucleus = 0;
  species pDUSP_n_ERK_n in nucleus = 0;
  species pDUSP_n_pERK_n in nucleus = 0;
  species pDUSP_n_ppERK_n in nucleus = 0;
  species pERK_c in cytoplasm = 0;
  species pERK_n in nucleus = 0;
  species pElk1_n in nucleus = 0;
  species pMEK in cytoplasm = 0;
  species pRSK_c in cytoplasm = 0;
  species pRSK_n in nucleus = 0;
  species pc_FOS_c in cytoplasm = 0;
  species ppERK_c in cytoplasm = 0;
  species ppERK_n in nucleus = 0;

  // Parameters:
  EGFm = 1;
  Fct = 0.7485;
  HRGm = 1;
  K1 = 307.0415;
  K10 = 169.0474;
  K101 = 3475.168;
  K102 = 237.2001;
  K103 = 1334.132;
  K104 = 4046.71;
  K105 = 1.027895;
  K106 = 606.871;
  K107 = 424.6884;
  K108 = 11.5048;
  K109 = 7424.816;
  K110 = 425.5268;
  K111 = 858.3423;
  K112 = 4665.217;
  K113 = 20.50809;
  K114 = 7.774197;
  K115 = 2122.045;
  K14 = 34180.48;
  K15 = 0.001172165;
  K2 = 350;
  K20 = 735598.7;
  K21 = 387.8377;
  K24 = 29516.07;
  K25 = 0.913939859;
  K27 = 441.5834;
  K28 = 14.99181;
  K29 = 21312.69;
  K3 = 160;
  K30 = 15.04397;
  K31 = 185.9761;
  K35 = 8562.744;
  K36 = 528.552427;
  K37 = 0.070379236;
  K4 = 60;
  K42 = 3992.061;
  K43 = 1157.116;
  K44 = 0.051168202;
  K5 = 29.94074;
  K57 = 0.637490056;
  K6 = 29.94074;
  KF31 = 0.013844393;
  KexDUSP = 0.070467899;
  KexDUSPP = 0.070467899;
  KexERK = 0.018;
  KexERKP = 0.018;
  KexERKPP = 0.013;
  KexF = 0.396950616;
  KexFOS = 0.133249762;
  KexFOSP = 0.133249762;
  KexRSKP = 0.129803956;
  KimDUSP = 0.024269764;
  KimDUSPP = 0.024269764;
  KimERK = 0.012;
  KimERKP = 0.012;
  KimERKPP = 0.011;
  KimF = 0.019898797;
  KimFOS = 0.54528521;
  KimFOSP = 0.54528521;
  KimRSKP = 0.025925065;
  V1 = 0.3428484;
  V10 = 29.24109;
  V101 = 0.01807448;
  V102 = 0.09858154;
  V103 = 0.3573399;
  V104 = 4.635749;
  V105 = 0.05393704;
  V106 = 0.109304;
  V107 = 5.291093;
  V108 = 0.03436149;
  V109 = 0.1374307;
  V110 = 0.08258693;
  V111 = 0.02487469;
  V112 = 0.8850982;
  V113 = 0.05377297;
  V114 = 0.03957055;
  V115 = 13.74244;
  V14 = 5.636949;
  V15 = 2.992347;
  V2 = 0.22;
  V20 = 0.157678678;
  V21 = 0.005648117;
  V24 = 0.550346114;
  V25 = 10.09064;
  V27 = 19.23118;
  V28 = 6.57476;
  V29 = 0.518529841;
  V3 = 0.72;
  V30 = 13.79479;
  V31 = 0.655214248;
  V35 = 8.907637;
  V36 = 0.000597315;
  V37 = 1.745848;
  V4 = 0.648;
  V42 = 0.909968714;
  V43 = 0.076717457;
  V44 = 0.078344305;
  V5 = 19.49872;
  V57 = 1.026835;
  V6 = 19.49872;
  Vc = 940;
  Vn = 220;
  m47 = 15.80784;
  m49 = 2.335459;
  m51 = 9.544308;
  m52 = 15.80784;
  m54 = 2.335459;
  m56 = 9.544308;
  n10 = 3.970849;
  n31 = 1.988003;
  n57 = 3.584464;
  nF31 = 2.80034;
  p11 = 0.000126129;
  p12 = 0.007875765;
  p13 = 0.001245747;
  p16 = 0.000257;
  p17 = 4.81e-5;
  p22 = 0.000257;
  p23 = 4.81e-5;
  p32 = 0.003284434;
  p33 = 0.0006012342;
  p34 = 7.648163e-5;
  p38 = 0.000257;
  p39 = 4.81e-5;
  p45 = 0.000257;
  p46 = 4.81e-5;
  p47 = 0.001670815;
  p48 = 0.686020478;
  p49 = 0.314470502;
  p50 = 26.59483;
  p51 = 0.01646825;
  p52 = 0.001670815;
  p53 = 0.686020478;
  p54 = 0.314470502;
  p55 = 26.59483;
  p56 = 0.01646825;
  p58 = 0.000270488;
  p59 = 0.001443889;
  p60 = 0.002448164;
  p61 = 3.498609e-5;
  p63 = 4.134662e-5;

  // Assignment rules:
  observable_plot5_pCREB_n_datagen1 := task1_model1_nakakuki1_pCREB_n;
  observable_plot3_pRSK_c_datagen1 := task1_model1_nakakuki1_pRSK_c;
  observable_plot2_ppERK_c_datagen1 := task1_model1_nakakuki1_ppERK_c;
  observable_plot1_pMEK_datagen1 := task1_model1_nakakuki1_pMEK;
  observable_task0_model0_nakakuki1_pCREB_n := pCREB_n;
  observable_task0_model0_nakakuki1_pRSK_c := pRSK_c;
  observable_task0_model0_nakakuki1_ppERK_c := ppERK_c;
  observable_task0_model0_nakakuki1_pMEK := pMEK;

  // Reactions:
  v007: ERK_c -> ERK_n; function_4_v007(KexERK, KimERK, Vc, Vn, ERK_c, ERK_n);
  v008: pERK_c -> pERK_n; function_4_v008(KexERKP, KimERKP, Vc, Vn, pERK_c, pERK_n);
  v009: ppERK_c -> ppERK_n; function_4_v009(KexERKPP, KimERKPP, Vc, Vn, ppERK_c, ppERK_n);
  v010: => PreDUSPmRNA; nucleus*function_4_v010(K10, V10, n10, ppERK_n);  // modifiers: ppERK_n
  v011: PreDUSPmRNA => DUSPmRNA; function_4_v011(Vn, p11, PreDUSPmRNA);
  v018: DUSP_c -> DUSP_n; function_4_v018(KexDUSP, KimDUSP, Vc, Vn, DUSP_n, DUSP_c);
  v019: pDUSP_c -> pDUSP_n; function_4_v019(KexDUSPP, KimDUSPP, Vc, Vn, pDUSP_c, pDUSP_n);
  v026: pRSK_c -> pRSK_n; function_4_v026(KexRSKP, KimRSKP, Vc, Vn, pRSK_n, pRSK_c);
  v032: PreFOSmRNA => c_FOSmRNA; function_4_v032(Vn, p32, PreFOSmRNA);
  v040: c_FOS_c -> FOSn; function_4_v040(KexFOS, KimFOS, Vc, Vn, c_FOS_c, FOSn);
  v041: pc_FOS_c -> FOSn_2; function_4_v041(KexFOSP, KimFOSP, Vc, Vn, pc_FOS_c, FOSn_2);
  v058: PreFmRNA => FmRNA; function_4_v058(Vn, p58, PreFmRNA);
  v062: F -> Fn; function_4_v062(KexF, KimF, Vc, Vn, F, Fn);
  v003: pERK_c => ERK_c; cytoplasm*function_4_v003(K3, K4, V3, pERK_c, ppERK_c);  // modifiers: ppERK_c
  v004: ppERK_c => pERK_c; cytoplasm*function_4_v004(K3, K4, V4, pERK_c, ppERK_c);
  v005: pERK_n => ERK_n; nucleus*function_4_v005(K5, K6, V5, pERK_n, ppERK_n);  // modifiers: ppERK_n
  v006: ppERK_n => pERK_n; nucleus*function_4_v006(K5, K6, V6, pERK_n, ppERK_n);
  v013: => DUSP_c; cytoplasm*function_4_v013(p13, DUSPmRNA);  // modifiers: DUSPmRNA
  v034: => c_FOS_c; cytoplasm*function_4_v034(p34, c_FOSmRNA);  // modifiers: c_FOSmRNA
  v057: => PreFmRNA; nucleus*function_4_v057(K57, V57, n57, FOSn_2);  // modifiers: FOSn_2
  v059: FmRNA => ; cytoplasm*p59*FmRNA;
  v060: => F; cytoplasm*function_4_v060(p60, FmRNA);  // modifiers: FmRNA
  v061: F => ; cytoplasm*p61*F;
  v063: Fn => ; nucleus*function_4_v063(cytoplasm, nucleus, p63, Fn);
  v020: DUSP_n => pDUSP_n; nucleus*function_4_v020(K20, V20, ppERK_n, DUSP_n);  // modifiers: ppERK_n
  v021: pDUSP_n => DUSP_n; nucleus*function_4_v021(K21, V21, pDUSP_n);
  v022: DUSP_n => ; nucleus*p22*DUSP_n;
  v023: pDUSP_n => ; nucleus*p23*pDUSP_n;
  v012: DUSPmRNA => ; cytoplasm*p12*DUSPmRNA;
  v052: DUSP_n + ppERK_n -> DUSP_n_ppERK_n; nucleus*(p47*DUSP_n*ppERK_n - m47*DUSP_n_ppERK_n);
  v053: DUSP_n_ppERK_n => DUSP_n + pERK_n; nucleus*p48*DUSP_n_ppERK_n;
  v054: DUSP_n + pERK_n -> DUSP_n_pERK_n; nucleus*(p49*DUSP_n*pERK_n - m49*DUSP_n_pERK_n);
  v055: DUSP_n_pERK_n => DUSP_n + ERK_n; nucleus*p50*DUSP_n_pERK_n;
  v047: pDUSP_n + ppERK_n -> pDUSP_n_ppERK_n; nucleus*(p52*pDUSP_n*ppERK_n - m52*pDUSP_n_ppERK_n);
  v048: pDUSP_n_ppERK_n => pDUSP_n + pERK_n; nucleus*p53*pDUSP_n_ppERK_n;
  v049: pDUSP_n + pERK_n -> pDUSP_n_pERK_n; nucleus*(p54*pDUSP_n*pERK_n - m54*pDUSP_n_pERK_n);
  v050: pDUSP_n_pERK_n => pDUSP_n + ERK_n; nucleus*p55*pDUSP_n_pERK_n;
  v056: DUSP_n + ERK_n -> DUSP_n_ERK_n; nucleus*(p51*DUSP_n*ERK_n - m51*DUSP_n_ERK_n);
  v051: pDUSP_n + ERK_n -> pDUSP_n_ERK_n; nucleus*(p56*pDUSP_n*ERK_n - m56*pDUSP_n_ERK_n);
  v101: A1 => A1_2; EGFm*cytoplasm*function_4_v101(K101, V101, A1, EGF);  // modifiers: EGF
  v001: ERK_c => pERK_c; cytoplasm*function_4_v001(Fct, K1, K2, V1, ERK_c, pERK_c, pMEK);  // modifiers: pMEK
  v014: DUSP_c => pDUSP_c; cytoplasm*function_4_v014(K14, V14, ppERK_c, DUSP_c);  // modifiers: ppERK_c
  v015: pDUSP_c => DUSP_c; cytoplasm*function_4_v015(K15, V15, pDUSP_c);
  v016: DUSP_c => ; cytoplasm*p16*DUSP_c;
  v017: pDUSP_c => ; cytoplasm*p17*pDUSP_c;
  v024: RSK_c => pRSK_c; cytoplasm*function_4_v024(K24, V24, ppERK_c, RSK_c);  // modifiers: ppERK_c
  v025: pRSK_c => RSK_c; cytoplasm*function_4_v025(K25, V25, pRSK_c);
  v027: CREB_n => pCREB_n; nucleus*function_4_v027(K27, V27, CREB_n, pRSK_n);  // modifiers: pRSK_n
  v028: pCREB_n => CREB_n; nucleus*function_4_v028(K28, V28, pCREB_n);
  v031: => PreFOSmRNA; nucleus*function_4_v031(K31, KF31, V31, n31, nF31, Fn, pCREB_n, pElk1_n);  // modifiers: pCREB_n, pElk1_n, Fn
  v033: c_FOSmRNA => ; cytoplasm*p33*c_FOSmRNA;
  v042: FOSn => FOSn_2; nucleus*function_4_v042(K42, V42, ppERK_n, FOSn);  // modifiers: ppERK_n
  v043: FOSn => FOSn_2; nucleus*function_4_v043(K43, V43, FOSn, pRSK_n);  // modifiers: pRSK_n
  v044: FOSn_2 => FOSn; nucleus*function_4_v044(K44, V44, FOSn_2);
  v045: FOSn => ; nucleus*p45*FOSn;
  v046: FOSn_2 => ; nucleus*p46*FOSn_2;
  v029: Elk1_n => pElk1_n; nucleus*function_4_v029(K29, V29, ppERK_n, Elk1_n);  // modifiers: ppERK_n
  v030: pElk1_n => Elk1_n; nucleus*function_4_v030(K30, V30, pElk1_n);
  v035: c_FOS_c => pc_FOS_c; cytoplasm*function_4_v035(K35, V35, c_FOS_c, ppERK_c);  // modifiers: ppERK_c
  v002: pERK_c => ppERK_c; cytoplasm*function_4_v002(Fct, K1, K2, V2, ERK_c, pERK_c, pMEK);  // modifiers: pMEK, ERK_c
  v037: pc_FOS_c => c_FOS_c; cytoplasm*function_4_v037(K37, V37, pc_FOS_c);
  v038: c_FOS_c => ; cytoplasm*p38*c_FOS_c;
  v039: pc_FOS_c => ; cytoplasm*p39*pc_FOS_c;
  v036: c_FOS_c => pc_FOS_c; cytoplasm*function_4_v036(K36, V36, c_FOS_c, pRSK_c);  // modifiers: pRSK_c
  v102: A1_2 => A1; cytoplasm*function_4_v102(K102, V102, A1_2);
  v103: A2 => A2_2; HRGm*cytoplasm*function_4_v103(K103, V103, A2, HRG);  // modifiers: HRG
  v104: A2_2 => A2; cytoplasm*function_4_v104(K104, V104, A2_2);
  v105: RsD => RsT; EGFm*cytoplasm*function_4_v105(K105, V105, EGF, RsD);  // modifiers: EGF
  v106: RsD => RsT; HRGm*cytoplasm*function_4_v106(K106, V106, HRG, RsD);  // modifiers: HRG
  v107: RsT => RsD; cytoplasm*function_4_v107(K107, V107, A1_2, RsT);  // modifiers: A1_2
  v108: RsT => RsD; cytoplasm*function_4_v108(K108, V108, A2_2, RsT);  // modifiers: A2_2
  v109: A3 => A3_2; HRGm*cytoplasm*function_4_v109(K109, V109, HRG, A3);  // modifiers: HRG
  v110: A3_2 => A3; cytoplasm*function_4_v110(K110, V110, A3_2);
  v111: Kin => Kin_2; HRGm*cytoplasm*function_4_v111(K111, V111, HRG, Kin);  // modifiers: HRG
  v112: Kin_2 => Kin; cytoplasm*function_4_v112(K112, V112, A3_2, Kin_2);  // modifiers: A3_2
  v113: MEK => pMEK; cytoplasm*function_4_v113(K113, V113, RsT, MEK);  // modifiers: RsT
  v114: MEK => pMEK; cytoplasm*function_4_v114(K114, V114, Kin_2, MEK);  // modifiers: Kin_2
  v115: pMEK => MEK; cytoplasm*function_4_v115(K115, V115, pMEK);

  // Unit definitions:
  unit volume = 1e-12 litre;
  unit substance = 1e-9 mole;
end
