// SBML level 2 version 4

model nakakuki2()

  // Compartments:
  compartment compartment = 1;  // isVersionOf GO:0005623

  // Species:
  species DUSP in compartment = 0;  // isHomologTo uniprot:P28562 uniprot:Q05923 uniprot:Q13115 uniprot:Q16690
  species cFOS in compartment = 0;  // isVersionOf reactome:REACT_21788.1 uniprot:P01100
  species cFOSm in compartment = 0; cFOSm is "cFOSmRNA";  // encodes uniprot:P01100 reactome:REACT_21788.1
  species cFOSp in compartment = 0; cFOSp is "cFOS preRNA";  // encodes hsa:2353 reactome:REACT_21788.1
  species pRSKn in compartment = 0;  // reactome:REACT_13229.1
  species pcFOS in compartment = 0; pcFOS is "pc-FOS";  // isVersionOf reactome:REACT_21988.1 uniprot:P01100
  species $ppERKc in compartment; ppERKc is "ppERK(cytosol)";  // isVersionOf reactome:REACT_3037 reactome:REACT_2640 kegg.compound:C00562
  species ppERKn in compartment = 0; ppERKn is "ppERK(nucleus)";  // isVersionOf reactome:REACT_13301.1 uniprot:P27361 uniprot:P28482 kegg.compound:C00562
  species x1 in compartment = 0;
  species x2 in compartment = 0;

  // Parameters:
  K1 = 1.09;
  K2 = 2.89;
  L = 1;
  k11 = 0.11;
  k13 = 0.06;
  k7 = 0.5;
  tau1 = 3.07;
  tau2 = 472;

  // Assignment rules:
  ppERKc := x1 - x2;
  observable_task0_model0_nakakuki2_ppERKc := ppERKc;
  observable_task0_model0_nakakuki2_pcFOS := pcFOS;
  observable_task0_model0_nakakuki2_cFOSm := cFOSm;

  // Reactions:
  _1_PhIM_1: => x1; compartment*(-x1/tau1 + K1*L/tau1);  // isVersionOf GO:0000187
  _1_PhIM_2: => x2; compartment*(-x2/tau2 + K2*L/tau2);  // isVersionOf GO:0043407
  _2a_ppERKn: => ppERKn; compartment*(k1*ppERKc - k2*ppERKn - k3*DUSP*ppERKn);  // modifiers: DUSP, ppERKc; hasPart GO:0000189 GO:0017017 reactome:REACT_1866 reactome:REACT_487
    k3 = 14; k2 = 50; k1 = 15;
  _2b_DUSP: => DUSP; compartment*k*ppERKn;  // modifiers: ppERKn; isVersionOf GO:0004707
    k = 1;
  _3_pRSKn: => pRSKn; compartment*(k4*ppERKn - k5*pRSKn);  // modifiers: ppERKn; isVersionOf reactome:REACT_20562 reactome:REACT_20510.1
    k5 = 0.15; k4 = 0.1;
  _4_cFOSp: => cFOSp; compartment*((ppERKn*pRSKn)^n/(k6^n + (ppERKn*pRSKn)^n) - k7*cFOSp);  // modifiers: pRSKn, ppERKn; isVersionOf GO:0009299
    n = 1.1; k6 = 0.13;
  _5_cFOSm: => cFOSm; compartment*(k7*cFOSp - k8*cFOSm);  // modifiers: cFOSp; isVersionOf GO:0006397
    k8 = 0.08;
  _6_cFOS: => cFOS; compartment*(k9*cFOSm - k10*cFOS - k11*cFOS*ppERKc + k13*pcFOS);  // modifiers: pcFOS, ppERKc, cFOSm; isVersionOf GO:0006412
    k9 = 0.3; k10 = 0.3;
  _7_pcFOS: => pcFOS; compartment*(k11*cFOS*ppERKc - k12*pcFOS - k13*pcFOS);  // modifiers: ppERKc, cFOS; isVersionOf ec-code:2.7.11.24 reactome:REACT_21251
    k12 = 0.001;

  // Unit definitions:
  unit substance = 1e-3 mole;
  unit time = 60 second;
  unit volume = 1e-3 litre;
end
