// SBML level 3 version 1

model naresh1()

  // Compartments:
  compartment default = 1;

  // Species:
  species A in default = 500; A is "AIDS";
  species $EXT in default = 1;
  species I1 in default = 2000; I1 is "TB infected";
  species I2 in default = 3000; I2 is "HIV infected";
  species N in default = 20000; N is "Total population";

  // Parameters:
  Q0 = 2000;
  alpha = 1;
  beta1 = 0.925;
  beta2 = 0.365;
  beta3 = 1.15;
  d = 0.02;
  delta = 0.2;
  lambda = 0.3;

  // Assignment rules:
  observable_task0_model0_naresh1_A := A;
  observable_task0_model0_naresh1_I1 := I1;
  observable_task0_model0_naresh1_I2 := I2;
  observable_task0_model0_naresh1_N := N;
  observable_task1_model1_naresh1_A := A;
  observable_task1_model1_naresh1_I1 := I1;
  observable_task1_model1_naresh1_I2 := I2;
  observable_task1_model1_naresh1_N := N;

  // Reactions:
  v_1: $EXT -> N; Q0;
  v_10: I2 -> $EXT; d*I2;
  v_11: A -> $EXT; alpha*A;
  v_12: A -> $EXT; d*A;
  v_2: N -> $EXT; d*N;
  v_3: N -> $EXT; alpha*A;  // modifiers: A
  v_4: $EXT -> I1; beta1*(N - I1 - I2 - A)*I1/N;  // modifiers: A, I2, N
  v_5: I1 -> I2; beta3*I1*I2/N;  // modifiers: N
  v_6: I1 -> $EXT; lambda*I1;
  v_7: I1 -> $EXT; d*I1;
  v_8: $EXT -> I2; beta2*(N - I1 - I2 - A)*I2/N;  // modifiers: I1, A, N
  v_9: I2 -> A; delta*I2;
end
