// SBML level 2 version 4

model neumann1()

  // Compartments:
  compartment default = 1;  // GO:0005623

  // Species:
  species C3 in default = 1.443404;  // isVersionOf uniprot:P42574
  species C3_star in default = 0; C3_star is "C3*";  // isVersionOf uniprot:P42574
  species C8 in default = 64.47652;  // isVersionOf uniprot:Q14790
  species C8_star in default = 0; C8_star is "C8*";  // isVersionOf uniprot:Q14790
  species FL in default = 7.398562;  // isVersionOf uniprot:O15519
  species FS in default = 5.083923;  // isVersionOf uniprot:O15519
  species IKK in default = 5.772825;  // isVersionOf uniprot:O15111 uniprot:O14920 uniprot:Q9Y6K9
  // Initial concentration of anti-CD95 = 113.22nM is equivalent to 1500ng/ml. The model as such reproduces the figure 5D (black plot: i.e. anti-CD95=1500ng/ml).
  // To obtain the blue (anti-CD95=500ng/ml) and red (250ng/ml) plot of figure 5D, the model parameter [L] (initial concentration of anti-CD95 [L]) should be set as 37.74nM and 18.87nM respectively.
  species L in default = 113.22;  // isVersionOf uniprot:Q0VHD7
  species L_RF in default = 0; L_RF is "L:RF";  // isPartOf uniprot:Q0VHD7 uniprot:P25445 uniprot:Q13158
  species L_RF_C8 in default = 0; L_RF_C8 is "L:RF:C8";  // hasPart uniprot:Q13158 uniprot:P25445 uniprot:Q14790 uniprot:Q0VHD7
  species L_RF_C8_FS in default = 0; L_RF_C8_FS is "L:RF:C8:FS";  // hasPart uniprot:P25445 uniprot:Q13158 uniprot:Q14790 uniprot:O15519
  species L_RF_FL in default = 0; L_RF_FL is "L:RF:FL";  // hasPart uniprot:P25445 uniprot:Q13158 uniprot:O15519 uniprot:Q0VHD7
  species L_RF_FL_FL in default = 0; L_RF_FL_FL is "L:RF:FL:FL";  // hasPart uniprot:P25445 uniprot:Q13158 uniprot:O15519 uniprot:Q0VHD7
  species L_RF_FL_FS in default = 0; L_RF_FL_FS is "L:RF:FL:FS";  // hasPart uniprot:P25445 uniprot:Q13158 uniprot:O15519 uniprot:Q0VHD7
  species L_RF_FS in default = 0; L_RF_FS is "L:RF:FS";  // hasPart uniprot:P25445 uniprot:Q13158 uniprot:O15519 uniprot:Q0VHD7
  species L_RF_FS_FS in default = 0; L_RF_FS_FS is "L:RF:FS:FS";  // hasPart uniprot:P25445 uniprot:Q13158 uniprot:O15519 uniprot:Q0VHD7
  species NF_kB_IkB in default = 4.739546; NF_kB_IkB is "NF-kB:IkB";  // isVersionOf uniprot:P19838 uniprot:P25963 reactome:REACT_7272
  species NF_kB_IkB_P in default = 0; NF_kB_IkB_P is "NF-kB:IkB:P";  // hasVersion uniprot:P19838 uniprot:P25963 reactome:REACT_7645 reactome:REACT_7108
  species NF_kB_star in default = 0; NF_kB_star is "NF-kB*";  // isVersionOf uniprot:P19838 GO:0071159
  species RF in default = 91.26592;  // hasPart uniprot:P25445 uniprot:Q13158
  species p43_FLIP in default = 0; p43_FLIP is "p43-FLIP";  // hasPart uniprot:O15519
  species p43_FLIP_IKK_star in default = 0; p43_FLIP_IKK_star is "p43-FLIP:IKK*";
  species p43_p41 in default = 0; p43_p41 is "p43/p41";  // hasPart uniprot:Q14790

  // Parameters:
  k1 = 1;
  k10 = 0.1205258;
  k11 = 0.02891451;
  k12 = 0.1502914;
  k13 = 0.0007204261;
  k14 = 0.3588224;
  k15 = 3.684162;
  k16 = 0.02229912;
  k17 = 0.0064182;
  k2 = 0.0001277248;
  k3 = 0.6693316;
  k4 = 1e-5;
  k5 = 0.0005946569;
  k6 = 0.9999999;
  k7 = 0.8875063;
  k8 = 0.0008044378;
  k9 = 0.002249759;

  // Assignment rules:
  observable_plot2_NF_kB_IkB_P_datagen1 := task2_model2_neumann1_NF_kB_IkB_P;
  observable_task2_model2_neumann1_NF_kB_IkB := NF_kB_IkB;
  observable_plot2_C3_datagen1 := task2_model2_neumann1_C3;
  observable_plot2_C8_datagen1 := task2_model2_neumann1_C8;
  observable_plot1_NF_kB_IkB_P_datagen1 := task1_model1_neumann1_NF_kB_IkB_P;
  observable_plot1_NF_kB_IkB_datagen1 := task1_model1_neumann1_NF_kB_IkB;
  observable_plot1_C3_datagen1 := task1_model1_neumann1_C3;
  observable_plot1_C8_datagen1 := task1_model1_neumann1_C8;
  observable_task0_model0_neumann1_NF_kB_IkB_P := NF_kB_IkB_P;
  observable_plot0_NF_kB_IkB_datagen1 := task0_model0_neumann1_NF_kB_IkB;
  observable_task0_model0_neumann1_C3 := C3;
  observable_task0_model0_neumann1_C8 := C8;

  // Reactions:
  reaction_1: RF + L => L_RF; default*k1*L*RF;  // isVersionOf GO:0006461
  reaction_10: FS + L_RF_FL => L_RF_FL_FS; default*k7*L_RF_FL*FS;  // isVersionOf GO:0006461
  reaction_11: C8 + L_RF_FS => L_RF_C8_FS; default*k5*L_RF_FS*C8;  // isVersionOf GO:0006461
  reaction_12: FL + L_RF_FS => L_RF_FL_FS; default*k6*L_RF_FS*FL;  // isVersionOf GO:0006461
  reaction_13: FS + L_RF_FS => L_RF_FS_FS; default*k7*L_RF_FS*FS;  // isVersionOf GO:0006461
  reaction_14: p43_p41 + p43_p41 => C8_star; default*k8*p43_p41*p43_p41;
  reaction_15: C8_star + C3 => C8_star + C3_star; default*k9*C3*C8_star;
  reaction_16: C3_star + C8 => C3_star + p43_p41; default*k10*C8*C3_star;
  reaction_17: C8_star => ; default*k11*C8_star;  // isVersionOf GO:0030163
  reaction_18: C3_star => ; default*k12*C3_star;  // isVersionOf GO:0030163
  reaction_19: IKK + p43_FLIP => p43_FLIP_IKK_star; default*k13*p43_FLIP*IKK;  // isVersionOf GO:0006461
  reaction_2: C8 + L_RF => L_RF_C8; default*k2*L_RF*C8;  // isVersionOf GO:0006461
  reaction_20: p43_FLIP_IKK_star + NF_kB_IkB => p43_FLIP_IKK_star + NF_kB_IkB_P; default*k14*NF_kB_IkB*p43_FLIP_IKK_star;  // isVersionOf GO:0006468 GO:0008384 ec-code:2.7.11.10
  reaction_21: NF_kB_IkB_P => NF_kB_star; default*k15*NF_kB_IkB_P;
  reaction_22: p43_FLIP_IKK_star => ; default*k16*p43_FLIP_IKK_star;  // isVersionOf GO:0030163
  reaction_23: NF_kB_star => ; default*k17*NF_kB_star;  // isVersionOf GO:0030163
  reaction_3: FL + L_RF => L_RF_FL; default*k3*L_RF*FL;  // isVersionOf GO:0006461
  reaction_4: FS + L_RF => L_RF_FS; default*k4*L_RF*FS;  // isVersionOf GO:0006461
  reaction_5: C8 + L_RF_C8 => p43_p41 + p43_p41; default*k5*L_RF_C8*C8;
  reaction_6: FL + L_RF_C8 => p43_FLIP; default*k6*L_RF_C8*FL;
  reaction_7: FS + L_RF_C8 => L_RF_C8_FS; default*k7*L_RF_C8*FS;  // isVersionOf GO:0006461
  reaction_8: C8 + L_RF_FL => p43_FLIP; default*k5*L_RF_FL*C8;
  reaction_9: FL + L_RF_FL => L_RF_FL_FL; default*k6*L_RF_FL*FL;  // isVersionOf GO:0006461

  // Unit definitions:
  unit substance = 1e-9 mole;
  unit time = 60 second;
end
