// SBML level 3 version 1

model nielsen()

  // Compartments:
  compartment default_compartment = 1;

  // Species:
  species ACA in default_compartment = 0.0738334;  // CHEBI:15343 kegg.compound:C00084
  species ADP in default_compartment = 0.108367;  // CHEBI:16761 kegg.compound:C00008
  species $ADPo in default_compartment = 1.1;  // CHEBI:16761 kegg.compound:C00008
  species AMP in default_compartment = 0.00261149;  // CHEBI:16027 kegg.compound:C00020
  species ATP in default_compartment = 4.49064;  // CHEBI:15422 kegg.compound:C00002
  species $ATPo in default_compartment = 3.5;  // CHEBI:15422 kegg.compound:C00002
  species BPG in default_compartment = 0.299109;  // CHEBI:19324
  species EtOH in default_compartment = 0.339813;  // CHEBI:16236 kegg.compound:C00469
  species F6P in default_compartment = 0.65939;  // CHEBI:15946 kegg.compound:C00085
  species FBP in default_compartment = 0.00770135;  // CHEBI:16905 kegg.compound:C00354
  species GAP in default_compartment = 0.00190919;  // CHEBI:29052 kegg.compound:C00118
  species Glc in default_compartment = 0.0112817;  // kegg.compound:C00293 CHEBI:17234
  species $Glco in default_compartment = 50;
  species NAD in default_compartment = 3.62057;  // encodes CHEBI:13389
  species NADH in default_compartment = 0.616118;  // CHEBI:16908 kegg.compound:C00004
  species $NADHo in default_compartment = 0.24;  // CHEBI:16908 kegg.compound:C00004
  species $NADo in default_compartment = 4;  // CHEBI:13389
  species $P in default_compartment = 0;
  species PEP in default_compartment = 0.00211259;  // CHEBI:44897 kegg.compound:C00074
  species Pyr in default_compartment = 0.00422702;  // CHEBI:32816 kegg.compound:C00022

  // Parameters:
  K1ATP = 0.063;
  K1Glc = 0.1;
  K2 = 0.0016;
  K2mATP = 0.01;
  K4G = 1;
  K4N = 1;
  K6ADP = 0.3;
  K6PEP = 0.2;
  K7 = 0.3;
  V1m = 0.5;
  V2m = 1.5;
  V4m = 10;
  V6m = 10;
  V7m = 2;
  k0 = 0.011;
  k3b = 50;
  k3f = 1;
  k5f = 1;
  k5r = 0.5;
  k8f = 1;
  k8r = 0.000143;
  kappa2 = 0.017;
  kf10 = 0.05;
  kf9 = 10;
  kr9 = 10;

  // Assignment rules:
  observable_task2_model2_nielsen_NADH := NADH;
  observable_task3_model3_nielsen_NADH := NADH;
  observable_task1_model1_nielsen_NADH := NADH;
  observable_task0_model0_nielsen_NADH := NADH;

  // Reactions:
  v_1: $Glco -> Glc; k0*Glco;
  v_10: EtOH -> $P; k0*EtOH;
  v_11: ACA -> $P; k0*ACA;
  v_12: Pyr -> $P; k0*Pyr;
  v_13: PEP -> $P; k0*PEP;
  v_14: BPG -> $P; k0*BPG;
  v_15: GAP -> $P; k0*GAP;
  v_16: FBP -> $P; k0*FBP;
  v_17: F6P -> $P; k0*F6P;
  v_18: F6P -> $P; kf10*F6P;
  v_19: Glc -> $P; k0*Glc;
  v_2: Glc + ATP -> F6P + ADP; V1m*ATP*Glc/(K1Glc + Glc)/(K1ATP + ATP);
  v_20: $NADo -> NAD; k0*NADo;
  v_21: NAD -> $P; k0*NAD;
  v_22: $NADHo -> NADH; k0*NADHo;
  v_23: NADH -> $P; k0*NADH;
  v_24: $ADPo -> ADP; k0*ADPo;
  v_25: ADP -> $P; k0*ADP;
  v_26: $ATPo -> ATP; k0*ATPo;
  v_27: ATP -> $P; k0*ATP;
  v_28: AMP -> $P; k0*AMP;
  v_29: AMP + ATP -> 2 ADP; kf9*AMP*ATP - kr9*ADP^2;
  v_3: F6P + ATP -> FBP + ADP; V2m*F6P^2/(K2 + K2*kappa2*ATP^2/AMP^2 + F6P^2)*(ATP/(K2mATP + ATP));  // modifiers: AMP
  v_4: FBP -> 2 GAP; k3f*FBP - k3b*GAP^2;
  v_5: GAP + NAD -> BPG + NADH; V4m*GAP*NAD/(K4G + GAP)/(K4N + NAD);
  v_6: BPG + ADP -> PEP + ATP; k5f*BPG*ADP - k5r*PEP*ATP;
  v_7: PEP + ADP -> Pyr + ATP; V6m*ADP*PEP/(K6PEP + PEP)/(K6ADP + ADP);
  v_8: Pyr -> ACA; V7m*Pyr/(K7 + Pyr);
  v_9: ACA + NADH -> EtOH + NAD; k8f*ACA*NADH - k8r*EtOH*NAD;
end
