// SBML level 3 version 1

model nyabadza1()

  // Compartments:
  compartment default = 1;

  // Species:
  species A in default = 0; A is "AIDS";
  species $EXT in default = 1;
  species I in default = 1000; I is "HIV infected";
  species S in default = 500000; S is "Susceptible";
  species T in default = 0; T is "Treated";

  // Parameters:
  b = 0.03;
  beta_1 = 0.004;
  beta_2 = 0.04;
  beta_3 = 0.3;
  c = 4;
  d = 0.4;
  epsilon = 0.06;
  mu = 0.02;
  mu_0 = 0.001;
  nu_1 = 0.6;
  nu_2 = 0.7;
  p_1 = 0.5;
  pi = 10000;
  q = 0.01;
  rho = 0;
  sigma = 0.09;
  tau = 15;

  // Assignment rules:
  lambda := (beta_1*I + beta_2*T + beta_3*A)/(S + I + T + A);
  observable_task1_model0_nyabadza1_S := S;
  observable_task1_model0_nyabadza1_I := I;
  observable_task1_model0_nyabadza1_T := T;
  observable_task1_model0_nyabadza1_A := A;

  // Reactions:
  v_1: $EXT -> S; pi;
  v_10: $EXT -> T; b*q*epsilon*exp(-mu_0*tau)*I;  // modifiers: I
  v_11: A -> T; rho*A;
  v_12: $EXT -> T; b*q*epsilon*exp(-mu_0*tau)*A;  // modifiers: A
  v_13: T -> $EXT; mu*T;
  v_14: T -> A; nu_2*T;
  v_15: $EXT -> T; b*q*epsilon*exp(-mu_0*tau)*T;
  v_16: $EXT -> A; b*(1 - q)*epsilon*exp(-mu_0*tau)*T;  // modifiers: T
  v_17: $EXT -> A; b*(1 - q)*epsilon*exp(-mu_0*tau)*I;  // modifiers: I
  v_18: A -> $EXT; mu*A;
  v_19: A -> $EXT; d*A;
  v_2: $EXT -> S; b*(1 - epsilon)*exp(-mu_0*tau)*I;  // modifiers: I
  v_20: $EXT -> A; b*(1 - q)*epsilon*exp(-mu_0*tau)*A;
  v_3: $EXT -> S; b*(1 - epsilon)*exp(-mu_0*tau)*T;  // modifiers: T
  v_4: $EXT -> S; b*(1 - epsilon)*exp(-mu_0*tau)*A;  // modifiers: A
  v_5: S -> I; c*(1 - p_1)*lambda*S;
  v_6: S -> $EXT; mu*S;
  v_7: I -> $EXT; mu*I;
  v_8: I -> T; sigma*I;
  v_9: I -> A; nu_1*I;
end
