// SBML level 3 version 1

model olsen()
  // model units - substance: umol, time: s, volume: L, extent: uM

  // Compartments:
  compartment default_compartment = 1;

  // Species:
  species Ar in default_compartment = 0;
  species ArH in default_compartment = 300;
  species H2O2 in default_compartment = 0.7;
  species $NAD in default_compartment = 0;
  species $NAD2 in default_compartment = 0;
  species NADH in default_compartment = 0;
  species $NADHres in default_compartment = 1;
  species NADrad in default_compartment = 0;
  species O2 in default_compartment = 12;
  species $O2g in default_compartment = 1;
  species coI in default_compartment = 0;
  species coII in default_compartment = 0;
  species coIII in default_compartment = 0;
  species per2 in default_compartment = 0;
  species per3 in default_compartment = 1.2;
  species super in default_compartment = 0;

  // Parameters:
  k1 = 3e-6;
  k10 = 1.8;
  k11 = 0.1;
  k12 = 0.08;
  k13b = 0.006;
  k13f = 0.072;
  k14 = 0.7;
  k2 = 18;
  k3 = 0.15;
  k4 = 0.0052;
  k5 = 20;
  k6 = 17;
  k7 = 20;
  k8 = 40;
  k9 = 60;

  // Assignment rules:
  observable_task0_model0_olsen_super := super;

  // Reactions:
  v_1: NADH + O2 -> H2O2 + $NAD; k1*NADH*O2;
  v_10: per3 + NADrad -> per2 + $NAD; k10*per3*NADrad;
  v_11: O2 + per2 -> coIII; k11*per2*O2;
  v_12: $NADHres -> NADH; k12;
  v_13: $O2g -> O2; k13f;
  v_14: O2 -> $O2g; k13b*O2;
  v_15: NADH + Ar -> NADrad + ArH; k14*Ar*NADH;
  v_2: per3 + H2O2 -> coI; k2*H2O2*per3;
  v_3: coI + ArH -> coII + Ar; k3*coI*ArH;
  v_4: coII + ArH -> per3 + Ar; k4*coII*ArH;
  v_5: O2 + NADrad -> super + $NAD; k5*NADrad*O2;
  v_6: per3 + super -> coIII; k6*super*per3;
  v_7: 2 super -> O2 + H2O2; k7*super*super;
  v_8: NADrad + coIII -> coI + $NAD; k8*coIII*NADrad;
  v_9: 2 NADrad -> $NAD2; k9*NADrad*NADrad;

  // Unit definitions:
  unit s = second;
  unit uM = 1e-6 mole / litre;
  unit umol = 1e-6 mole;
  unit L = litre;
end
