// SBML level 3 version 1

model pankavich1()

  // Compartments:
  compartment default = 1;

  // Species:
  species II in default = 0;
  species T in default = 400000;
  species V in default = 100000;

  // Parameters:
  NN = 2000;
  dI = 1;
  dT = 0.01;
  dV = 23;
  k = 2.4e-8;
  lambda = 10000;

  // Assignment rules:
  observable_task0_model0_pankavich2016_fig1_T := T;
  observable_task0_model0_pankavich2016_fig1_V := V;
  observable_task0_model0_pankavich2016_fig1_II := II;

  // Reactions:
  v1: -> T; lambda;
  v2: T -> ; dT*T;
  v3: T -> II; k*T*V;  // modifiers: V
  v4: II -> ; dI*II;
  v5: -> V; dI*NN*II;  // modifiers: II
  v6: V -> ; dV*V;
end
