// SBML level 3 version 1

model pankavich2()

  // Compartments:
  compartment default = 1;

  // Species:
  species II in default = 0;
  species L in default = 0;
  species T in default = 400000;
  species V in default = 100000;

  // Parameters:
  NN = 2000;
  alpha = 0.01;
  dI = 1;
  dL = 0.004;
  dT = 0.01;
  dV = 23;
  k = 2.4e-8;
  lambda = 10000;
  p = 0.1;

  // Assignment rules:
  observable_task0_model0_pankavich2_T := T;
  observable_task0_model0_pankavich2_L := L;
  observable_task0_model0_pankavich2_V := V;
  observable_task0_model0_pankavich2_II := II;

  // Reactions:
  v1: -> T; lambda;
  v2: T -> ; dT*T;
  v3: T -> II; k*T*V;  // modifiers: V
  v4: II -> ; dI*II;
  v5: -> V; dI*NN*II;  // modifiers: II
  v6: V -> ; dV*V;
  v7: II -> L; k*p*T*V;  // modifiers: T, V
  v8: L -> II; alpha*L;
  v9: L -> ; dL*L;
end
