// SBML level 2 version 4

model passos1()

  // Compartments:
  compartment cell = 1;  // isVersionOf GO:0005623

  // Species:
  substanceOnly species ATMA in cell = 0;  // isVersionOf uniprot:Q13315
  substanceOnly species ATMI in cell = 200;  // isVersionOf uniprot:Q13315
  substanceOnly species GADD45 in cell = 0;  // hasPart uniprot:O95257 uniprot:O75293 uniprot:P24522
  substanceOnly species IR in cell = 0;
  substanceOnly species Mdm2 in cell = 5;  // isVersionOf uniprot:Q00987
  substanceOnly species Mdm2_P in cell = 0;  // isVersionOf uniprot:Q00987
  substanceOnly species Mdm2_mRNA in cell = 10;  // encodes uniprot:Q00987
  substanceOnly species Mdm2_p53 in cell = 95;  // hasPart uniprot:P04637 uniprot:Q00987
  substanceOnly species ROS in cell = 0;  // isVersionOf CHEBI:26523
  substanceOnly species $Sink in cell = 1;
  substanceOnly species $Source in cell = 1;
  substanceOnly species basalROS in cell = 10;  // isVersionOf CHEBI:26523
  substanceOnly species damDNA in cell = 0;  // isVersionOf CHEBI:16991
  substanceOnly species p21 in cell = 0;  // isVersionOf uniprot:P38936
  substanceOnly species p21_basal in cell = 7;  // isVersionOf uniprot:P38936
  substanceOnly species p21_mRNA in cell = 1;  // encodes uniprot:P38936
  substanceOnly species p21step1 in cell = 0;  // isVersionOf uniprot:P38936
  substanceOnly species p21step2 in cell = 0;  // isVersionOf uniprot:P38936
  substanceOnly species p38 in cell = 100;  // isVersionOf uniprot:Q16539
  substanceOnly species p38_P in cell = 0;  // isVersionOf uniprot:Q16539
  substanceOnly species p53 in cell = 5;  // isVersionOf uniprot:P04637
  substanceOnly species p53_P in cell = 0;  // isVersionOf uniprot:P04637
  substanceOnly species p53_mRNA in cell = 10;  // encodes uniprot:P04637

  // Parameters:
  kGADD45 = 4e-6;
  kactATM = 2e-5;
  kbinMdm2p53 = 0.001155;
  kdam = 0.007;
  kdamBasalROS = 1e-9;
  kdamROS = 1e-5;
  kdegATMMdm2 = 0.0004;
  kdegGADD45 = 1e-5;
  kdegMdm2 = 0.000433;
  kdegMdm2mRNA = 0.0001;
  kdegp21 = 0.00019;
  kdegp21mRNA = 2.4e-5;
  kdegp53 = 0.000825;
  kdegp53mRNA = 0.0001;
  kdegp53mdm2ind = 8.25e-7;
  kdephosMdm2 = 0.5;
  kdephosp38 = 0.1;
  kdephosp53 = 0.5;
  kgenROSp38 = 0.00045;
  kinactATM = 0.0005;
  kp38ROS = 1;
  kphosMdm2 = 2;
  kphosp38 = 0.008;
  kphosp53 = 0.006;
  krelMdm2p53 = 1.155e-6;
  kremROS = 0.000383;
  krepair = 6e-5;
  ksynMdm2 = 0.000495;
  ksynMdm2mRNA = 0.0001;
  ksynp21mRNAp53 = 6e-8;
  ksynp21mRNAp53P = 6e-6;
  ksynp21step1 = 0.0004;
  ksynp21step2 = 4e-5;
  ksynp21step3 = 4e-5;
  ksynp53 = 0.006;
  ksynp53mRNA = 0.001;

  // Assignment rules:
  observable_task0_model0_passos1_p21 := p21;
  observable_task0_model0_passos1_p53_P := p53_P;
  observable_task0_model0_passos1_damDNA := damDNA;

  // Reactions:
  ATMInactivation: ATMA => ATMI; kinactATM*ATMA;  // isVersionOf GO:0006464
  ATMactivation: ATMI + damDNA => ATMA + damDNA; kactATM*damDNA*ATMI;  // isPartOf GO:0006974
  DNAdamage: IR => damDNA + IR; kdam*IR;  // isVersionOf GO:0006950
  DNArepair: damDNA => $Sink; krepair*damDNA;  // isVersionOf GO:0006281
  GADD45activation2: p21 => GADD45 + p21; kGADD45*p21;  // isVersionOf GO:0006412
  GADD45degradation: GADD45 => $Sink; kdegGADD45*GADD45;  // isVersionOf GO:0009056
  Mdm2Degradation: Mdm2 => $Sink; kdegMdm2*Mdm2;  // isVersionOf GO:0009056
  Mdm2Pdegradation: Mdm2_P => $Sink; kdegATMMdm2*Mdm2_P;  // isVersionOf GO:0009056
  Mdm2Synthesis: Mdm2_mRNA => Mdm2 + Mdm2_mRNA; ksynMdm2*Mdm2_mRNA;  // isVersionOf GO:0006412
  Mdm2dephosorylation: Mdm2_P => Mdm2; kdephosMdm2*Mdm2_P;  // isVersionOf GO:0016311
  Mdm2mRNADegradation: Mdm2_mRNA => $Sink; kdegMdm2mRNA*Mdm2_mRNA;  // isVersionOf GO:0009056
  Mdm2mRNASynthesis1: p53 => Mdm2_mRNA + p53; ksynMdm2mRNA*p53;  // isVersionOf GO:0006351
  Mdm2mRNASynthesis2: p53_P => Mdm2_mRNA + p53_P; ksynMdm2mRNA*p53_P;  // isVersionOf GO:0006351
  Mdm2phoshorylation: ATMA + Mdm2 => ATMA + Mdm2_P; kphosMdm2*Mdm2*ATMA;  // isVersionOf GO:0016310
  P53_Mdm2Binding: Mdm2 + p53 => Mdm2_p53; kbinMdm2p53*p53*Mdm2;  // isVersionOf GO:0006461
  P53_Mdm2Release: Mdm2_p53 => Mdm2 + p53; krelMdm2p53*Mdm2_p53;  // isVersionOf GO:0043241
  ROSDNAdamage: ROS => damDNA + ROS; kdamROS*ROS;  // isVersionOf GO:0034614
  ROSgenerationP38: p38_P => ROS + p38_P; kgenROSp38*p38_P*kp38ROS;  // isVersionOf GO:0052064
  ROSremoval: ROS => $Sink; kremROS*ROS;  // isVersionOf GO:0009056
  basalROSDNAdamage: basalROS => damDNA + basalROS; kdamBasalROS*basalROS;  // isVersionOf GO:0034614
  p21Synthesis1: p21_mRNA => p21step1 + p21_mRNA; ksynp21step1*p21_mRNA;  // isVersionOf GO:0006412
  p21Synthesis2: p21step1 => p21step2; ksynp21step2*p21step1;  // isVersionOf GO:0006412
  p21Synthesis3: p21step2 => p21; ksynp21step3*p21step2;  // isVersionOf GO:0006412
  p21degradation: p21 => $Sink; kdegp21*p21;  // isVersionOf GO:0009056
  p21mRNADegradation: p21_mRNA => $Sink; kdegp21mRNA*p21_mRNA;  // isVersionOf GO:0009056
  p21mRNASynthesis1: p53 => p21_mRNA + p53; ksynp21mRNAp53*p53;  // isVersionOf GO:0006351
  p21mRNASynthesis2: p53_P => p21_mRNA + p53_P; ksynp21mRNAp53P*p53_P;  // isVersionOf GO:0006351
  p38activation: GADD45 + p38 => GADD45 + p38_P; kphosp38*p38*GADD45;  // isVersionOf GO:0006464
  p38inactivation: p38_P => p38; kdephosp38*p38_P;  // isVersionOf GO:0006464
  p53Degradation: Mdm2_p53 => Mdm2; kdegp53*Mdm2_p53;  // isVersionOf GO:0009056
  p53Mdm2IndepDegradation1: p53_P => $Sink; kdegp53mdm2ind*p53_P;  // isVersionOf GO:0009056
  p53Mdm2IndepDegradation2: p53 => $Sink; kdegp53mdm2ind*p53;  // isVersionOf GO:0009056
  p53Synthesis: p53_mRNA => p53_mRNA + p53; ksynp53*p53_mRNA;  // isVersionOf GO:0006412
  p53dephosorylation: p53_P => p53; kdephosp53*p53_P;  // isVersionOf GO:0016310
  p53mRNADegradation: p53_mRNA => $Sink; kdegp53mRNA*p53_mRNA;  // isVersionOf GO:0009056
  p53mRNASynthesis: $Source => p53_mRNA; ksynp53mRNA*Source;  // isPartOf GO:0006351
  p53phoshorylation: ATMA + p53 => ATMA + p53_P; kphosp53*p53*ATMA;  // isVersionOf GO:0016310

  // Events:
  stopp38ROS: at (time >= 691200): kp38ROS = 0.6;
  stopStress: at (time >= 172860): IR = 0;
  stressCell: at (time >= 172800): IR = 200;

  // Unit definitions:
  unit substance = item;
end
