// SBML level 3 version 1

model penkler2aa()

  // Compartments:
  compartment default = 1;

  // Species:
  species adpPF in default = 0.042;  // 3dmet:B01130 kegg.compound:C00008 pubchem.substance:3310
  species atpPF in default = 0.042;  // 3dmet:B01125 cas:56-65-5 kegg.compound:C00002 pubchem.substance:3304
  species b13pgPF in default = 0.0028;
  species dhapPF in default = 0.0028;  // 3dmet:B00029 pubchem.substance:3411 kegg.compound:C00111
  species f16bpPF in default = 0.0028;  // kegg.compound:C00354 pubchem.substance:3647 3dmet:B04673 cas:488-69-7
  species f6pPF in default = 0.0028;  // pubchem.substance:5887 kegg.compound:C02976
  species g3pPF in default = 0.0028;  // 3dmet:B01157 kegg.compound:C00093 CHEBI:15978 pubchem.substance:3393
  species g6pPF in default = 0.0028;  // 3dmet:B04630 CHEBI:4170 pubchem.substance:3392 kegg.compound:C00092
  species gapPF in default = 0.0028;  // CHEBI:29052 cas:591-57-1 3dmet:B01163 kegg.compound:C00118
  species glcEX in default = 13.1884;  // CHEBI:17634
  species glcPF in default = 0.0028;  // CHEBI:17634
  species glyEX in default = 0.0001;  // cas:56-81-5 3dmet:B00032 pubchem.substance:3416 kegg.compound:C00116
  species lacEX in default = 0.0001;  // kegg.compound:C01432 CHEBI:28358 cas:50-21-5 pubchem.substance:4615
  species lacPF in default = 0.0028;  // CHEBI:28358 cas:50-21-5 pubchem.substance:4615 kegg.compound:C01432
  species nadPF in default = 0.042;  // 3dmet:B01126 kegg.compound:C00003 CHEBI:15846 pubchem.substance:3305
  species nadhPF in default = 0.042;  // CHEBI:16908 pubchem.substance:3306 kegg.compound:C00004 3dmet:B01127
  species p2gPF in default = 0.0028;  // kegg.compound:C00631 CHEBI:17835 pubchem.substance:3904 3dmet:B01295
  species p3gPF in default = 0.0028;  // CHEBI:17794 pubchem.substance:3497 3dmet:B01185 kegg.compound:C00197
  species pepPF in default = 0.00028;  // pubchem.substance:3374 CHEBI:44897 cas:138-08-9 kegg.compound:C00074
  species pyrEX in default = 0.0001;  // 3dmet:B00006 kegg.compound:C00022 cas:127-17-3 pubchem.substance:3324
  species pyrPF in default = 0.0028;  // kegg.compound:C00022 CHEBI:32816 cas:127-17-3 3dmet:B00006

  // Parameters:
  ConcAdpPF = 0.0015;
  ConcAtpPF = 0.0015;
  ConcB13pgPF = 0.0001;
  ConcDhapPF = 0.0001;
  ConcF16bpPF = 0.0001;
  ConcF6pPF = 0.0001;
  ConcG6pPF = 0.0001;
  ConcGapPF = 0.0001;
  ConcGlcEX = 0.005;
  ConcGlcPF = 0.0001;
  ConcGly3pPF = 0.0001;
  ConcGlyEX = 3.79121e-11;
  ConcLacEX = 3.79121e-11;
  ConcLacPF = 0.0001;
  ConcNadPF = 0.0015;
  ConcNadhPF = 0.0015;
  ConcP2gPF = 0.0001;
  ConcP3gPF = 0.0001;
  ConcPepPF = 1e-5;
  ConcPyrEX = 3.79121e-11;
  ConcPyrPF = 0.0001;
  KadpPFvHK = 0.000846735;
  KadpPFvPFK = 0.00074176;
  KadpPFvPGK = 0.00015;
  KadpPFvPK = 0.000317;
  KatpPFvHK = 0.00069647;
  KatpPFvPFK = 0.0007862;
  KatpPFvPGK = 0.00077;
  Kb13pgPFvGAPDH = 2.359e-5;
  Kb13pgPFvPGK = 1.34e-5;
  KdPFvLACtr = 0.005;
  KdPFvPYRtr = 0.0007;
  KdhapPFvALD = 0.00011;
  KdhapPFvG3PDH = 0.00034;
  KdhapPFvTPI = 0.001954;
  KeqPFvALD = 9e-5;
  KeqPFvENO = 4.6;
  KeqPFvG3PDH = 32600;
  KeqPFvHK = 1310;
  KeqPFvPGI = 0.33;
  KeqPFvPGK = 3200;
  KeqPFvPGM = 0.19;
  KeqPFvTPI = 0.04545;
  Kf16bpPFvALD = 6.84e-5;
  Kf16bpPFvPFK = 0.003626;
  Kf6pPFvPFK = 0.00109454;
  Kf6pPFvPGI = 9.6651e-5;
  Kg3pPFvG3PDH = 0.00398;
  Kg6pPFvHK = 4.3e-5;
  Kg6pPFvPGI = 0.00100774;
  KgapPFvALD = 4.6e-5;
  KgapPFvGAPDH = 0.000917;
  KgapPFvTPI = 0.000337;
  KglcPFvHK = 0.000168613;
  KiadpPFvPK = 0.002;
  KiatpPFvHK = 0.026;
  KiatpPFvPK = 0.00182;
  KilacPFvPYRtr = 0.000358;
  KipepPFvPK = 0.00292;
  KipepPFvTPI = 1.59e-5;
  KipyrPFvLACtr = 0.00163;
  KipyrPFvPK = 0.105;
  KlacPFvLACtr = 0.0038;
  KlacPFvLDH = 0.003611;
  KmPFvATPASE = 0.0045;
  KmPFvGLCtr = 0.000213;
  KnadPFvG3PDH = 0.00051;
  KnadPFvGAPDH = 0.0005662;
  KnadPFvLDH = 0.000234;
  KnadhPFvG3PDH = 9e-5;
  KnadhPFvGAPDH = 2.87e-5;
  KnadhPFvLDH = 4.6e-5;
  Kp2gPFvENO = 0.000521;
  Kp2gPFvPGM = 0.000318;
  Kp3gPFvPGK = 0.000267;
  Kp3gPFvPGM = 0.00173;
  KpepPFvENO = 0.00129;
  KpepPFvPK = 0.000406;
  KpyrPFvLDH = 0.000133;
  KpyrPFvPYRtr = 0.0157;
  LPFvPK = 0.255;
  VPFvALD = 0.05695931;
  VPFvATPASE = 0.345;
  VPFvENO = 0.2862955;
  VPFvGAPDH = 0.6562634;
  VPFvGLCtr = 0.0468;
  VPFvHK = 0.083;
  VPFvLACtr = 0.598;
  VPFvPFK = 0.41;
  VPFvPGI = 0.8004283;
  VPFvPGM = 0.1869379;
  VPFvPK = 0.762;
  VPFvPYRtr = 0.216;
  VPFvTPI = 1.505996;
  Vex = 2637.68;
  VfPFvG3PDH = 0.012;
  VfPFvLDH = 0.5426124;
  Vpf = 28;
  VrPFvGAPDH = 0.2431991;
  VrPFvLDH = 0.2907923;
  VrPFvPGK = 0.3535332;
  alphaPFvGLCtr = 0.91;
  h = 4;
  kPFvGLYtr = 2;
  pHConversionFactor = 1;
  phEX = 7.1;
  phPF = 7.2;

  // Assignment rules:
  hPF := pHConversionFactor/10^phPF;
  hEX := pHConversionFactor/10^phEX;
  observable_plot1_lacEX_datagen1 := lacEX*0.0106/28*1000;
  observable_task0_model0_penkler2aa_glcEX := glcEX*0.0106/28*1000;
  observable_plot2_pyrEX_datagen1 := pyrEX*0.0106/28*1000;
  observable_plot3_glyEX_datagen1 := glyEX*0.0106/28*1000;

  // Reactions:
  vPFvALD: f16bpPF -> dhapPF + gapPF; VPFvALD*f16bpPF*(1 - dhapPF*gapPF/(KeqPFvALD*Vpf*f16bpPF))/(Kf16bpPFvALD*(1 + dhapPF/(KdhapPFvALD*Vpf) + f16bpPF/(Kf16bpPFvALD*Vpf) + gapPF/(KgapPFvALD*Vpf) + dhapPF*gapPF/(KdhapPFvALD*KgapPFvALD*Vpf^2)));  // ec-code:4.1.2.13
  vPFvATPASE: atpPF -> adpPF; VPFvATPASE*atpPF^5/(KmPFvATPASE^5*Vpf^4*(1 + atpPF^5/(KmPFvATPASE^5*Vpf^5)));
  vPFvENO: p2gPF -> pepPF; VPFvENO*p2gPF*(1 - pepPF/(KeqPFvENO*p2gPF))/(Kp2gPFvENO*(1 + p2gPF/(Kp2gPFvENO*Vpf) + pepPF/(KpepPFvENO*Vpf)));  // ec-code:4.2.1.11
  vPFvG3PDH: nadhPF + dhapPF -> g3pPF + nadPF; VfPFvG3PDH*dhapPF*nadhPF*(1 - g3pPF*nadPF/(KeqPFvG3PDH*dhapPF*nadhPF))/(KdhapPFvG3PDH*KnadhPFvG3PDH*Vpf*(1 + dhapPF/(KdhapPFvG3PDH*Vpf) + g3pPF/(Kg3pPFvG3PDH*Vpf))*(1 + nadhPF/(KnadhPFvG3PDH*Vpf) + nadPF/(KnadPFvG3PDH*Vpf)));
  vPFvGAPDH: gapPF + nadPF -> nadhPF + b13pgPF; (-(VrPFvGAPDH*b13pgPF*nadhPF/(Kb13pgPFvGAPDH*KnadhPFvGAPDH*Vpf)) + VPFvGAPDH*gapPF*nadPF/(KgapPFvGAPDH*KnadPFvGAPDH*Vpf))/((1 + b13pgPF/(Kb13pgPFvGAPDH*Vpf) + gapPF/(KgapPFvGAPDH*Vpf))*(1 + nadhPF/(KnadhPFvGAPDH*Vpf) + nadPF/(KnadPFvGAPDH*Vpf)));
  vPFvGLCtr: glcEX -> glcPF; Vpf*VPFvGLCtr*(glcEX/Vex - glcPF/Vpf)/(KmPFvGLCtr*(1 + glcEX/(KmPFvGLCtr*Vex) + glcPF/(KmPFvGLCtr*Vpf) + alphaPFvGLCtr*glcEX*glcPF/(KmPFvGLCtr^2*Vex*Vpf)));
  vPFvGLYtr: g3pPF -> glyEX; kPFvGLYtr*Vpf*(g3pPF/Vpf - glyEX/Vex);
  vPFvHK: glcPF + atpPF -> g6pPF + adpPF; VPFvHK*atpPF*(1 - adpPF*g6pPF/(KeqPFvHK*atpPF*glcPF))*glcPF/(KatpPFvHK*KglcPFvHK*Vpf*(1 + adpPF/(KadpPFvHK*Vpf) + atpPF/(KatpPFvHK*Vpf))*(1 + atpPF/(KiatpPFvHK*Vpf))*(1 + g6pPF/(Kg6pPFvHK*Vpf) + glcPF/(KglcPFvHK*Vpf)));  // ec-code:2.7.1.1
  vPFvLACtr: lacPF -> lacEX; KdPFvLACtr*(1 - hEX*Vpf*lacEX/(hPF*Vex*lacPF))*lacPF + VPFvLACtr*(1 - hEX*Vpf*lacEX/(hPF*Vex*lacPF))*lacPF/(KlacPFvLACtr*(1 + lacEX/(KlacPFvLACtr*Vex) + lacPF/(KlacPFvLACtr*Vpf) + pyrEX/(KipyrPFvLACtr*Vex) + pyrPF/(KipyrPFvLACtr*Vpf)));  // modifiers: pyrPF, pyrEX
  vPFvLDH: nadhPF + pyrPF -> lacPF + nadPF; (-(VrPFvLDH*lacPF*nadPF/(KlacPFvLDH*KnadPFvLDH*Vpf)) + VfPFvLDH*nadhPF*pyrPF/(KnadhPFvLDH*KpyrPFvLDH*Vpf))/((1 + nadhPF/(KnadhPFvLDH*Vpf) + nadPF/(KnadPFvLDH*Vpf))*(1 + lacPF/(KlacPFvLDH*Vpf) + pyrPF/(KpyrPFvLDH*Vpf)));
  vPFvPFK: atpPF + f6pPF -> adpPF + f16bpPF; VPFvPFK*atpPF*f6pPF/(KatpPFvPFK*Kf6pPFvPFK*Vpf*(1 + atpPF/(KatpPFvPFK*Vpf))*(1 + adpPF/(KadpPFvPFK*Vpf) + atpPF/(KatpPFvPFK*Vpf))*(1 + f16bpPF/(Kf16bpPFvPFK*Vpf) + f6pPF/(Kf6pPFvPFK*Vpf)));
  vPFvPGI: g6pPF -> f6pPF; VPFvPGI*(1 - f6pPF/(KeqPFvPGI*g6pPF))*g6pPF/(Kg6pPFvPGI*(1 + f6pPF/(Kf6pPFvPGI*Vpf) + g6pPF/(Kg6pPFvPGI*Vpf)));
  vPFvPGK: adpPF + b13pgPF -> atpPF + p3gPF; KadpPFvPGK*Kb13pgPFvPGK*KeqPFvPGK*VrPFvPGK*atpPF*(-1 + KeqPFvPGK*adpPF*b13pgPF/(atpPF*p3gPF))*p3gPF/(KatpPFvPGK^2*Kp3gPFvPGK^2*Vpf*(1 + adpPF/(KadpPFvPGK*Vpf) + atpPF/(KatpPFvPGK*Vpf))*(1 + b13pgPF/(Kb13pgPFvPGK*Vpf) + p3gPF/(Kp3gPFvPGK*Vpf)));
  vPFvPGM: p3gPF -> p2gPF; VPFvPGM*(1 - p2gPF/(KeqPFvPGM*p3gPF))*p3gPF/(Kp3gPFvPGM*(1 + p2gPF/(Kp2gPFvPGM*Vpf) + p3gPF/(Kp3gPFvPGM*Vpf)));
  vPFvPK: adpPF + pepPF -> atpPF + pyrPF; VPFvPK*adpPF*pepPF/(KadpPFvPK*KpepPFvPK*Vpf*(1 + adpPF/(KadpPFvPK*Vpf))*(1 + pepPF/(KpepPFvPK*Vpf))*(1 + LPFvPK*(1 + (adpPF/(KiadpPFvPK*Vpf) + atpPF/(KiatpPFvPK*Vpf))^h)*(1 + (pepPF/(KipepPFvPK*Vpf) + pyrPF/(KipyrPFvPK*Vpf))^h)));
  vPFvPYRtr: pyrPF -> pyrEX; KdPFvPYRtr*(1 - hEX*Vpf*pyrEX/(hPF*Vex*pyrPF))*pyrPF + VPFvPYRtr*(1 - hEX*Vpf*pyrEX/(hPF*Vex*pyrPF))*pyrPF/(KpyrPFvPYRtr*(1 + lacEX/(KilacPFvPYRtr*Vex) + lacPF/(KilacPFvPYRtr*Vpf) + pyrEX/(KpyrPFvPYRtr*Vex) + pyrPF/(KpyrPFvPYRtr*Vpf)));  // modifiers: lacEX, lacPF
  vPFvTPI: dhapPF -> gapPF; VPFvTPI*dhapPF*(1 - gapPF/(KeqPFvTPI*dhapPF))/(KdhapPFvTPI*(1 + dhapPF/(KdhapPFvTPI*Vpf) + gapPF/(KgapPFvTPI*Vpf) + pepPF/(KipepPFvTPI*Vpf)));  // modifiers: pepPF
end
