// SBML level 2 version 4

model pfeiffer1()

  // Compartments:
  compartment compartment = 1;

  // Species:
  species N1 in compartment = 100;  // isVersionOf GO:0005623
  species N2 in compartment = 0;  // isVersionOf GO:0005623
  species S in compartment = 0.1111111;  // isVersionOf PATO:0001021

  // Parameters:
  d = 1 dimensionless;
  v = 10 dimensionless;

  // Assignment rules:
  observable_task0_model0_pfeiffer1_S := S;
  observable_task0_model0_pfeiffer1_N2 := N2;
  observable_task0_model0_pfeiffer1_N1 := N1;

  // Reactions:
  resource_production: -> S; v;  // isVersionOf GO:0006754
  r2: S -> 10 N1; N1*S/(1 + S); r2 is "resource consumption and cell growth 1";  // isVersionOf GO:0016049
  r3: S -> N2; N2*20*S/(1 + S); r3 is "resource consumption and cell growth 2";  // isVersionOf GO:0016049
  cell_death_1: N1 -> ; d*N1;  // isVersionOf GO:0008219
  cell_death_2: N2 -> ; d*N2;  // isVersionOf GO:0008219

  // Events:
  at (time >= 15): N2 = 0.01;

  // Unit definitions:
  unit volume = dimensionless;
  unit time = dimensionless;
  unit substance = dimensionless;
end
