// SBML level 2 version 4

model queralt1()

  // Compartments:
  compartment compartment = 1;  // isVersionOf GO:0005623

  // Species:
  species $AA in compartment = 1;  // isVersionOf CHEBI:33704
  species $Cdc14 in compartment;  // isVersionOf uniprot:Q00684
  species Cdc15 in compartment = 0.0257;  // isVersionOf uniprot:P27636
  species $Cdc15_i in compartment; Cdc15_i is "inactive Cdc15";  // isVersionOf uniprot:P27636
  species Cdc20 in compartment = 0;  // isVersionOf uniprot:P26309
  species Cdh1 in compartment = 3.8e-5;  // isVersionOf uniprot:P53197
  species $Cdh1_i in compartment; Cdh1_i is "inactive Cdh1";  // isVersionOf uniprot:P53197
  species Clb2 in compartment = 0.997;  // isVersionOf uniprot:P24869
  species MEN in compartment = 8e-6;  // hasPart uniprot:P27636 uniprot:P38987
  species Net1 in compartment = 0.098;  // isVersionOf uniprot:P47035
  species Net1Cdc14 in compartment = 0.485;  // hasPart uniprot:Q00684 uniprot:P47035
  species $Net1P in compartment;  // isVersionOf kegg.compound:C00562 uniprot:P47035
  species $PP2A in compartment;  // isVersionOf uniprot:Q00362
  species Polo in compartment = 0.945;  // isVersionOf uniprot:P32562
  species PoloT in compartment = 0.99;  // isVersionOf uniprot:P32562
  species $Polo_i in compartment; Polo_i is "inactive Polo";  // isVersionOf uniprot:P32562
  species Tem1 in compartment = 0.00389;  // isVersionOf uniprot:P38987
  species $Tem1_i in compartment; Tem1_i is "inactive Tem1";  // isVersionOf uniprot:P38987
  species $degr in compartment = 1;
  species $securin in compartment;  // isVersionOf uniprot:P40316
  species securinT in compartment = 0.6;  // isVersionOf uniprot:P40316
  species securinseparase in compartment = 0.248; securinseparase is "securin:separase";  // hasPart uniprot:Q03018 uniprot:P40316
  species $separase in compartment;  // isVersionOf uniprot:Q03018
  species separaseT in compartment = 0.25;  // isVersionOf uniprot:Q03018

  // Parameters:
  Cdc14T = 0.5;
  Cdc15T = 1;
  Cdh1T = 1;
  var Cdk; Cdk is "Cdk activity";
  Inh = 0;
  Jcdc15 = 0.2;
  Jcdh = 0.0015;
  Jnet = 0.2;
  Jpolo = 0.25;
  Jtem1 = 0.005;
  Net1T = 1;
  PP2AT = 1;
  Tem1T = 1;
  kaacdc15 = 0.5;
  kaadclb2 = 2;
  kaapolo = 0.5;
  kaatem = 0.5;
  kacdc15 = 0.02;
  kad = 0.1;
  kadcdc20 = 2;
  kadcdh = 1;
  kadclb2 = 0.2;
  kadpolo = 0.25;
  kadsecurin = 2;
  kaicdc15 = 0.2;
  kaitem = 1;
  kap = 2;
  kapcdh = 1;
  kapolo = 0;
  katem = 0;
  kd = 0.45;
  kdcdc20 = 0.05;
  kdcdh = 0.01;
  kdclb2 = 0.03;
  kdpolo = 0.01;
  kdsecurin = 0.05;
  kdseparase = 0.004;
  ki = 20;
  kicdc15 = 0;
  kipolo = 0.1;
  kitem = 0.1;
  kp = 0.4;
  kpp = 0.1;
  kscdc20 = 0.015;
  ksclb2 = 0.03;
  kspolo = 0.01;
  kssecurin = 0.03;
  ksseparase = 0.001;
  lamen = 10;
  lanet = 500;
  lasecurin = 500;
  ldmen = 0.1;
  ldnet = 1;
  ldsecurin = 1;

  // Assignment rules:
  PP2A := (1 + kpp*ki*separase)/(1 + ki*separase)*PP2AT;
  Cdc15_i := Cdc15T - Cdc15;
  Cdc14 := Cdc14T - Net1Cdc14;
  Net1P := Net1T - Net1 - Net1Cdc14;
  Cdk := Clb2/(1 + Inh);
  Polo_i := PoloT - Polo;
  securin := securinT - securinseparase;
  Tem1_i := Tem1T - Tem1;
  Cdh1_i := Cdh1T - Cdh1;
  separase := separaseT - securinseparase;
  observable_task0_model0_queralt1_separase := separase;
  observable_task0_model0_queralt1_Net1P := Net1P;
  observable_task0_model0_queralt1_PP2A := PP2A;
  observable_task0_model0_queralt1_securinT := securinT;
  observable_task0_model0_queralt1_Cdc14 := Cdc14;
  observable_task0_model0_queralt1_MEN := MEN;
  observable_task0_model0_queralt1_Clb2 := Clb2;
  observable_task0_model0_queralt1_Cdh1 := Cdh1;
  observable_task0_model0_queralt1_Cdc20 := Cdc20;

  // Reactions:
  securinseparase_securindegradation: securinseparase -> $separase; (kdsecurin + kadsecurin*Cdc20)*securinseparase;  // modifiers: Cdc20; isVersionOf GO:0043241
  securinseparase_separase_degradation: securinseparase -> $securin; kdseparase*securinseparase; securinseparase_separase_degradation is "securin:separase separase degradation";  // isVersionOf GO:0043241
  v1: $AA -> Clb2; ksclb2;  // isVersionOf GO:0006412
  v10: $separase + separaseT -> $degr; kdseparase*separaseT;  // isVersionOf GO:0030163
  v11: $separase + $securin -> securinseparase; lasecurin*securin*separase - ldsecurin*securinseparase;  // isVersionOf GO:0006461
  Net1P_dephosphorylation: $Net1P -> Net1; (kad*Cdc14 + kd*PP2A)*(Net1P/(Jnet + Net1P));  // modifiers: PP2A, Clb2, Cdc14; isVersionOf GO:0016311
  Net1_phosphorylation: Net1 -> $Net1P; (kp*Cdk + kap*MEN)*(Net1/(Jnet + Net1 + Net1Cdc14));  // modifiers: Clb2, Net1Cdc14, MEN; isVersionOf GO:0016310
  v15: Net1 -> Net1Cdc14; lanet*Net1*Cdc14;  // modifiers: Cdc14; isVersionOf GO:0006461
  v16: Net1Cdc14 -> Net1; ldnet*Net1Cdc14;  // isVersionOf GO:0043241
  Net1Cdc14_phosphorylation: Net1Cdc14 -> $Net1P; (kp*Cdk + kap*MEN)*(Net1Cdc14/(Jnet + Net1 + Net1Cdc14));  // modifiers: Clb2, Net1, MEN; isVersionOf GO:0016310
  v18: $AA -> $Polo_i + PoloT; kspolo;  // isVersionOf GO:0006412
  v19: $Polo_i + PoloT -> $degr; (kdpolo + kadpolo*Cdh1)*PoloT;  // modifiers: Cdh1; isVersionOf GO:0030163
  v2: Clb2 -> $degr; (kdclb2 + kadclb2*Cdc20 + kaadclb2*Cdh1)*Clb2;  // modifiers: Cdh1, Cdc20; isVersionOf GO:0030163
  v20: $Polo_i -> Polo; (kapolo + kaapolo*Cdk)*((PoloT - Polo)/(Jpolo + PoloT - Polo));  // modifiers: PoloT; isVersionOf GO:0006464
  v21: Polo -> $Polo_i; kipolo*(Polo/(Jpolo + Polo));  // isVersionOf GO:0006464
  v22: Polo -> $degr; (kdpolo + kadpolo*Cdh1)*Polo;  // modifiers: Cdh1; isVersionOf GO:0030163
  v23: $Tem1_i -> Tem1; (katem + kaatem*Polo)*((Tem1T - Tem1)/(Jtem1 + Tem1T - Tem1));  // modifiers: Polo; isVersionOf GO:0006464
  v24: Tem1 -> $Tem1_i; (kitem + kaitem*PP2A)*(Tem1/(Jtem1 + Tem1));  // modifiers: PP2A; isVersionOf GO:0006464
  v25: $Cdc15_i -> Cdc15; (kacdc15 + kaacdc15*Cdc14)*((Cdc15T - Cdc15)/(Jcdc15 + Cdc15T - Cdc15));  // modifiers: Cdc14; isVersionOf GO:0006464
  v26: Cdc15 -> $Cdc15_i; (kicdc15 + kaicdc15*Cdk)*(Cdc15/(Jcdc15 + Cdc15));  // isVersionOf GO:0006464
  v27: $AA -> MEN; lamen*(Tem1 - MEN)*(Cdc15 - MEN);  // modifiers: Cdc15, Tem1; isVersionOf GO:0006412
  v28: MEN -> $degr; ldmen*MEN;  // isVersionOf GO:0030163
  Tem1_degradation_in_MEN: MEN -> ; (kitem + kaitem*PP2A)*(MEN/(Jtem1 + Tem1));  // modifiers: PP2A, Tem1; isVersionOf GO:0030163
  v3: $AA -> Cdc20; kscdc20;  // isVersionOf GO:0006412
  Cdc15_degradation_in_MEN: MEN -> ; (kicdc15 + kaicdc15*Cdk)*(MEN/(Jcdc15 + Cdc15));  // modifiers: Clb2, Cdc15; isVersionOf GO:0030163
  v4: Cdc20 -> $degr; (kdcdc20 + kadcdc20*Cdh1)*Cdc20;  // modifiers: Cdh1; isVersionOf GO:0030163
  v5: $Cdh1_i -> Cdh1; (kdcdh + kadcdh*Cdc14)*((Cdh1T - Cdh1)/(Jcdh + Cdh1T - Cdh1));  // modifiers: Cdc14; isVersionOf GO:0006464
  v6: Cdh1 -> $Cdh1_i; kapcdh*Cdk*(Cdh1/(Jcdh + Cdh1));  // isVersionOf GO:0006464
  v7: $AA -> $securin + securinT; kssecurin;  // isVersionOf GO:0006412
  v8: $securin + securinT -> $degr; (kdsecurin + kadsecurin*Cdc20)*securinT;  // modifiers: Cdc20; isVersionOf GO:0030163
  v9: $AA -> $separase + separaseT; ksseparase;  // isVersionOf GO:0006412
end
