// SBML level 2 version 4

model raia1()

  // Compartments:
  compartment cell = 1;  // isVersionOf BTO:0001518 GO:0005623

  // Species:
  species CD274mRNA in cell = 0;  // uniprot:P20963 kegg.compound:C00046 CHEBI:33699
  species DecoyR in cell = 0.34;  // isVersionOf uniprot:Q14627
  species $IL13 in cell;  // isVersionOf GO:0005144 uniprot:P35225
  species IL13_DecoyR in cell = 0;  // hasPart uniprot:Q14627 uniprot:P35225
  species IL13_Rec in cell = 0;  // hasPart GO:0016516 uniprot:P29597 uniprot:P24394 uniprot:P78552
  species JAK2 in cell = 2.8;  // isVersionOf uniprot:O60674
  species Rec in cell = 1.3;  // GO:0019973 uniprot:P78552 uniprot:P24394 uniprot:P29597
  species Rec_i in cell = 113.194;  // hasPart uniprot:P24394 GO:0031623 uniprot:P78552 GO:0016516
  species SHP1 in cell = 91;  // isVersionOf uniprot:P29350
  species SOCS3 in cell = 0;  // isVersionOf uniprot:O14543
  species SOCS3mRNA in cell = 0;  // uniprot:O14543 kegg.compound:C00046 CHEBI:33699
  species STAT5 in cell = 165;  // isVersionOf uniprot:P51692 uniprot:P42229
  species pJAK2 in cell = 0;  // hasVersion MOD:00048 kegg.compound:C00562 uniprot:O60674 MOD:00048
  species pSTAT5 in cell = 0;  // hasVersion kegg.compound:C00562 uniprot:P42229 MOD:00048 uniprot:P51692
  species p_IL13_Rec in cell = 0;  // hasPart MOD:00048 GO:0016516 uniprot:P29597 kegg.compound:C00562
  species p_IL13_Rec_i in cell = 0;  // hasPart GO:0031623 uniprot:P78552 uniprot:P24394 GO:0016516

  // Parameters:
  CD274mRNA_production = 8.21752e-5;
  DecoyR_binding = 0.000124391;
  IL13stimulation = 1 ng_per_ml;  // isVersionOf uniprot:P35225
  JAK2_p_inhibition = 0.0168268;
  JAK2_phosphorylation = 0.157057;
  Kon_IL13Rec = 0.00341992;
  Rec_intern = 0.103346;
  Rec_phosphorylation = 999.631;
  Rec_recycle = 0.00135598;
  SOCS3_accumulation = 3.70803;
  SOCS3_degradation = 0.0429186;
  SOCS3_translation = 11.9086;
  SOCS3mRNA_production = 0.00215826;
  STAT5_phosphorylation = 0.0382596;
  pJAK2_dephosphorylation = 0.000621906;
  pRec_degradation = 0.172928;
  pRec_intern = 0.15254;
  pSTAT5_dephosphorylation = 0.000343392;

  // Assignment rules:
  IL13 := 2.265*IL13stimulation;
  observable_task2_model2_raia1_pSTAT5 := pSTAT5;
  observable_plot2_pJAK2_datagen1 := task2_model2_raia1_pJAK2;
  observable_plot0_pSTAT5_datagen1 := task1_model1_raia1_pSTAT5;
  observable_plot1_pJAK2_datagen1 := task1_model1_raia1_pJAK2;
  observable_plot0_pSTAT5_datagen3 := task0_model0_raia1_pSTAT5;
  observable_task0_model0_raia1_pJAK2 := pJAK2;

  // Reactions:
  reaction_1: Rec => IL13_Rec; Kon_IL13Rec*IL13*Rec*cell;  // modifiers: IL13
  reaction_10: STAT5 => pSTAT5; STAT5_phosphorylation*STAT5*pJAK2*cell;  // modifiers: pJAK2
  reaction_11: pSTAT5 => STAT5; pSTAT5_dephosphorylation*pSTAT5*SHP1*cell;  // modifiers: SHP1
  reaction_12: DecoyR => IL13_DecoyR; DecoyR_binding*IL13*DecoyR*cell;  // modifiers: IL13
  reaction_13: => SOCS3mRNA; pSTAT5*SOCS3mRNA_production*cell;  // modifiers: pSTAT5
  reaction_14: => SOCS3; SOCS3mRNA*SOCS3_translation/(SOCS3_accumulation + SOCS3mRNA)*cell;  // modifiers: SOCS3mRNA
  reaction_15: SOCS3 => ; SOCS3_degradation*SOCS3*cell;
  reaction_16: => CD274mRNA; pSTAT5*CD274mRNA_production*cell;  // modifiers: pSTAT5
  reaction_2: Rec => Rec_i; Rec_intern*Rec*cell;
  reaction_3: Rec_i => Rec; Rec_recycle*Rec_i*cell;
  reaction_4: IL13_Rec => p_IL13_Rec; Rec_phosphorylation*IL13_Rec*pJAK2*cell;  // modifiers: pJAK2
  reaction_5: JAK2 => pJAK2; JAK2_phosphorylation*IL13_Rec*JAK2/(1 + JAK2_p_inhibition*SOCS3)*cell;  // modifiers: SOCS3, IL13_Rec
  reaction_6: JAK2 => pJAK2; JAK2_phosphorylation*p_IL13_Rec*JAK2/(1 + JAK2_p_inhibition*SOCS3)*cell;  // modifiers: SOCS3, p_IL13_Rec
  reaction_7: p_IL13_Rec => p_IL13_Rec_i; pRec_intern*p_IL13_Rec*cell;
  reaction_8: p_IL13_Rec_i => ; pRec_degradation*p_IL13_Rec_i*cell;
  reaction_9: pJAK2 => JAK2; pJAK2_dephosphorylation*pJAK2*SHP1*cell;  // modifiers: SHP1

  // Unit definitions:
  unit ng_per_ml = 1e-3 litre * 1e-9 gram;
  unit cell_volumes = 6e-14 litre;
  unit minutes = 60 second;
  unit molecules = item;
end
