// SBML level 2 version 4

model raia2()

  // Compartments:
  compartment cell = 100;  // isVersionOf BTO:0001518 GO:0005623

  // Species:
  species CD274mRNA in cell = 0;  // uniprot:P20963 kegg.compound:C00046 CHEBI:33699
  species $IL13 in cell;  // isVersionOf GO:0005144 uniprot:P35225
  species IL13_Rec in cell = 0;  // hasPart uniprot:P78552 uniprot:P24394 GO:0016516 uniprot:P35225
  species JAK2 in cell = 24;  // isVersionOf uniprot:O60674
  species Rec in cell = 1.8;  // GO:0019973 uniprot:P24394 uniprot:P78552 uniprot:P29597
  species Rec_i in cell = 118.598;  // hasPart GO:0031623 uniprot:P78552 uniprot:P24394 GO:0016516
  species SHP1 in cell = 9.4;  // isVersionOf uniprot:P29350
  species STAT5 in cell = 209;  // isVersionOf uniprot:P42229 uniprot:P51692
  species pJAK2 in cell = 0;  // isVersionOf MOD:00048 kegg.compound:C00562 uniprot:O60674
  species pSTAT5 in cell = 0;  // isVersionOf MOD:00048 kegg.compound:C00562 uniprot:P51692 uniprot:P42229
  species p_IL13_Rec in cell = 0;  // hasPart uniprot:P24394 uniprot:P78552 kegg.compound:C00562 MOD:00048
  species p_IL13_Rec_i in cell = 0;  // hasPart GO:0031623 uniprot:P35225 uniprot:P29597 uniprot:P24394

  // Parameters:
  CD274mRNA_production = 0.0115928;
  IL13stimulation = 1 ng_per_ml;  // isVersionOf uniprot:P35225
  JAK2_phosphorylation = 0.300019;
  Kon_IL13Rec = 0.00174087;
  Rec_intern = 0.259686;
  Rec_phosphorylation = 9.07541;
  Rec_recycle = 0.0039243;
  STAT5_phosphorylation = 0.00426767;
  pJAK2_dephosphorylation = 0.0981611;
  pRec_degradation = 0.417538;
  pRec_intern = 0.324132;
  pSTAT5_dephosphorylation = 0.0116389;

  // Assignment rules:
  IL13 := 3.776*IL13stimulation;
  observable_task2_model2_raia2_pJAK2 := pJAK2;
  observable_plot2_pSTAT5_datagen1 := task2_model2_raia2_pSTAT5;
  observable_plot1_pJAK2_datagen1 := task1_model1_raia2_pJAK2;
  observable_plot1_pSTAT5_datagen1 := task1_model1_raia2_pSTAT5;
  observable_plot0_pJAK2_datagen1 := task0_model0_raia2_pJAK2;
  observable_task0_model0_raia2_pSTAT5 := pSTAT5;

  // Reactions:
  reaction_1: Rec => IL13_Rec; Kon_IL13Rec*IL13*Rec*cell;  // modifiers: IL13
  reaction_10: STAT5 => pSTAT5; STAT5_phosphorylation*STAT5*pJAK2*cell;  // modifiers: pJAK2
  reaction_11: pSTAT5 => STAT5; pSTAT5_dephosphorylation*pSTAT5*SHP1*cell;  // modifiers: SHP1
  reaction_12: => CD274mRNA; pSTAT5*CD274mRNA_production*cell;  // modifiers: pSTAT5
  reaction_2: Rec => Rec_i; Rec_intern*Rec*cell;
  reaction_3: Rec_i => Rec; Rec_recycle*Rec_i*cell;
  reaction_4: IL13_Rec => p_IL13_Rec; Rec_phosphorylation*IL13_Rec*pJAK2*cell;  // modifiers: pJAK2
  reaction_5: JAK2 => pJAK2; JAK2_phosphorylation*JAK2*IL13_Rec*cell;  // modifiers: IL13_Rec
  reaction_6: JAK2 => pJAK2; JAK2_phosphorylation*JAK2*p_IL13_Rec*cell;  // modifiers: p_IL13_Rec
  reaction_7: p_IL13_Rec => p_IL13_Rec_i; pRec_intern*p_IL13_Rec*cell;
  reaction_8: p_IL13_Rec_i => ; pRec_degradation*p_IL13_Rec_i*cell;
  reaction_9: pJAK2 => JAK2; pJAK2_dephosphorylation*pJAK2*SHP1*cell;  // modifiers: SHP1

  // Unit definitions:
  unit ng_per_ml = 1e-3 litre * 1e-9 gram;
  unit cell_volumes = 6e-14 litre;
  unit minutes = 60 second;
  unit molecules = item;
end
