// SBML level 2 version 4

model ratushny5()

  // Compartments:
  compartment univ = 1;  // isVersionOf GO:0005623

  // Species:
  species P1 in univ = 0;  // isVersionOf GO:0003675
  species Target in univ = 0;

  // Parameters:
  Kd = 1e-5;
  Ksp = 0.001;
  P2 = 40;
  h = 2;
  k0 = 0.1;
  ka = 40;
  ks = 10;
  ku = 0.1;
  s = 1000;

  // Assignment rules:
  dsp1p2kd := Kd/2*(1 + (dsp1ksp + P2)/Kd - ((1 + (dsp1ksp + P2)/Kd)^2 - 4*dsp1ksp*P2/Kd^2)^0.5);
  dsp1ksp := Ksp/2*(1 + (s + P1*univ)/Ksp - ((1 + (s + P1*univ)/Ksp)^2 - 4*s*P1*univ/Ksp^2)^0.5);
  observable_task0_model0_ratushny5_Target := Target;

  // Reactions:
  ___r1: => P1; ks*(k0 + (dsp1p2kd/ka)^h)/(1 + (dsp1p2kd/ka)^h);
  ___r2: P1 => ; ___r2___RATE__*P1;
    ___r2___RATE__ = 0.1;
  ___r3: => Target; ks*(k0 + (dsp1p2kd/ka)^h)/(1 + (dsp1p2kd/ka)^h);
  ___r4: Target => ; ___r4___RATE__*Target;
    ___r4___RATE__ = 0.1;
end
