// SBML level 2 version 4

model ratushny2()

  // Compartments:
  compartment univ = 1;  // occursIn GO:0005623

  // Species:
  species P in univ = 0;  // isVersionOf GO:0003675

  // Parameters:
  Kd = 1e-5;
  Ksp = 0.001;
  h = 2;
  k0 = 0.1;
  ka = 40;
  ks = 10;
  ku = 0.1;
  s = 1000;

  // Assignment rules:
  dspspkd := Kd/2*(1 + 2*dspksp/Kd - ((1 + 2*dspksp/Kd)^2 - 4*dspksp^2/Kd^2)^0.5);
  dspksp := Ksp/2*(1 + (s + P*univ)/Ksp - ((1 + (s + P*univ)/Ksp)^2 - 4*s*P*univ/Ksp^2)^0.5);
  observable_task0_model0_ratushny2_P := P;

  // Reactions:
  ___r1: => P; ks*(k0 + (dspspkd/ka)^h)/(1 + (dspspkd/ka)^h);
  ___r2: P => ; __RATE__*P;
    __RATE__ = 0.1;
end
