// SBML level 2 version 4

model rehm1()

  // Compartments:
  compartment cell = 1;  // GO:0005623
  compartment mito = 1; mito is "mitochondrium";  // isVersionOf GO:0005739

  // Species:
  species APAF1 in cell = 3.372;  // isVersionOf uniprot:O14727
  species BIR12 in cell = 0;  // isPartOf uniprot:P98170
  species BIR12_C3 in cell = 0; BIR12_C3 is "BIR12-Casp3";  // isPartOf uniprot:P42574 uniprot:P98170
  species BIR12_SMAC in cell = 0; BIR12_SMAC is "BIR12-SMAC";  // isPartOf uniprot:Q9NR28 uniprot:P98170
  species BIR3R in cell = 0;  // isPartOf uniprot:P98170
  species BIR3R_C9 in cell = 0; BIR3R_C9 is "BIR3R-Casp9";  // isPartOf uniprot:P55211 uniprot:P98170
  species BIR3R_SMAC in cell = 0; BIR3R_SMAC is "BIR3R-SMAC";  // isPartOf uniprot:Q9NR28 uniprot:P98170
  species BIR3R_p2frag in cell = 0; BIR3R_p2frag is "BIR3R-p2frag";  // isPartOf uniprot:P55211 uniprot:P98170
  species C3 in cell = 0;  // isVersionOf uniprot:P42574
  species Casp9_p35_p12 in cell = 0; Casp9_p35_p12 is "Casp9(p35-p12)";  // isVersionOf uniprot:P55211
  species C9P in cell = 0; C9P is "Casp9(p35-p10)";  // hasPart uniprot:P55211
  species ClvgPrds in cell = 0; ClvgPrds is "Clevage Products";
  species CytC_cell in cell = 0; CytC_cell is "cytosolic Cytochrome C";  // isVersionOf uniprot:P08574
  species CytC_mit in mito = 10; CytC_mit is "Cytochrome C in mitochondrium";  // isVersionOf uniprot:P08574
  species PC3 in cell = 0.12; PC3 is "ProCasp3";  // isVersionOf uniprot:P42574
  species PC9 in cell = 0.03; PC9 is "ProCasp9";  // isVersionOf uniprot:P55211
  species SMAC in cell = 0;  // isVersionOf uniprot:Q9NR28
  species SMAC_mito in mito = 0.126; SMAC_mito is "SMAC in mitochondrium";  // isVersionOf uniprot:Q9NR28
  species Substrate in cell = 1; Substrate is "Casp3 Substrate";  // isPartOf uniprot:P42574
  species XIAP in cell = 0.063;  // isVersionOf uniprot:P98170
  species XIAP_2SMAC in cell = 0; XIAP_2SMAC is "XIAP-2*SMAC";  // hasPart uniprot:P98170
  species XIAP_C3 in cell = 0; XIAP_C3 is "XIAP-Casp3";  // hasPart uniprot:P98170 uniprot:P42574
  species XIAP_C9 in cell = 0; XIAP_C9 is "XIAP-Casp9";  // hasPart uniprot:P55211 uniprot:P98170
  species XIAP_C9_C3 in cell = 0; XIAP_C9_C3 is "XIAP-Casp9-Casp3";  // hasPart uniprot:P55211 uniprot:P98170 uniprot:P42574
  species XIAP_p2frag in cell = 0; XIAP_p2frag is "XIAP-p2 fragment";  // isPartOf uniprot:P98170 uniprot:P55211
  species XIAP_p2frag_2SMAC in cell = 0; XIAP_p2frag_2SMAC is "XIAP-p2frag-2*SMAC";  // isPartOf uniprot:Q9NR28 uniprot:P98170 uniprot:P55211
  species XIAP_p2frag_C3 in cell = 0; XIAP_p2frag_C3 is "XIAP-p2frag-Casp3";  // isPartOf uniprot:P98170 uniprot:P42574 uniprot:P55211

  // Parameters:
  APAF1_tot = APAF1;
  Apoform has dimensionless; Apoform is "percent Apoptosome formation";
  BIR12_C3_norm has dimensionless;
  BIR12_norm has dimensionless;
  BIR3R_C9_norm has dimensionless;
  BIR3R_norm has dimensionless;
  BIR3R_p2frag_norm has dimensionless;
  C3_tot = PC3; C3_tot is "Caspase3 tot";
  C3norm has dimensionless; C3norm is "normalised Casp-3";
  C9Pnorm has dimensionless; C9Pnorm is "normalised Casp9-P";
  C9_tot = PC9; C9_tot is "Caspase9 tot";
  C9norm has dimensionless; C9norm is "normalised Casp-9";
  CytC_tot = CytC_mit;
  PC3norm has dimensionless; PC3norm is "normalised Procasp-3";
  SMAC_norm has dimensionless; SMAC_norm is "free SMAC per XIAP";
  SMAC_rel has dimensionless; SMAC_rel is "percent SMAC release";
  SMAC_tot = SMAC_mito; SMAC_tot is "total SMAC";
  S_breakdown = 0.01;
  XIAP_2SMAC_norm has dimensionless; XIAP_2SMAC_norm is "XIAP2*SMAC per XIAP";
  XIAP_C3_norm has dimensionless;
  XIAP_C9_norm has dimensionless;
  XIAP_ini = XIAP; XIAP_ini is "initial XIAP conc";
  XIAP_norm has dimensionless;
  XIAP_p2frag_norm has dimensionless;
  var apo_lim; apo_lim is "limiting factor for apoptosome formation";
  k1 = 0.000468 uM_per_min;
  k10 = 156;
  k10r = 0.144;
  k11 = 12;
  k12 = 12;
  k13 = 12;
  k14 = 12;
  k15 = 12;
  k16 = 12;
  k17 = 12;
  k18 = 12;
  k19 = 12;
  k1r = 0.0039;
  k2 = 0.0007308 uM_per_min;
  k20 = 12;
  k21 = 156;
  k21r = 0.144;
  k22 = 156;
  k22r = 0.144;
  k23 = 156;
  k23r = 0.144;
  k24 = 0;
  k25 = 0;
  k26 = 420;
  k26r = 0.133;
  k27 = 420;
  k27r = 156;
  k28 = 420;
  k28r = 156;
  k29 = 420;
  k29r = 156;
  k2r = 0.0116;
  k3 = 6;
  k30 = 4.45;
  k30r = 31.9;
  k31 = 0.33;
  k31r = 14.2;
  k32 = 4.45;
  k32r = 156;
  k33 = 0.33;
  k33r = 156;
  k34 = 420;
  k34r = 156;
  k35 = 0.0058;
  k36 = 0.0058;
  k37 = 0.0058;
  k38 = 0.0347;
  k39 = 0.0347;
  k4 = 12;
  k40 = 0.0347;
  k41 = 0.0058;
  k42 = 0.0347;
  k43 = 0.0347;
  k44 = 0.0347;
  k45 = 0.0058;
  k46 = 0.0347;
  k47 = 0.0058;
  k48 = 0.0347;
  k49 = 0.0058;
  k5 = 48;
  k50 = 0.0058;
  k51 = 0.0347;
  k52 = 0.0058;
  k53 = 12;
  k6 = 2.4;
  k7 = 156;
  k7r = 0.144;
  k8 = 156;
  k8r = 0.144;
  k9 = 156;
  k9r = 0.144;
  th_Apop = 2.3; th_Apop is "t_Apop_0.5";
  th_CytC = 1.5;
  th_SMAC = 7; th_SMAC is "t_SMAC_0.5";

  // Assignment rules:
  BIR3R_p2frag_norm := BIR3R_p2frag/XIAP_ini;
  BIR3R_C9_norm := BIR3R_C9/XIAP_ini;
  BIR12_C3_norm := BIR12_C3/XIAP_ini;
  BIR3R_norm := BIR3R/XIAP_ini;
  BIR12_norm := BIR12/XIAP_ini;
  XIAP_p2frag_norm := (XIAP_p2frag + XIAP_p2frag_C3)/XIAP_ini;
  XIAP_C9_norm := (XIAP_C9 + XIAP_C9_C3)/XIAP_ini;
  XIAP_C3_norm := (XIAP_C3 + XIAP_C9_C3)/XIAP_ini;
  XIAP_norm := XIAP/XIAP_ini;
  Apoform := 1 - PC9/C9_tot;
  SMAC_rel := 1 - SMAC_mito/SMAC_tot;
  PC3norm := PC3/C3_tot;
  C3norm := C3/C3_tot;
  C9Pnorm := C9P/C9_tot;
  C9norm := Casp9_p35_p12/C9_tot;
  XIAP_2SMAC_norm := XIAP_2SMAC/XIAP_ini;
  SMAC_norm := SMAC/XIAP_ini;
  apo_lim := piecewise(PC9, PC9 < APAF1, APAF1);
  observable_task0_model0_rehm1_XIAP_norm := XIAP_norm;
  observable_task0_model0_rehm1_XIAP_C3_norm := XIAP_C3_norm;
  observable_task0_model0_rehm1_XIAP_C9_norm := XIAP_C9_norm;
  observable_task0_model0_rehm1_XIAP_p2frag_norm := XIAP_p2frag_norm;

  // Reactions:
  Apo_formation: APAF1 + PC9 -> Casp9_p35_p12; cell*apo_lim*ln(2)/th_Apop;  // isVersionOf reactome:REACT_89 GO:0006461
  CytC_release: CytC_mit -> CytC_cell; cell*CytC_mit*ln(2)/th_CytC;  // isVersionOf reactome:REACT_535
  SMAC_release: SMAC_mito -> SMAC; cell*SMAC_mito*ln(2)/th_SMAC;  // isVersionOf reactome:REACT_1101
  ProCaspase3_Production: -> PC3; cell*(k1 - k1r*PC3);
  reaction10: BIR12 + C3 -> BIR12_C3; cell*(k10*C3*BIR12 - k10r*BIR12_C3);  // isVersionOf GO:0006461
  reaction11: XIAP + C3 -> C3 + BIR3R + BIR12; cell*k11*C3*XIAP;  // isVersionOf GO:0032403
  reaction12: XIAP_C9 + C3 -> C3 + BIR3R_C9 + BIR12; cell*k12*C3*XIAP_C9;  // isVersionOf GO:0032403
  reaction13: XIAP_C3 + C3 -> BIR3R + BIR12_C3 + C3; cell*k13*C3*XIAP_C3;  // isVersionOf GO:0032403
  reaction14: XIAP_p2frag + C3 -> BIR3R_p2frag + BIR12 + C3; cell*k14*C3*XIAP_p2frag;  // isVersionOf GO:0032403
  reaction15: XIAP_p2frag_C3 + C3 -> BIR3R_p2frag + BIR12_C3 + C3; cell*k15*C3*XIAP_p2frag_C3;  // isVersionOf GO:0032403
  reaction16: XIAP_C9_C3 + C3 -> BIR3R_C9 + BIR12_C3 + C3; cell*k16*C3*XIAP_C9_C3;  // isVersionOf GO:0032403
  reaction17: XIAP_2SMAC + C3 -> BIR3R_SMAC + BIR12_SMAC + C3; cell*k17*C3*XIAP_2SMAC;  // isVersionOf GO:0032403
  reaction18: XIAP_C9_C3 + C3 -> XIAP_p2frag_C3 + C9P + C3; cell*k18*C3*XIAP_C9_C3;  // isVersionOf GO:0032403
  reaction19: XIAP_C9 + C3 -> XIAP_p2frag + C9P + C3; cell*k19*C3*XIAP_C9;  // isVersionOf GO:0032403
  XIAP_Production: -> XIAP; cell*(k2 - k2r*XIAP);
  reaction20: BIR3R_C9 + C3 -> C9P + BIR3R_p2frag + C3; cell*k20*C3*BIR3R_C9;  // isVersionOf GO:0032403
  reaction21: XIAP + Casp9_p35_p12 -> XIAP_C9; cell*(k21*Casp9_p35_p12*XIAP - k21r*XIAP_C9);  // isVersionOf GO:0006461
  reaction22: XIAP_C3 + Casp9_p35_p12 -> XIAP_C9_C3; cell*(k22*Casp9_p35_p12*XIAP_C3 - k22r*XIAP_C9_C3);  // isVersionOf GO:0006461
  reaction23: BIR3R + Casp9_p35_p12 -> BIR3R_C9; cell*(k23*Casp9_p35_p12*BIR3R - k23r*BIR3R_C9);  // isVersionOf GO:0006461
  reaction24: BIR3R_p2frag -> BIR3R; cell*k24*BIR3R_p2frag;  // isVersionOf GO:0043241
  reaction25: XIAP_p2frag -> XIAP; cell*k25*XIAP_p2frag;  // isVersionOf GO:0043241
  reaction26: 2 SMAC + XIAP -> XIAP_2SMAC; cell*(k26*XIAP*SMAC*SMAC - k26r*XIAP_2SMAC);  // isVersionOf GO:0006461
  reaction27: 2 SMAC + XIAP_C9 -> Casp9_p35_p12 + XIAP_2SMAC; cell*(k27*XIAP_C9*SMAC*SMAC - k27r*XIAP_2SMAC*Casp9_p35_p12);  // isVersionOf GO:0032403 reactome:REACT_1312
  reaction28: 2 SMAC + XIAP_C3 -> C3 + XIAP_2SMAC; cell*(k28*XIAP_C3*SMAC*SMAC - k28r*XIAP_2SMAC*C3);  // isVersionOf GO:0032403 reactome:REACT_1090
  reaction29: 2 SMAC + XIAP_C9_C3 -> Casp9_p35_p12 + C3 + XIAP_2SMAC; cell*(k29*XIAP_C9_C3*SMAC*SMAC - k29r*XIAP_2SMAC*C3*Casp9_p35_p12);  // isVersionOf GO:0032403
  reaction3: PC3 + Casp9_p35_p12 -> Casp9_p35_p12 + C3; cell*k3*Casp9_p35_p12*PC3;  // isVersionOf GO:0016485
  reaction30: SMAC + BIR12 -> BIR12_SMAC; cell*(k30*BIR12*SMAC - k30r*BIR12_SMAC);  // isVersionOf GO:0006461
  reaction31: SMAC + BIR3R -> BIR3R_SMAC; cell*(k31*BIR3R*SMAC - k31r*BIR3R_SMAC);  // isVersionOf GO:0006461
  reaction32: SMAC + BIR12_C3 -> C3 + BIR12_SMAC; cell*(k32*BIR12_C3*SMAC - k32r*BIR12_SMAC*C3);  // hasVersion GO:0032403 reactome:REACT_1090
  reaction33: SMAC + BIR3R_C9 -> Casp9_p35_p12 + BIR3R_SMAC; cell*(k33*BIR3R_C9*SMAC - k33r*BIR3R_SMAC*Casp9_p35_p12);  // hasVersion GO:0032403 reactome:REACT_1312
  reaction34: 2 SMAC + XIAP_p2frag -> XIAP_p2frag_2SMAC; cell*(k34*XIAP_p2frag*SMAC*SMAC - k34r*XIAP_p2frag_2SMAC);  // hasVersion GO:0006461 reactome:REACT_1090
  reaction35: C9P -> ; cell*k35*C9P;  // isVersionOf GO:0009056
  reaction36: Casp9_p35_p12 -> ; cell*k36*Casp9_p35_p12;  // isVersionOf GO:0009056
  reaction37: C3 -> ; cell*k37*C3;  // isVersionOf GO:0009056
  reaction38: XIAP_C3 -> ; cell*k38*XIAP_C3;  // isVersionOf GO:0009056
  reaction39: XIAP_C9_C3 -> ; cell*k39*XIAP_C9_C3;  // isVersionOf GO:0009056
  reaction4: C3 + Casp9_p35_p12 -> C3 + C9P; cell*k4*Casp9_p35_p12*C3;  // isVersionOf GO:0016485
  reaction40: XIAP_C9 -> ; cell*k40*XIAP_C9;  // isVersionOf GO:0009056
  reaction41: XIAP_p2frag -> ; cell*k41*XIAP_p2frag;  // isVersionOf GO:0009056
  reaction42: XIAP_p2frag_C3 -> ; cell*k42*XIAP_p2frag_C3;  // isVersionOf GO:0009056
  reaction43: XIAP_p2frag_2SMAC -> ; cell*k43*XIAP_p2frag_2SMAC;  // isPartOf GO:0009056
  reaction44: XIAP_2SMAC -> ; cell*k44*XIAP_2SMAC;  // isVersionOf GO:0009056
  reaction45: BIR12 -> ; cell*k45*BIR12;  // isVersionOf GO:0009056
  reaction46: BIR3R -> ; cell*k46*BIR3R;  // isVersionOf GO:0009056
  reaction47: BIR12_SMAC -> ; cell*k47*BIR12_SMAC;  // isVersionOf GO:0009056
  reaction48: BIR3R_SMAC -> ; cell*k48*BIR3R_SMAC;  // isVersionOf GO:0009056
  reaction49: BIR12_C3 -> ; cell*k49*BIR12_C3;  // isVersionOf GO:0009056
  reaction5: PC3 + C9P -> C3 + C9P; cell*k5*C9P*PC3;  // isVersionOf GO:0006461
  reaction50: BIR3R_C9 -> ; cell*k50*BIR3R_C9;  // isVersionOf GO:0009056
  reaction51: BIR3R_p2frag -> ; cell*k51*BIR3R_p2frag;  // isVersionOf GO:0009056
  reaction52: SMAC -> ; cell*k52*SMAC;  // isVersionOf GO:0009056
  reaction53: Substrate + C3 -> ClvgPrds + C3; cell*k53*C3*Substrate;  // isVersionOf GO:0032403
  reaction6: C3 + PC3 -> 2 C3; cell*k6*PC3*C3;  // isVersionOf GO:0016485
  reaction7: XIAP + C3 -> XIAP_C3; cell*(k7*C3*XIAP - k7r*XIAP_C3);  // isVersionOf GO:0006461
  reaction8: XIAP_C9 + C3 -> XIAP_C9_C3; cell*(k8*C3*XIAP_C9 - k8r*XIAP_C9_C3);  // isVersionOf GO:0006461
  reaction9: XIAP_p2frag + C3 -> XIAP_p2frag_C3; cell*(k9*C3*XIAP_p2frag - k9r*XIAP_p2frag_C3);  // isVersionOf GO:0006461

  // Events:
  Production_Breakdown: at (Substrate < S_breakdown): k1 = 0, k1r = 0, k2 = 0, k2r = 0, k38 = 0.0058, k39 = 0.0058, k40 = 0.0058, k43 = 0.0058, k44 = 0.0058, k46 = 0.0058, k48 = 0.0058, k50 = 0.0058, k51 = 0.0058;

  // Unit definitions:
  unit _1_per_min = 1 / (60 second); _1_per_min is "1/min";
  unit _1_per_uM_2_min = litre^2 / (60 second * (1e-6 mole)^2); _1_per_uM_2_min is "1/(uM^2*min)";
  unit _1_per_uM_min = litre / (60 second * 1e-6 mole); _1_per_uM_min is "1/(uM*min)";
  unit uM_per_min = 1e-6 mole / (60 second * litre); uM_per_min is "uM/min";
  unit microM = 1e-6 mole / litre;
  unit micromole = 1e-6 mole;
  unit min = 60 second;
end
