// SBML level 3 version 1

model revilla1()

  // Compartments:
  compartment default = 1;

  // Species:
  species v in default = 1e-6;
  species x in default = 200;
  species y in default = 0;

  // Parameters:
  a = 0.33;
  alpha = 0.004;
  b = 2;
  beta = 0.004;
  c = 2000;
  d = 0.01;
  k = 50;
  lambda = 2;
  q = 2;
  u = 2;

  // Assignment rules:
  observable_task0_model0_revilla1_v := v;
  observable_task0_model0_revilla1_x := x;
  observable_task0_model0_revilla1_y := y;

  // Reactions:
  v1: -> x; lambda;
  v2: x -> ; d*x;
  v3: x -> y; beta*v*x;  // modifiers: v
  v4: y -> ; a*y;
  v5: -> v; k*y;  // modifiers: y
  v6: v -> ; u*v;
end
