// SBML level 3 version 1

model revilla2()

  // Compartments:
  compartment default = 1;

  // Species:
  species v in default = 149;
  species w in default = 1;
  species x in default = 3;
  species y in default = 6;
  species z in default = 0;

  // Parameters:
  a = 0.33;
  alpha = 0.004;
  b = 2;
  beta = 0.004;
  c = 2000;
  d = 0.01;
  k = 50;
  lambda = 2;
  q = 2;
  u = 2;

  // Assignment rules:
  observable_task0_model0_revilla2_v := v;
  observable_task0_model0_revilla2_w := w;
  observable_task0_model0_revilla2_x := x;
  observable_task0_model0_revilla2_y := y;
  observable_task0_model0_revilla2_z := z;
  observable_task1_model1_revilla2_v := v;
  observable_task1_model1_revilla2_w := w;
  observable_task1_model1_revilla2_x := x;
  observable_task1_model1_revilla2_y := y;
  observable_task1_model1_revilla2_z := z;

  // Reactions:
  v1: -> x; lambda;
  v10: w -> ; q*w;
  v2: x -> ; d*x;
  v3: x -> y; beta*v*x;  // modifiers: v
  v4: y -> ; a*y;
  v5: y -> z; alpha*w*y;  // modifiers: w
  v6: z -> ; b*z;
  v7: -> v; k*y;  // modifiers: y
  v8: v -> ; u*v;
  v9: -> w; c*z;  // modifiers: z
end
