// SBML level 2 version 3

model romond1()

  // Compartments:
  compartment compartment = 1;

  // Species:
  species cyclinB in compartment = 2;  // substance in micromole; isVersionOf uniprot:Q8WWL7
  species cyclinE in compartment = 0;  // substance in micromole; isVersionOf uniprot:P24864
  substanceOnly species M1 in compartment = 1; M1 is "cdk1";  // substance in dimensionless; isVersionOf uniprot:P06493
  substanceOnly species M2 in compartment = 0; M2 is "cdk2";  // substance in dimensionless; isVersionOf uniprot:P24941
  substanceOnly species ubiquitin_ligase in compartment = 0;  // substance in dimensionless; isVersionOf uniprot:Q9UBT2
  substanceOnly species Ubiquitin_ligase_2 in compartment = 0;  // substance in dimensionless; isVersionOf uniprot:Q9UBT2

  // Parameters:
  H1 = 0.01 dimensionless;
  H2 = 0.01 dimensionless;
  H3 = 0.01 dimensionless;
  H4 = 0.01 dimensionless;
  K1 = 0.01 dimensionless;
  K2 = 0.01 dimensionless;
  K3 = 0.01 dimensionless;
  K4 = 0.01 dimensionless;
  K_d1 = 0.02 uM;
  K_d2 = 0.02 uM;
  Kc1 = 0.5 uM;
  Kc2 = 0.5 uM;
  Kim1 = 0.03 dimensionless;
  Kim2 = 0.03 dimensionless;
  U1 has min_1;
  U2 = 0.15 min_1;
  U3 has min_1;
  U4 = 0.05 min_1;
  U_M1 = 0.3 min_1;
  U_M3 = 0.1 min_1;
  V1 has min_1;
  V2 = 0.15 min_1;
  V3 has min_1;
  V4 = 0.05 min_1;
  V_M1 = 0.3 min_1;
  V_M3 = 0.1 min_1;
  kd1 = 0.001 min_1;
  kd2 = 0.001 min_1;
  vd1 = 0.025 uM_min_1;
  vd2 = 0.025 uM_min_1;
  vi1 = 0.05 uM_min_1;
  vi2 = 0.05 uM_min_1;

  // Assignment rules:
  U3 := M2*U_M3;
  U1 := cyclinE/(Kc2 + cyclinE)*U_M1;
  V3 := M1*V_M3;
  V1 := cyclinB/(Kc1 + cyclinB)*V_M1;
  observable_task0_model0_romond1_C2 := cyclinE;
  observable_task0_model0_romond1_C1 := cyclinB;

  // Rate rules:
  Ubiquitin_ligase_2' = U3*(1 - Ubiquitin_ligase_2)/(H3 + (1 - Ubiquitin_ligase_2)) - U4*Ubiquitin_ligase_2/(H4 + Ubiquitin_ligase_2);
  M2' = U1*(1 - M2)/(H1 + (1 - M2)) - U2*M2/(H2 + M2);
  ubiquitin_ligase' = V3*(1 - ubiquitin_ligase)/(K3 + (1 - ubiquitin_ligase)) - V4*ubiquitin_ligase/(K4 + ubiquitin_ligase);
  M1' = V1*(1 - M1)/(K1 + (1 - M1)) - V2*M1/(K2 + M1);

  // Reactions:
  cdk2_mediated_cyclinB_synthesis: => cyclinB; compartment*vi1*Kim1/(Kim1 + M2);  // modifiers: M2; isVersionOf GO:0004693
  cyclinE_degradation: cyclinE => ; compartment*kd2*cyclinE;  // isVersionOf GO:0008054
  R2: cyclinB => ; compartment*vd1*ubiquitin_ligase*cyclinB/(K_d1 + cyclinB); R2 is "Ubiquitin ligase mediated cyclinB degradation";  // modifiers: ubiquitin_ligase; isVersionOf GO:0008054
  cyclinB_degradation: cyclinB => ; compartment*kd1*cyclinB;  // isVersionOf GO:0008054
  cyclinE_synthesis: => cyclinE; compartment*vi2*Kim2/(Kim2 + M1);  // modifiers: M1
  R9: cyclinE => ; compartment*vd2*Ubiquitin_ligase_2*cyclinE/(K_d2 + cyclinE); R9 is "Ubiquitin ligase mediated cyclinE degradation";  // modifiers: Ubiquitin_ligase_2; isVersionOf GO:0008054

  // Unit definitions:
  unit uM_min_1 = 1e-6 mole / (60 second * litre);
  unit min_1 = 1 / (60 second);
  unit micromole = 1e-6 mole;
  unit uM = 1e-6 mole / litre;
  unit minute = 60 second;
end
