// SBML level 3 version 1

model rong1()

  // Compartments:
  compartment default = 1;

  // Species:
  species T in default = 1000000;
  species TEstar in default = 0;
  species Tstar in default = 0;
  species V in default = 1e-6;

  // Parameters:
  b = 0.01;
  c = 23;
  d = 0.01;
  delta = 1;
  deltaE = 0.7;
  k = 2.4e-8;
  lambda = 10000;
  p = 4000;
  phi = 0.8;

  // Assignment rules:
  observable_task0_model0_rong1_V := V;
  observable_plot1_V_datagen1 := task1_model1_rong1_V;
  observable_task2_model2_rong1_V := V;
  observable_plot3_V_datagen1 := task3_model3_rong1_V;

  // Reactions:
  v1: -> T; lambda;
  v2: T -> ; d*T;
  v3: T -> TEstar; k*T*V;  // modifiers: V
  v4: TEstar -> T; b*TEstar;
  v5: TEstar -> Tstar; phi*TEstar;
  v6: TEstar -> ; deltaE*TEstar;
  v7: Tstar -> ; delta*Tstar;
  v8: -> V; p*Tstar;  // modifiers: Tstar
  v9: V -> ; c*V;
end
