// SBML level 3 version 1

model rong2()

  // Compartments:
  compartment default = 1;

  // Species:
  species T in default = 1000000;
  species Trr in default = 0;
  species Ts in default = 0;
  species Vr in default = 0;
  species Vs in default = 1e-6;

  // Parameters:
  Nr = 2000;
  Ns = 3000;
  c = 23;
  d = 0.01;
  delta = 1;
  kr = 2e-8;
  ks = 2.4e-8;
  lambda = 10000;
  mu = 3e-5;

  // Assignment rules:
  TmicroL := T/1000;
  SumVsr := Vr + Vs;
  observable_task0_model0_rong2_TmicroL := task0_model0_rong2_TmicroL;
  observable_task0_model0_rong2_Vs := Vs;
  observable_task0_model0_rong2_Vr := Vr;
  observable_task0_model0_rong2_SumVsr := task0_model0_rong2_SumVsr;

  // Reactions:
  v1: -> T; lambda;
  v10: -> Vr; delta*Nr*Trr;  // modifiers: Trr
  v11: Vr -> ; c*Vr;
  v2: T -> ; d*T;
  v3: T -> Ts; ks*T*Vs;  // modifiers: Vs
  v4: T -> Trr; kr*T*Vr;  // modifiers: Vr
  v5: Ts -> Trr; ks*mu*T*Vs;  // modifiers: T, Vs
  v6: Ts -> ; delta*Ts;
  v7: -> Vs; delta*Ns*Ts;  // modifiers: Ts
  v8: Vs -> ; c*Vs;
  v9: Trr -> ; delta*Trr;
end
