// SBML level 3 version 1

model rong3()

  // Compartments:
  compartment default = 1;

  // Species:
  species L in default = 2;
  species T in default = 600000;
  species T1 in default = 0.3;
  species V in default = 50000;
  species Vi in default = 50000;
  species Vni in default = 0;

  // Parameters:
  NN = 4000;
  a = 0.1;
  alphaL = 0.001;
  c = 23;
  dL = 0.004;
  dT = 0.01;
  delta = 1;
  epsilonPI = 0.65;
  epsilonRT = 0;
  k = 2.4e-8;
  lambda = 10000;

  // Assignment rules:
  ratio := ln(Vni/Vi)/ln(10);
  observable_task0_model0_rong2009b_fig2_Vi := Vi;
  observable_task0_model0_rong2009b_fig2_Vni := Vni;
  observable_task0_model0_rong2009b_fig2_ratio := task0_model0_rong2009b_fig2_ratio;

  // Reactions:
  v1: -> T; lambda;
  v10: T1 -> L; alphaL*k*T*Vi;  // modifiers: Vi, T
  v11: L -> T1; alphaL*epsilonRT*k*T*Vi;  // modifiers: Vi, T
  v12: -> V + Vi; delta*NN*T1;  // modifiers: T1
  v13: Vi -> Vni; delta*epsilonPI*NN*T1;  // modifiers: T1
  v2: T -> ; dT*T;
  v3: T -> T1; k*T*Vi;  // modifiers: Vi
  v4: L -> ; dL*L;
  v5: L -> T1; a*L;
  v6: T1 -> ; delta*T1;
  v7: V + Vi -> ; c*Vi;
  v8: V + Vni -> ; c*Vni;
  v9: T1 -> T; epsilonRT*k*T*Vi;  // modifiers: Vi
end
