// SBML level 2 version 4

model rovers1()

  // Compartments:
  compartment c = 1 volume;  // GO:0009570

  // Species:
  species $ADP in c;
  species ATP in c = 0.5;
  species $NADP in c; NADP is "NADP_super_+";
  species NADPH in c = 0.7;
  species X in c = 2;
  species $Y in c = 1;

  // Parameters:
  A0 = 2.5 mM;  // kegg.compound:C00008 kegg.compound:C00002 CHEBI:15422 CHEBI:16761
  N0 = 1.2 mM;  // hasPart kegg.compound:C00006 kegg.compound:C00005 CHEBI:18009 CHEBI:16474
  k1 = 0.123 per_s;
  k2 = 0.625 per_s;
  k3 = 0.3 per_mM_per_s;
  k4 = 0.614 per_s;

  // Assignment rules:
  ADP := A0 - ATP;
  NADP := N0 - NADPH;
  observable_task0_model0_rovers1_X := X;
  observable_task0_model0_rovers1_NADPH := NADPH;
  observable_task0_model0_rovers1_ATP := ATP;
  observable_task0_model0_rovers1_v4 := v4;
  observable_task0_model0_rovers1_v3 := v3;
  observable_task0_model0_rovers1_v2 := v2;
  observable_task0_model0_rovers1_v1 := v1;

  // Reactions:
  v1: ATP + X => $ADP + $Y; c*k1*X;
  v2: ATP + NADPH + $Y => $NADP + $ADP + X; c*k2*ATP;
  v3: 2 $ADP => 2 ATP; c*k3*ADP*NADP;  // modifiers: NADP
  v4: $NADP => NADPH; c*k4*NADP;

  // Unit definitions:
  unit time = second;
  unit length = metre;
  unit area = metre^2;
  unit volume = litre;
  unit per_s = 1 / second;
  unit per_mM_per_s = litre / (1e-3 mole * second);
  unit mM = 1e-3 mole / litre;
  unit mmole = 1e-3 mole;
end
