// SBML level 3 version 1

model roy1()

  // Compartments:
  compartment default = 1;

  // Species:
  species x in default = 50;
  species y in default = 50;
  species z in default = 2;

  // Parameters:
  Tm = 1500;
  a = 0.24;
  b = 0.02;
  beta = 0.002;
  d = 0.01;
  k = 0.001;
  lambda = 10;
  p = 0.03;
  s = 0.2;

  // Assignment rules:
  observable_task0_model0_roy2010_x := x;
  observable_task0_model0_roy2010_y := y;
  observable_task0_model0_roy2010_z := z;
  observable_task1_model1_roy2010_x := x;
  observable_task1_model1_roy2010_y := y;
  observable_task1_model1_roy2010_z := z;
  observable_task2_model2_roy2010_x := x;
  observable_task2_model2_roy2010_y := y;
  observable_task2_model2_roy2010_z := z;
  observable_task3_model3_roy2010_x := x;
  observable_task3_model3_roy2010_y := y;
  observable_task3_model3_roy2010_z := z;

  // Reactions:
  v1: -> x; lambda;
  v2: -> x; p*x;
  v2a: x -> ; p*x^2/Tm;
  v3: x -> ; d*x;
  v4: x -> y; beta*x*y;
  v5: y -> ; a*y;
  v6: y -> ; k*y*z;  // modifiers: z
  v7: -> z; s*y;  // modifiers: y
  v8: z -> ; b*z;
end
