// SBML level 2 version 4

function function_4_3_1(A, K3, Ka, k3, MKKK_P, MKK, MKK_P, M_PP)
  k3*MKKK_P*MKK/K3/(1 + MKK/K3 + MKK_P/K3)*((1 + A*M_PP/Ka)/(1 + M_PP/Ka));
end

function function_5(P3_n, M_P_n, M_PP_n, k22, K22, K22i)
  k22*P3_n*M_P_n/K22/(1 + M_P_n/K22 + M_PP_n/K22i);
end
function_5 is "22";

function function_4(M_PP_n, M_P_n, P3_n, k21, K21, K21i)
  k21*P3_n*M_PP_n/K21/(1 + M_PP_n/K21 + M_P_n/K21i);
end
function_4 is "21";

function function_3(k15, P3mRNA)
  k15*P3mRNA;
end
function_3 is "15";

function function_2(V12, n12, K12, M_PP_n)
  V12*M_PP_n^n12/(K12^n12 + M_PP_n^n12);
end
function_2 is "12";

function function_1(k11f, ppERK_c, k11b, ppERK_n)
  k11f*ppERK_c - k11b*ppERK_n;
end
function_1 is "11";

function function_4_10_1(K10, k10, P3, M_P, M_PP)
  k10*P3*M_P/K10/(1 + M_PP/K10 + M_P/K10);
end

function function_4_9_1(K9, k9, P3, M_P, M_PP)
  k9*P3*M_PP/K9/(1 + M_PP/K9 + M_P/K9);
end

function function_4_6_1(K6, k6, MKK_P, MKK_PP, P2)
  k6*P2*MKK_P/K6/(1 + MKK_PP/K6 + MKK_P/K6);
end

function function_4_5_1(K5, k5, MKK_P, MKK_PP, P2)
  k5*P2*MKK_PP/K5/(1 + MKK_PP/K5 + MKK_P/K5);
end

function function_4_2_1(K2, k2, MKKK_P, P1)
  k2*P1*MKKK_P/K2/(1 + MKKK_P/K2);
end

function function_4_8_1(K8, k8, MKK_PP, M, M_P)
  k8*MKK_PP*M_P/K8/(1 + M/K8 + M_P/K8);
end

function function_4_7_1(K7, k7, MKK_PP, M, M_P)
  k7*MKK_PP*M/K7/(1 + M/K7 + M_P/K7);
end

function function_4_4_1(A, K4, Ka, k4, MKKK_P, MKK, MKK_P, M_PP)
  k4*MKKK_P*MKK_P/K4/(1 + MKK_P/K4 + MKK/K4)*((1 + A*M_PP/Ka)/(1 + M_PP/Ka));
end

function function_4_1_1(K1, KI, V1, MKKK, M_PP)
  V1*MKKK/K1/((1 + MKKK/K1)*(1 + M_PP/KI));
end

model sarma8()

  // Compartments:
  compartment compartment_0 = 1;  // GO:0005623

  // Species:
  species MKKK in compartment_0 = 999.9999;  // isVersionOf uniprot:P04049
  species MKKK_P in compartment_0 = 0;  // isVersionOf kegg.compound:C00562 uniprot:P04049
  species P3 in compartment_0 = 500;  // isVersionOf uniprot:P51452
  species M_PP_n in compartment_0 = 0;  // isVersionOf GO:0005634 kegg.compound:C00562 uniprot:P28482
  species PreP3_mRNA in compartment_0 = 0;  // encodes GO:0005634 uniprot:P51452
  species P3mRNA in compartment_0 = 0;  // encodes GO:0005634 uniprot:P51452
  species P3_c in compartment_0 = 0;  // isVersionOf GO:0005737 uniprot:P51452
  species pP3_c in compartment_0 = 0;
  species M_n in compartment_0 = 0;  // isVersionOf GO:0005634 uniprot:P28482
  species M_P_n in compartment_0 = 0;  // isVersionOf GO:0005634 kegg.compound:C00562 uniprot:P28482
  species P3_n in compartment_0 = 0;  // isVersionOf GO:0005634 uniprot:P51452
  species MKK in compartment_0 = 4000;  // isVersionOf uniprot:Q02750
  species MKK_P in compartment_0 = 0;  // isVersionOf kegg.compound:C00562 uniprot:Q02750
  species MKK_PP in compartment_0 = 0;  // isVersionOf kegg.compound:C00562 uniprot:Q02750
  species M in compartment_0 = 999.9999;  // isVersionOf uniprot:P28482
  species M_P in compartment_0 = 0;  // isVersionOf kegg.compound:C00562 uniprot:P28482
  species M_PP in compartment_0 = 0;  // isVersionOf kegg.compound:C00562 uniprot:P28482
  species P1 in compartment_0 = 99.99999;  // isVersionOf uniprot:P51452
  species P2 in compartment_0 = 500;  // isVersionOf uniprot:P51452

  // Assignment rules:
  observable_task0_model0_sarma8_species_7 := M_PP;
  observable_task0_model0_sarma8_species_11 := M_PP_n;

  // Reactions:
  _1: MKKK => MKKK_P; compartment_0*function_4_1_1(K1, KI, V1, MKKK, M_PP);  // modifiers: M_PP; isVersionOf GO:0016310
    V1 = 2.5; KI = 9; K1 = 20;
  _3: MKK => MKK_P; compartment_0*function_4_3_1(_3_A, K3, _3_Ka, k3, MKKK_P, MKK, MKK_P, M_PP);  // modifiers: M_PP, MKKK_P; isVersionOf GO:0016310
    k3 = 0.1; _3_Ka = 500; K3 = 20; _3_A = 10;
  reaction_10: M_PP -> M_PP_n; compartment_0*function_1(k11f, M_PP, k11b, M_PP_n); reaction_10 is "11";  // isVersionOf GO:0051169
    k11b = 2.86; k11f = 10.34;
  reaction_11: => PreP3_mRNA; compartment_0*function_2(V12, n12, K12, M_PP_n); reaction_11 is "12";  // modifiers: M_PP_n; isVersionOf GO:0009299
    K12 = 169; n12 = 3.97; V12 = 29.24;
  _13: PreP3_mRNA => P3mRNA; compartment_0*_13_k1*PreP3_mRNA;  // isVersionOf GO:0006397
    _13_k1 = 0.022;
  _14: P3mRNA => ; compartment_0*_14_k1*P3mRNA;  // isVersionOf GO:0006406
    _14_k1 = 0.0078;
  reaction_14: => P3_c; compartment_0*function_3(k15, P3mRNA); reaction_14 is "15";  // modifiers: P3mRNA; isVersionOf GO:0002181
    k15 = 0.0012;
  _17: P3_c => ; compartment_0*_17_k1*P3_c;  // isVersionOf GO:0051169
    _17_k1 = 0.00025;
  _19: M -> M_n; compartment_0*(_19_k1*M - _19_k2*M_n);  // isVersionOf GO:0051169
    _19_k2 = 2.86; _19_k1 = 10.34;
  _20: M_P -> M_P_n; compartment_0*(_20_k1*M_P - _20_k2*M_P_n);  // isVersionOf GO:0051169
    _20_k2 = 2.86; _20_k1 = 10.34;
  _16: P3_c -> P3_n; compartment_0*(_16_k1*P3_c - _16_k2*P3_n);  // isVersionOf GO:0051169
    _16_k2 = 15.4; _16_k1 = 22.56;
  reaction_19: M_PP_n => M_P_n; compartment_0*function_4(M_PP_n, M_P_n, P3_n, k21, K21, K21i); reaction_19 is "21";  // modifiers: P3_n; isVersionOf GO:0016311
    K21i = 87; K21 = 10300; k21 = 0.68;
  _4: MKK_P => MKK_PP; compartment_0*function_4_4_1(_4_A, K4, _4_Ka, k4, MKKK_P, MKK, MKK_P, M_PP);  // modifiers: M_PP, MKK, MKKK_P; isVersionOf GO:0016310
    k4 = 0.1; _4_Ka = 500; K4 = 20; _4_A = 10;
  reaction_20: M_P_n => M_n; compartment_0*function_5(P3_n, M_P_n, M_PP_n, k22, K22, K22i); reaction_20 is "22";  // modifiers: M_PP_n, P3_n; isVersionOf GO:0016311
    K22i = 10300; K22 = 87; k22 = 0.31;
  _18: P3_n => ; compartment_0*_18_k1*P3_n;  // isVersionOf GO:0006406
    _18_k1 = 0.00025;
  _7: M => M_P; compartment_0*function_4_7_1(K7, k7, MKK_PP, M, M_P);  // modifiers: MKK_PP; isVersionOf GO:0016310
    k7 = 0.1; K7 = 20;
  _8: M_P => M_PP; compartment_0*function_4_8_1(K8, k8, MKK_PP, M, M_P);  // modifiers: M, MKK_PP; isVersionOf GO:0016310
    k8 = 0.1; K8 = 20;
  _2: MKKK_P => MKKK; compartment_0*function_4_2_1(K2, _2_k2, MKKK_P, P1);  // modifiers: P1; isVersionOf GO:0016311
    _2_k2 = 0.025; K2 = 200;
  _5: MKK_PP => MKK_P; compartment_0*function_4_5_1(K5, k5, MKK_P, MKK_PP, P2);  // modifiers: P2; isVersionOf GO:0016311
    k5 = 0.1; K5 = 200;
  _6: MKK_P => MKK; compartment_0*function_4_6_1(K6, k6, MKK_P, MKK_PP, P2);  // modifiers: P2, MKK_PP; isVersionOf GO:0016311
    k6 = 0.1; K6 = 200;
  _9: M_PP => M_P; compartment_0*function_4_9_1(K9, k9, P3, M_P, M_PP);  // modifiers: P3, M; isVersionOf GO:0016311
    k9 = 0.1; K9 = 200;
  _10: M_P => M; compartment_0*function_4_10_1(K10, k10, P3, M_P, M_PP);  // modifiers: M_PP, P3; isVersionOf GO:0016311
    k10 = 0.1; K10 = 200;

  // Unit definitions:
  unit substance = 1e-9 mole;
  unit volume = 1e-3 litre;
end
