// SBML level 2 version 4

model schaber1()

  // Compartments:
  compartment compartment = 1;  // GO:0005623

  // Species:
  species FREP in compartment = 0;  // isPartOf GO:0045311
  species Fus3 in compartment = 217;  // isVersionOf uniprot:P16892
  species Fus3PP in compartment = 0;  // isVersionOf GO:0004707 uniprot:P16892
  species Gbg in compartment = 53;  // hasPart uniprot:P53130 uniprot:A6ZP55
  species Kss1 in compartment = 54.4;  // isVersionOf uniprot:P14681
  species Kss1PP in compartment = 0;  // isVersionOf uniprot:P14681
  species PREP in compartment = 0;  // isPartOf GO:0019236
  species Ste11 in compartment = 13.3;  // isVersionOf GO:0004709 uniprot:P23561
  species Ste11P in compartment = 0;  // isVersionOf uniprot:P23561
  species Ste11Ubi in compartment = 0;  // hasPart uniprot:P61864 uniprot:P23561
  species Ste12 in compartment = 0.07;  // isVersionOf uniprot:P13574
  species Ste12Kss1 in compartment = 35.9;  // hasPart uniprot:P13574 uniprot:P14681
  species Ste12P in compartment = 0;  // isVersionOf uniprot:P13574
  species Ste12TeSte5 in compartment = 0.25;  // hasPart uniprot:P13574 uniprot:P32917
  species Ste12TeSte5Kss1 in compartment = 13.7;  // hasPart uniprot:P13574 uniprot:P14681 uniprot:P32917
  species Ste12TeSte5P in compartment = 0;  // hasPart uniprot:P13574 uniprot:P32917
  species Ste5 in compartment = 42.3;  // isVersionOf GO:0005078 uniprot:P32917
  species Ste5Ste11 in compartment = 5.6;  // hasPart uniprot:P32917 uniprot:P23561
  species Ste5Ste11Gbg in compartment = 0;  // hasPart uniprot:P23561 uniprot:P32917 uniprot:A6ZP55 uniprot:P53130
  species Ste5Ste11GbgFus3 in compartment = 0;  // hasPart uniprot:P16892 uniprot:P53130 uniprot:A6ZP55 uniprot:P23561
  species Ste5Ste11GbgFus3P in compartment = 0;  // hasPart uniprot:P16892 uniprot:P53130 uniprot:A6ZP55 uniprot:P23561
  species Ste5Ste11GbgKss1 in compartment = 0;  // hasPart uniprot:P14681 uniprot:P53130 uniprot:A6ZP55 uniprot:P23561
  species Ste5Ste11GbgKss1P in compartment = 0;  // hasPart uniprot:P14681 uniprot:P53130 uniprot:A6ZP55 uniprot:P23561
  species Ste5Ste11GbgP in compartment = 0;  // hasPart uniprot:P53130 uniprot:A6ZP55 uniprot:P23561 uniprot:P32917
  species $p in compartment = 0;
  species $s in compartment = 0;

  // Parameters:
  alphaA = 1;
  alphae = 10;
  alphas = 2;
  alphastim = 1;
  alphat = 0;
  betaA = 1;
  betae = 360;
  betas = 20;
  betastim = 1;
  betat = 0;
  k1 = 0.01;
  k10 = 1;
  k11 = 1;
  k12 = 1;
  k13 = 1;
  k14 = 0.1;
  k15 = 0.1;
  k16 = 0.1;
  k17 = 1;
  k18 = 10;
  k19 = 1;
  k2 = 0.01;
  k20 = 1;
  k21 = 1;
  k22 = 1;
  k23 = 1;
  k24 = 0.01;
  k25 = 1;
  k26 = 0.1;
  k27 = 1;
  k28 = 0.01;
  k29 = 0.01;
  k3 = 1;
  k30 = 0.1;
  k31 = 1;
  k32 = 1;
  k33 = 1;
  k34 = 1;
  k4 = 1;
  k5 = 1;
  k6 = 1;
  k7 = 10;
  k8 = 0.1;
  k9 = 1;

  // Assignment rules:
  beta := betastim*betaA*piecewise(1 - exp(-(time - betat)/betas), (time >= betat) && (time <= betae), piecewise(exp(-(time - betae)/betas), time > betae, 0));
  alpha := alphastim*piecewise(alphaA*(1 - exp(-(time - alphat)/alphas)), (time >= alphat) && (time <= alphae), piecewise(alphaA*exp(-(time - alphat)/alphas), time >= alphae, 0));
  observable_task2_model2_schaber1_FREP := FREP;
  observable_plot2_PREP_datagen1 := task2_model2_schaber1_PREP;
  observable_task2_model2_schaber1_Kss1PP := Kss1PP;
  observable_plot2_Fus3PP_datagen1 := task2_model2_schaber1_Fus3PP;
  observable_plot1_FREP_datagen1 := task1_model1_schaber1_FREP;
  observable_plot1_PREP_datagen1 := task1_model1_schaber1_PREP;
  observable_plot1_Kss1PP_datagen1 := task1_model1_schaber1_Kss1PP;
  observable_task1_model1_schaber1_Fus3PP := Fus3PP;
  observable_plot0_FREP_datagen1 := task0_model0_schaber1_FREP;
  observable_task0_model0_schaber1_PREP := PREP;
  observable_plot0_Kss1PP_datagen1 := task0_model0_schaber1_Kss1PP;
  observable_plot0_Fus3PP_datagen1 := task0_model0_schaber1_Fus3PP;
  observable_task0_model0_schaber1_beta := beta;
  observable_task0_model0_schaber1_alpha := alpha;

  // Reactions:
  v1: Ste11 + Ste5 -> Ste5Ste11; compartment*k1*Ste5*Ste11;  // isVersionOf GO:0006461
  v10: Ste5Ste11GbgKss1 -> Ste5Ste11GbgKss1P; compartment*k10*Ste5Ste11GbgKss1;  // isVersionOf GO:0016310
  v11: Ste5Ste11GbgKss1P -> Kss1PP + Ste5Ste11GbgP; compartment*k11*Ste5Ste11GbgKss1P;  // isVersionOf GO:0043241 GO:0016310
  v12: Kss1 + Ste5Ste11GbgP -> Ste5Ste11GbgKss1P; compartment*k12*Ste5Ste11GbgP*Kss1;  // isVersionOf GO:0006461
  v13: Ste11 -> Ste11P; compartment*k13*Ste11*beta;  // isVersionOf GO:0016310
  v14: Ste11P -> Ste11; compartment*k14*Ste11P;  // isVersionOf GO:0016311
  v15: Kss1 -> Kss1PP; compartment*(k15*Kss1*Ste11P + k30*Kss1*Ste11Ubi);  // modifiers: Ste11Ubi, Ste11P; isVersionOf GO:0016310
  v16: Kss1PP -> Kss1; compartment*(k16*Kss1PP + k28*Kss1PP*Fus3PP);  // modifiers: Fus3PP; isVersionOf GO:0016311
  v17: Ste12Kss1 -> Ste12 + 2 Kss1; compartment*k17*Ste12Kss1;  // isVersionOf GO:0043241
  v18: Ste12 + 2 Kss1 -> Ste12Kss1; compartment*k18*Kss1*Ste12;  // isVersionOf GO:0006461
  v19: Ste12 -> Ste12P; compartment*(k19*Ste12*Fus3PP + k29*Ste12*Kss1PP);  // modifiers: Kss1PP, Fus3PP; isVersionOf GO:0016310
  v2: Gbg + Ste5Ste11 -> Ste5Ste11Gbg; compartment*k2*Ste5Ste11*Gbg*alpha;  // isVersionOf GO:0006461
  v20: $s -> PREP; compartment*k20*Ste12P;  // modifiers: Ste12P; isVersionOf GO:0010467
  v21: Ste12TeSte5Kss1 -> Ste12TeSte5 + Kss1; compartment*k21*Ste12TeSte5Kss1;  // isVersionOf GO:0043241
  v22: Ste12TeSte5 + Kss1 -> Ste12TeSte5Kss1; compartment*k22*Kss1*Ste12TeSte5;  // isVersionOf GO:0006461
  v23: Ste12TeSte5 -> Ste12TeSte5P; compartment*k23*Ste12TeSte5*Kss1PP;  // modifiers: Kss1PP; isVersionOf GO:0016310
  v24: Ste12TeSte5 -> $p; compartment*k24*Ste12TeSte5*Fus3PP;  // modifiers: Fus3PP
  v25: $s -> FREP; compartment*k25*Ste12TeSte5P;  // modifiers: Ste12TeSte5P; isVersionOf GO:0010467
  v26: Fus3PP -> Fus3; compartment*k26*Fus3PP;  // isVersionOf GO:0016311
  v27: Ste5Ste11 -> Ste11 + Ste5; compartment*k27*Ste5Ste11;  // isVersionOf GO:0043241
  v28: Ste12P -> Ste12; compartment*k31*Ste12P;  // isVersionOf GO:0016311
  v29: PREP -> $p; compartment*k32*PREP;  // isVersionOf GO:0030163
  v3: Fus3 + Ste5Ste11Gbg -> Ste5Ste11GbgFus3; compartment*k3*Ste5Ste11Gbg*Fus3;  // isVersionOf GO:0006461
  v30: Ste12TeSte5P -> Ste12TeSte5; compartment*k33*Ste12TeSte5P;  // isVersionOf GO:0016311
  v31: FREP -> $p; compartment*k34*FREP;  // isVersionOf GO:0030163
  v4: Ste5Ste11GbgFus3 -> Ste5Ste11GbgFus3P; compartment*k4*Ste5Ste11GbgFus3;  // isVersionOf GO:0016310
  v5: Ste5Ste11GbgFus3P -> Ste5Ste11GbgP + Fus3PP; compartment*k5*Ste5Ste11GbgFus3P;  // isVersionOf GO:0043241 GO:0016310
  v6: Ste5Ste11GbgP + Fus3 -> Ste5Ste11GbgFus3P; compartment*k6*Fus3*Ste5Ste11GbgP;  // isVersionOf GO:0006461
  v7: Ste5Ste11GbgP + Ste5 -> Ste11Ubi + Gbg; compartment*k7*Ste5Ste11GbgP;  // isVersionOf GO:0043241
  v8: Ste11Ubi -> $p; compartment*k8*Ste11Ubi;  // isVersionOf GO:0030163
  v9: Kss1 + Ste5Ste11Gbg -> Ste5Ste11GbgKss1; compartment*k9*Ste5Ste11Gbg*Kss1;  // isVersionOf GO:0006461
end
