// SBML level 2 version 4

model schoeberl1()

  // Compartments:
  compartment extracellular_volume = 1;  // GO:0005615
  compartment cytoplasm = 1;  // GO:0005737
  compartment endosomal_volume = 4.3e-6;  // GO:0005768

  // Species:
  substanceOnly species $EGF_EGFR_act in cytoplasm; EGF_EGFR_act is "t_EGF_EGFR*";
  substanceOnly species $ERK_PP in cytoplasm; ERK_PP is "t_ERK_PP";
  substanceOnly species $MEK_PP in cytoplasm; MEK_PP is "t_MEK_PP";
  substanceOnly species $Raf_act in cytoplasm; Raf_act is "t_Raf*";
  substanceOnly species $Ras_GTP in cytoplasm; Ras_GTP is "t_Ras_GTP";
  substanceOnly species $SHC_P_t in cytoplasm; SHC_P_t is "t_SHC_P_t";
  // 4962 molecules correspond roughly to 50 ng/ml, concentration used throughout the article (MW~6045 Da, vol=1e-12l)
  substanceOnly species $EGF in extracellular_volume = 4962;
  substanceOnly species EGF_EGFRi in cytoplasm = 0; EGF_EGFRi is "EGF-EGFRi";  // hasVersion uniprot:P00533 uniprot:P01133
  substanceOnly species x11 in cytoplasm = 0; x11 is "EGF-EGFRi^2";
  substanceOnly species Prot in cytoplasm = 81000;
  substanceOnly species EGFideg in endosomal_volume = 0;
  substanceOnly species GAP in cytoplasm = 12000;  // isVersionOf omim:139150 uniprot:P20936 interpro:IPR001936
  substanceOnly species EGF_EGFR_2_GAP in endosomal_volume = 0; EGF_EGFR_2_GAP is "EGF-EGFR*^2-GAP";
  substanceOnly species EGFi in cytoplasm = 0;
  substanceOnly species EGF_EGFRi_2_GAP in cytoplasm = 0; EGF_EGFRi_2_GAP is "EGF-EGFRi*^2-GAP";
  substanceOnly species EGF_EGFRi_2_GAP_Grb2 in cytoplasm = 0; EGF_EGFRi_2_GAP_Grb2 is "EGF-EGFRi*^2-GAP-Grb2";
  substanceOnly species EGF_EGFRi_2_GAP_Grb2_Sos in cytoplasm = 0; EGF_EGFRi_2_GAP_Grb2_Sos is "EGF-EGFRi*^2-GAP-Grb2-Sos";
  substanceOnly species EGFR in extracellular_volume = 50000;
  substanceOnly species EGF_EGFRi_2_GAP_Grb2_Sos_Ras_GDP in cytoplasm = 0; EGF_EGFRi_2_GAP_Grb2_Sos_Ras_GDP is "EGF-EGFRi*^2-GAP-Grb2-Sos-Ras-GDP";
  substanceOnly species EGF_EGFRi_2_GAP_Grb2_Sos_Ras_GTP in cytoplasm = 0; EGF_EGFRi_2_GAP_Grb2_Sos_Ras_GTP is "EGF-EGFRi*^2-GAP-Grb2-Sos-Ras-GTP";
  substanceOnly species Grb2 in cytoplasm = 11000;  // isVersionOf omim:108355 uniprot:P62993
  substanceOnly species EGF_EGFR_2_GAP_Grb2 in cytoplasm = 0; EGF_EGFR_2_GAP_Grb2 is "EGF-EGFR*^2-GAP-Grb2";
  substanceOnly species Sos in cytoplasm = 26300;  // isVersionOf omim:182530 uniprot:Q07889
  substanceOnly species EGF_EGFR_2_GAP_Grb2_Sos in cytoplasm = 0; EGF_EGFR_2_GAP_Grb2_Sos is "EGF-EGFR*^2-GAP-Grb2-Sos";
  substanceOnly species Ras_GDP in cytoplasm = 72000; Ras_GDP is "Ras-GDP";  // hasPart uniprot:P01112 CHEBI:17552
  substanceOnly species EGF_EGFR_2_GAP_Grb2_Sos_Ras_GDP in cytoplasm = 0; EGF_EGFR_2_GAP_Grb2_Sos_Ras_GDP is "EGF-EGFR*^2-GAP-Grb2-Sos-Ras-GDP";
  substanceOnly species x28 in cytoplasm = 0; x28 is "Ras-GTP";  // hasPart uniprot:P01112 CHEBI:15996
  substanceOnly species EGF_EGFR_2_GAP_Grb2_Sos_Ras_GTP in cytoplasm = 0; EGF_EGFR_2_GAP_Grb2_Sos_Ras_GTP is "EGF-EGFR*^2-GAP-Grb2-Sos-Ras-GTP";
  substanceOnly species EGF_EGFR in cytoplasm = 0; EGF_EGFR is "EGF-EGFR";  // isVersionOf uniprot:P00533 uniprot:P01133 reactome:REACT_9893
  substanceOnly species Grb2_Sos in cytoplasm = 40000; Grb2_Sos is "Grb2-Sos";
  substanceOnly species x31 in cytoplasm = 101000; x31 is "Shc";  // isVersionOf omim:605217 uniprot:P98077
  substanceOnly species x32 in cytoplasm = 0; x32 is "EGF-EGFR*^2-GAP-Shc";
  substanceOnly species x33 in cytoplasm = 0; x33 is "EGF-EGFR*^2-GAP-Shc*";
  substanceOnly species EGF_EGFR_2_GAP_Shc_Grb2 in cytoplasm = 0; EGF_EGFR_2_GAP_Shc_Grb2 is "EGF-EGFR*^2-GAP-Shc*-Grb2";
  substanceOnly species EGF_EGFR_2_GAP_Shc_Grb2_Sos in cytoplasm = 0; EGF_EGFR_2_GAP_Shc_Grb2_Sos is "EGF-EGFR*^2-GAP-Shc*-Grb2-Sos";
  substanceOnly species x36 in cytoplasm = 0; x36 is "EGF-EGFR*^2-GAP-Shc*-Grb2-Sos-Ras-GDP";
  substanceOnly species x37 in cytoplasm = 0; x37 is "EGF-EGFR*^2-GAP-Shc*-Grb2-Sos-Ras-GTP";
  substanceOnly species Shc_Grb2_Sos in cytoplasm = 0; Shc_Grb2_Sos is "Shc*-Grb2-Sos";
  substanceOnly species Shc_Grb2 in cytoplasm = 0; Shc_Grb2 is "Shc*-Grb2";
  substanceOnly species x4 in cytoplasm = 0; x4 is "EGF-EGFR^2";  // isVersionOf uniprot:P00533 uniprot:P01133 reactome:REACT_9820
  substanceOnly species x40 in cytoplasm = 0; x40 is "Shc*";
  substanceOnly species x41 in cytoplasm = 40000; x41 is "Raf";  // isVersionOf omim:164760 uniprot:P04049
  substanceOnly species Raf_Ras_GTP in cytoplasm = 0; Raf_Ras_GTP is "Raf-Ras-GTP";
  substanceOnly species x43 in cytoplasm = 0; x43 is "Ras-GTP*";
  substanceOnly species Phosphotase1 in cytoplasm = 40000;
  substanceOnly species x45 in cytoplasm = 0; x45 is "Raf*";
  substanceOnly species Raf_P_ase in cytoplasm = 0; Raf_P_ase is "Raf*-P'ase";
  substanceOnly species MEK in cytoplasm = 22000000;  // isVersionOf omim:176872 uniprot:A4QPA9 uniprot:Q02750
  substanceOnly species MEK_Raf in cytoplasm = 0; MEK_Raf is "MEK-Raf*";
  substanceOnly species MEK_P in cytoplasm = 0; MEK_P is "MEK-P";  // isVersionOf omim:176872 kegg.compound:C00562 uniprot:A4QPA9 uniprot:Q02750
  substanceOnly species x5 in cytoplasm = 0; x5 is "EGF-EGFR*^2";  // isVersionOf uniprot:P01133 uniprot:P00533 kegg.compound:C00562
  substanceOnly species MEK_P_Raf in cytoplasm = 0; MEK_P_Raf is "MEK-P-Raf*";
  substanceOnly species x51 in cytoplasm = 0; x51 is "MEK-PP";
  substanceOnly species MEK_PP_P_ase2 in cytoplasm = 0; MEK_PP_P_ase2 is "MEK-PP-P'ase2";
  substanceOnly species Phosphatase2 in cytoplasm = 40000;
  substanceOnly species MEK_P_P_ase2 in cytoplasm = 0; MEK_P_P_ase2 is "MEK-P-P'ase2";
  substanceOnly species ERK in cytoplasm = 21000000;  // isVersionOf omim:176948 uniprot:P28482
  substanceOnly species ERK_MEK_PP in cytoplasm = 0; ERK_MEK_PP is "ERK-MEK-PP";
  substanceOnly species ERK_P in cytoplasm = 0; ERK_P is "ERK-P";
  substanceOnly species ERK_P_MEK_PP in cytoplasm = 0; ERK_P_MEK_PP is "ERK-P-MEK-PP";
  substanceOnly species x59 in cytoplasm = 0; x59 is "ERK-PP";
  substanceOnly species EGFRi in cytoplasm = 0;  // isVersionOf uniprot:P00533
  substanceOnly species Phosphotase3 in cytoplasm = 10000000;
  substanceOnly species ERK_PP_P_ase3 in cytoplasm = 0; ERK_PP_P_ase3 is "ERK-PP-P'ase3";
  substanceOnly species ERK_P_P_ase3 in cytoplasm = 0; ERK_P_P_ase3 is "ERK-P-P'ase3";
  substanceOnly species x63 in cytoplasm = 0; x63 is "EGF-EGFRi*^2-GAP-Shc";
  substanceOnly species x64 in cytoplasm = 0; x64 is "EGF-EGFRi*^2-GAP-Shc*";
  substanceOnly species EGF_EGFRi_2_GAP_Shc_Grb2 in cytoplasm = 0; EGF_EGFRi_2_GAP_Shc_Grb2 is "EGF-EGFRi*^2-GAP-Shc*-Grb2";
  substanceOnly species EGF_EGFRi_2_GAP_Shc_Grb2_Sos in cytoplasm = 0; EGF_EGFRi_2_GAP_Shc_Grb2_Sos is "EGF-EGFRi*^2-GAP-Shc*-Grb2-Sos";
  substanceOnly species x67 in cytoplasm = 0; x67 is "EGF-EGFRi*^2-GAP-Shc*-Grb2-Sos-Ras-GDP";
  substanceOnly species x68 in cytoplasm = 0; x68 is "EGF-EGFRi*^2-GAP-Shc*-Grb2-Sos-Ras-GTP";
  substanceOnly species x69 in cytoplasm = 0; x69 is "Rasi-GTP";
  substanceOnly species EGF_EGFR_2_GAP_Grb2_Prot in cytoplasm = 0; EGF_EGFR_2_GAP_Grb2_Prot is "EGF-EGFR*^2-GAP-Grb2-Prot";  // hasVersion GO:0030119 uniprot:P01133 uniprot:P00533 uniprot:P62993
  substanceOnly species Rafi_Rasi_GTP in cytoplasm = 0; Rafi_Rasi_GTP is "Rafi-Rasi-GTP";
  substanceOnly species x71 in cytoplasm = 0; x71 is "Rasi-GTP*";
  substanceOnly species Rafi in cytoplasm = 0; Rafi is "Rafi*";
  substanceOnly species Rafi_P_ase in cytoplasm = 0; Rafi_P_ase is "Rafi*-P'ase";
  substanceOnly species MEKi_Rafi in cytoplasm = 0; MEKi_Rafi is "MEKi-Rafi*";
  substanceOnly species MEKi_P in cytoplasm = 0; MEKi_P is "MEKi-P";
  substanceOnly species MEKi_P_Rafi in cytoplasm = 0; MEKi_P_Rafi is "MEKi-P-Rafi*";
  substanceOnly species MEKi_PP in cytoplasm = 0; MEKi_PP is "MEKi-PP";
  substanceOnly species MEKi_PP_P_ase2i in cytoplasm = 0; MEKi_PP_P_ase2i is "MEKi-PP-P'ase2i";
  substanceOnly species MEKi_P_P_ase2i in cytoplasm = 0; MEKi_P_P_ase2i is "MEKi-P-P'ase2i";
  substanceOnly species x8 in cytoplasm = 0; x8 is "EGF-EGFRi*^2";  // hasVersion uniprot:P01133 uniprot:P00533
  substanceOnly species ERKi_MEKi_PP in cytoplasm = 0; ERKi_MEKi_PP is "ERKi-MEKi-PP";
  substanceOnly species ERKi_P in cytoplasm = 0; ERKi_P is "ERKi-P";
  substanceOnly species ERKi_P_MEKi_PP in cytoplasm = 0; ERKi_P_MEKi_PP is "ERKi-P-MEKi-PP";
  substanceOnly species ERKi_PP in cytoplasm = 0; ERKi_PP is "ERKi-PP";
  substanceOnly species ERKi_PP_P_ase3i in cytoplasm = 0; ERKi_PP_P_ase3i is "ERKi-PP-P'ase3i";
  substanceOnly species ERKi_P_P_ase3i in cytoplasm = 0; ERKi_P_P_ase3i is "ERKi-P-P'ase3i";
  substanceOnly species EGFRideg in cytoplasm = 0;
  substanceOnly species EGF_EGFRi_2deg in cytoplasm = 0; EGF_EGFRi_2deg is "EGF-EGFRi*^2deg";
  substanceOnly species EGF_EGFR_2_GAP_Grb2_Sos_Prot in cytoplasm = 0; EGF_EGFR_2_GAP_Grb2_Sos_Prot is "EGF-EGFR*^2-GAP-Grb2-Sos-Prot";
  substanceOnly species x89 in cytoplasm = 0; x89 is "EGF-EGFR*^2-GAP-Grb2-Sos-Ras-GDP-Prot";
  substanceOnly species Proti in cytoplasm = 0;  // isVersionOf GO:0030119
  substanceOnly species x90 in cytoplasm = 0; x90 is "EGF-EGFR*^2-GAP-Grb2-Sos-Ras-GTP-Prot";
  substanceOnly species EGF_EGFR_2_GAP_Shc_Grb2_Prot in cytoplasm = 0; EGF_EGFR_2_GAP_Shc_Grb2_Prot is "EGF-EGFR*^2-GAP-Shc*-Grb2-Prot";
  substanceOnly species EGF_EGFR_2_GAP_Shc_Grb2_Sos_Prot in cytoplasm = 0; EGF_EGFR_2_GAP_Shc_Grb2_Sos_Prot is "EGF-EGFR*^2-GAP-Shc*-Grb2-Sos-Prot";
  substanceOnly species x93 in cytoplasm = 0; x93 is "EGF-EGFR*^2-GAP-Shc*-Grb2-Sos-Ras-GDP-Prot";
  substanceOnly species x94 in cytoplasm = 0; x94 is "EGF-EGFR*^2-GAP-Shc*-Grb2-Sos-Ras-GTP-Prot";

  // Parameters:
  var C; C is "C_internalization";
  Km36 = 200000000000000;
  RT = 50000; RT is "total_Receptors";
  Vm36 = 61200;
  k1 = 0.003;
  k10 = 3.25581;
  k11 = 0.001;
  k12 = 60;
  k13 = 130.2;
  k14 = 0.0001;
  k15 = 600000;
  k16 = 0.001;
  k17 = 0.001;
  k18 = 0.0015;
  k19 = 30;
  k2 = 0.001;
  k20 = 0.00021;
  k21 = 1.38;
  k22 = 0.0021;
  k23 = 360;
  k24 = 0.001;
  k25 = 0.001;
  k28 = 0.0001;
  k29 = 60;
  k3 = 60;
  k32 = 6;
  k33 = 12;
  k34 = 1.8;
  k35 = 0.09;
  k37 = 18;
  k4 = 1.038e-5;
  k40 = 0.003;
  k41 = 0.003;
  k42 = 0.0071;
  k43 = 60;
  k44 = 0.00111;
  k45 = 210;
  k47 = 174;
  k48 = 0.00143;
  k49 = 3.48;
  k50 = 2.5e-5;
  k52 = 0.00534;
  k53 = 960;
  k55 = 342;
  k56 = 0.00145;
  k57 = 16.2;
  k58 = 0.0005;
  k59 = 18;
  k6 = 0.003;
  k60 = 0.04002;
  k61 = 0.01002;
  k7 = 0.003;
  k8 = 0.0001;
  kr1 = 0.228;
  kr10 = 0.66;
  kr11 = 6;
  kr12 = 0.6;
  kr14 = 12;
  kr16 = 16.5;
  kr17 = 3.6;
  kr18 = 78;
  kr19 = 1e-5;
  kr2 = 6;
  kr20 = 24;
  kr21 = 2.2e-5;
  kr22 = 6;
  kr23 = 36;
  kr24 = 33;
  kr25 = 1.284;
  kr28 = 0.318;
  kr29 = 7e-5;
  kr3 = 0.6;
  kr32 = 2.4e-5;
  kr33 = 0.0021;
  kr34 = 0.00045;
  kr35 = 0.00045;
  kr37 = 9e-5;
  kr4 = 0.0996;
  kr40 = 3.84;
  kr41 = 2.574;
  kr42 = 12;
  kr44 = 1.0998;
  kr48 = 48;
  kr50 = 30;
  kr52 = 1.98;
  kr56 = 36;
  kr58 = 30;
  kr6 = 0.3;
  kr8 = 12;
  x1mult = 1;

  // Assignment rules:
  k5 := piecewise(1.55, C < 3100, 0.2, C > 100000, C*(-1.35e-5) + 1.55);
  C := RT/(kr1/(k1*EGF) + 1);
  EGF_EGFR_act := x5 + EGF_EGFR_2_GAP_Grb2_Prot + EGF_EGFR_2_GAP + EGF_EGFR_2_GAP_Grb2 + EGF_EGFR_2_GAP_Grb2_Sos + EGF_EGFR_2_GAP_Grb2_Sos_Ras_GDP + EGF_EGFR_2_GAP_Grb2_Sos_Ras_GTP + x32 + x33 + EGF_EGFR_2_GAP_Shc_Grb2 + EGF_EGFR_2_GAP_Shc_Grb2_Sos + x36 + x37 + EGF_EGFR_2_GAP_Grb2_Sos_Prot + x89 + x90 + EGF_EGFR_2_GAP_Shc_Grb2_Prot + EGF_EGFR_2_GAP_Shc_Grb2_Sos_Prot + x93 + x94 + x8 + x11 + EGF_EGFRi_2_GAP + EGF_EGFRi_2_GAP_Grb2 + EGF_EGFRi_2_GAP_Grb2_Sos + EGF_EGFRi_2_GAP_Grb2_Sos_Ras_GDP + EGF_EGFRi_2_GAP_Grb2_Sos_Ras_GTP + x63 + x64 + EGF_EGFRi_2_GAP_Shc_Grb2 + EGF_EGFRi_2_GAP_Shc_Grb2_Sos + x67 + x68;
  SHC_P_t := x33 + EGF_EGFR_2_GAP_Shc_Grb2 + EGF_EGFR_2_GAP_Shc_Grb2_Sos + x36 + x37 + Shc_Grb2_Sos + Shc_Grb2 + x40 + EGF_EGFR_2_GAP_Shc_Grb2_Prot + EGF_EGFR_2_GAP_Shc_Grb2_Sos_Prot + x93 + x94 + x64 + EGF_EGFRi_2_GAP_Shc_Grb2 + EGF_EGFRi_2_GAP_Shc_Grb2_Sos + x67 + x68;
  Raf_act := x45 + Raf_P_ase + MEK_Raf + MEK_P_Raf + Rafi + Rafi_P_ase + MEKi_Rafi + MEKi_P_Rafi;
  ERK_PP := x59 + ERKi_PP;
  MEK_PP := x51 + MEKi_PP;
  Ras_GTP := Raf_Ras_GTP + x28 + Rafi_Rasi_GTP + x69;
  observable_plot2_Ras_GTP_datagen1 := task2_model2_schoeberl1_Ras_GTP;
  observable_plot2_Raf_act_datagen1 := task2_model2_schoeberl1_Raf_act;
  observable_plot2_MEK_PP_datagen1 := task2_model2_schoeberl1_MEK_PP;
  observable_plot2_ERK_PP_datagen1 := task2_model2_schoeberl1_ERK_PP;
  observable_plot1_Ras_GTP_datagen1 := task1_model1_schoeberl1_Ras_GTP;
  observable_plot1_Raf_act_datagen1 := task1_model1_schoeberl1_Raf_act;
  observable_plot1_MEK_PP_datagen1 := task1_model1_schoeberl1_MEK_PP;
  observable_plot1_ERK_PP_datagen1 := task1_model1_schoeberl1_ERK_PP;
  observable_task0_model0_schoeberl1_Ras_GTP := Ras_GTP;
  observable_task0_model0_schoeberl1_Raf_act := Raf_act;
  observable_task0_model0_schoeberl1_MEK_PP := MEK_PP;
  observable_task0_model0_schoeberl1_ERK_PP := ERK_PP;

  // Reactions:
  v1: EGFR + $EGF -> EGF_EGFR; k1*EGF*x1mult*EGFR - kr1*EGF_EGFR;  // isVersionOf reactome:REACT_9481 GO:0048408 GO:0005154
  v10: EGFi + EGFRi -> EGF_EGFRi; k10*EGFRi*EGFi - kr10*EGF_EGFRi;  // isVersionOf GO:0031623
  v100: ERKi_P + Phosphotase3 -> ERKi_P_P_ase3i; k58*Phosphotase3*ERKi_P - kr58*ERKi_P_P_ase3i;  // isDescribedBy omim:164760
  v101: ERKi_P_P_ase3i -> Phosphotase3 + ERK; k59*ERKi_P_P_ase3i;  // isDescribedBy omim:164760
  v102: EGF_EGFR_2_GAP -> EGF_EGFRi_2_GAP; k6*EGF_EGFR_2_GAP - kr6*EGF_EGFRi_2_GAP;
  v103: x32 -> x63; k6*x32 - kr6*x63;
  v104: x33 -> x64; k6*x33 - kr6*x64;
  v105: EGF_EGFR_2_GAP_Grb2_Sos -> EGF_EGFRi_2_GAP_Grb2_Sos; k6*EGF_EGFR_2_GAP_Grb2_Sos - kr6*EGF_EGFRi_2_GAP_Grb2_Sos;
  v106: Prot + EGF_EGFR_2_GAP_Grb2_Sos -> EGF_EGFR_2_GAP_Grb2_Sos_Prot; k4*EGF_EGFR_2_GAP_Grb2_Sos*Prot - kr4*EGF_EGFR_2_GAP_Grb2_Sos_Prot;
  v107: EGF_EGFR_2_GAP_Grb2_Sos_Prot -> EGF_EGFRi_2_GAP_Grb2_Sos + Proti; k5*EGF_EGFR_2_GAP_Grb2_Sos_Prot;
  v108: EGF_EGFR_2_GAP_Grb2_Sos_Ras_GDP -> EGF_EGFRi_2_GAP_Grb2_Sos_Ras_GDP; k6*EGF_EGFR_2_GAP_Grb2_Sos_Ras_GDP - kr6*EGF_EGFRi_2_GAP_Grb2_Sos_Ras_GDP;
  v109: Prot + EGF_EGFR_2_GAP_Grb2_Sos_Ras_GDP -> x89; k4*EGF_EGFR_2_GAP_Grb2_Sos_Ras_GDP*Prot - kr4*x89;
  v11: 2 EGF_EGFRi -> x11; k2*EGF_EGFRi*EGF_EGFRi - kr2*x11;
  v110: x89 -> EGF_EGFRi_2_GAP_Grb2_Sos_Ras_GDP + Proti; k5*x89;
  v111: EGF_EGFR_2_GAP_Grb2_Sos_Ras_GTP -> EGF_EGFRi_2_GAP_Grb2_Sos_Ras_GTP; k6*EGF_EGFR_2_GAP_Grb2_Sos_Ras_GTP - kr6*EGF_EGFRi_2_GAP_Grb2_Sos_Ras_GTP;
  v112: Prot + EGF_EGFR_2_GAP_Grb2_Sos_Ras_GTP -> x90; k4*EGF_EGFR_2_GAP_Grb2_Sos_Ras_GTP*Prot - kr4*x90;
  v113: x90 -> EGF_EGFRi_2_GAP_Grb2_Sos_Ras_GTP + Proti; k5*x90;
  v114: EGF_EGFR_2_GAP_Shc_Grb2 -> EGF_EGFRi_2_GAP_Shc_Grb2; k6*EGF_EGFR_2_GAP_Shc_Grb2 - kr6*EGF_EGFRi_2_GAP_Shc_Grb2;
  v115: Prot + EGF_EGFR_2_GAP_Shc_Grb2 -> EGF_EGFR_2_GAP_Shc_Grb2_Prot; k4*EGF_EGFR_2_GAP_Shc_Grb2*Prot - kr4*EGF_EGFR_2_GAP_Shc_Grb2_Prot;
  v116: EGF_EGFR_2_GAP_Shc_Grb2_Prot -> EGF_EGFRi_2_GAP_Shc_Grb2 + Proti; k5*EGF_EGFR_2_GAP_Shc_Grb2_Prot;
  v117: EGF_EGFR_2_GAP_Shc_Grb2_Sos -> EGF_EGFRi_2_GAP_Shc_Grb2_Sos; k6*EGF_EGFR_2_GAP_Shc_Grb2_Sos - kr6*EGF_EGFRi_2_GAP_Shc_Grb2_Sos;
  v118: Prot + EGF_EGFR_2_GAP_Shc_Grb2_Sos -> EGF_EGFR_2_GAP_Shc_Grb2_Sos_Prot; k4*EGF_EGFR_2_GAP_Shc_Grb2_Sos*Prot - kr4*EGF_EGFR_2_GAP_Shc_Grb2_Sos_Prot;
  v119: EGF_EGFR_2_GAP_Shc_Grb2_Sos_Prot -> EGF_EGFRi_2_GAP_Shc_Grb2_Sos + Proti; k5*EGF_EGFR_2_GAP_Shc_Grb2_Sos_Prot;
  v12: x11 -> x8; k3*x11 - kr3*x8;
  v120: x36 -> x67; k6*x36 - kr6*x67;
  v121: Prot + x36 -> x93; k4*x36*Prot - kr4*x93;
  v122: x93 -> x67 + Proti; k5*x93;
  v123: x37 -> x68; k6*x37 - kr6*x68;
  v124: Prot + x37 -> x94; k4*x37*Prot - kr4*x94;
  v125: x94 -> Proti + x68; k5*x94;
  v13: => EGFR; k13;
  v14: GAP + x8 -> EGF_EGFRi_2_GAP; k14*x8*GAP - kr14*EGF_EGFRi_2_GAP;
  v15: Proti => Prot; k15*Proti;
  v16: EGF_EGFR_2_GAP + Grb2 -> EGF_EGFR_2_GAP_Grb2; k16*Grb2*EGF_EGFR_2_GAP - kr16*EGF_EGFR_2_GAP_Grb2;
  v17: EGF_EGFR_2_GAP_Grb2 + Sos -> EGF_EGFR_2_GAP_Grb2_Sos; k17*Sos*EGF_EGFR_2_GAP_Grb2 - kr17*EGF_EGFR_2_GAP_Grb2_Sos;
  v18: EGF_EGFR_2_GAP_Grb2_Sos + Ras_GDP -> EGF_EGFR_2_GAP_Grb2_Sos_Ras_GDP; k18*Ras_GDP*EGF_EGFR_2_GAP_Grb2_Sos - kr18*EGF_EGFR_2_GAP_Grb2_Sos_Ras_GDP;
  v19: EGF_EGFR_2_GAP_Grb2_Sos_Ras_GDP -> EGF_EGFR_2_GAP_Grb2_Sos + x28; k19*EGF_EGFR_2_GAP_Grb2_Sos_Ras_GDP - kr19*x28*EGF_EGFR_2_GAP_Grb2_Sos;
  v2: 2 EGF_EGFR -> x4; k2*EGF_EGFR*EGF_EGFR - kr2*x4;  // isVersionOf reactome:REACT_9397 GO:0046983 GO:0007171
  v20: x43 + EGF_EGFR_2_GAP_Grb2_Sos -> EGF_EGFR_2_GAP_Grb2_Sos_Ras_GTP; k20*EGF_EGFR_2_GAP_Grb2_Sos*x43 - kr20*EGF_EGFR_2_GAP_Grb2_Sos_Ras_GTP;
  v21: EGF_EGFR_2_GAP_Grb2_Sos_Ras_GTP -> Ras_GDP + EGF_EGFR_2_GAP_Grb2_Sos; k21*EGF_EGFR_2_GAP_Grb2_Sos_Ras_GTP - kr21*EGF_EGFR_2_GAP_Grb2_Sos*Ras_GDP;
  v22: EGF_EGFR_2_GAP + x31 -> x32; k22*x31*EGF_EGFR_2_GAP - kr22*x32;
  v23: x32 -> x33; k23*x32 - kr23*x33;
  v24: x33 + Grb2 -> EGF_EGFR_2_GAP_Shc_Grb2; k24*Grb2*x33 - kr24*EGF_EGFR_2_GAP_Shc_Grb2;
  v25: EGF_EGFR_2_GAP_Shc_Grb2 + Sos -> EGF_EGFR_2_GAP_Shc_Grb2_Sos; k25*Sos*EGF_EGFR_2_GAP_Shc_Grb2 - kr25*EGF_EGFR_2_GAP_Shc_Grb2_Sos;
  v26: EGF_EGFR_2_GAP_Shc_Grb2_Sos + Ras_GDP -> x36; k18*Ras_GDP*EGF_EGFR_2_GAP_Shc_Grb2_Sos - kr18*x36;
  v27: x36 -> x28 + EGF_EGFR_2_GAP_Shc_Grb2_Sos; k19*x36 - kr19*EGF_EGFR_2_GAP_Shc_Grb2_Sos*x28;
  v28: x41 + x28 -> Raf_Ras_GTP; k28*x28*x41 - kr28*Raf_Ras_GTP;
  v29: Raf_Ras_GTP -> x45 + x43; k29*Raf_Ras_GTP - kr29*x43*x45;
  v3: x4 -> x5; k3*x4 - kr3*x5;  // isVersionOf reactome:REACT_9388 GO:0004713 GO:0046777 GO:0007171
  v30: x43 + EGF_EGFR_2_GAP_Shc_Grb2_Sos -> x37; k20*EGF_EGFR_2_GAP_Shc_Grb2_Sos*x43 - kr20*x37;
  v31: x37 -> Ras_GDP + EGF_EGFR_2_GAP_Shc_Grb2_Sos; k21*x37 - kr21*EGF_EGFR_2_GAP_Shc_Grb2_Sos*Ras_GDP;
  v32: EGF_EGFR_2_GAP_Shc_Grb2_Sos -> Shc_Grb2_Sos + EGF_EGFR_2_GAP; k32*EGF_EGFR_2_GAP_Shc_Grb2_Sos - kr32*EGF_EGFR_2_GAP*Shc_Grb2_Sos;
  v33: Shc_Grb2_Sos -> Grb2_Sos + x40; k33*Shc_Grb2_Sos - kr33*x40*Grb2_Sos;
  v34: EGF_EGFR_2_GAP_Grb2_Sos -> Grb2_Sos + EGF_EGFR_2_GAP; k34*EGF_EGFR_2_GAP_Grb2_Sos - kr34*EGF_EGFR_2_GAP*Grb2_Sos;
  v35: Grb2_Sos -> Grb2 + Sos; k35*Grb2_Sos - kr35*Sos*Grb2;
  v36: x40 => x31; Vm36*x40/(Km36 + x40);
  v37: x33 -> x40 + EGF_EGFR_2_GAP; k37*x33 - kr37*EGF_EGFR_2_GAP*x40;
  v38: x40 + Grb2 -> Shc_Grb2; k24*Grb2*x40 - kr24*Shc_Grb2;
  v39: EGF_EGFR_2_GAP_Shc_Grb2 -> Shc_Grb2 + EGF_EGFR_2_GAP; k37*EGF_EGFR_2_GAP_Shc_Grb2 - kr37*EGF_EGFR_2_GAP*Shc_Grb2;
  v4: Prot + EGF_EGFR_2_GAP_Grb2 -> EGF_EGFR_2_GAP_Grb2_Prot; k4*EGF_EGFR_2_GAP_Grb2*Prot - kr4*EGF_EGFR_2_GAP_Grb2_Prot;
  v40: Shc_Grb2 + Sos -> Shc_Grb2_Sos; k40*Sos*Shc_Grb2 - kr40*Shc_Grb2_Sos;
  v41: x33 + Grb2_Sos -> EGF_EGFR_2_GAP_Shc_Grb2_Sos; k41*Grb2_Sos*x33 - kr41*EGF_EGFR_2_GAP_Shc_Grb2_Sos;
  v42: x45 + Phosphotase1 -> Raf_P_ase; k42*Phosphotase1*x45 - kr42*Raf_P_ase;
  v43: Raf_P_ase -> Phosphotase1 + x41; k43*Raf_P_ase;
  v44: x45 + MEK -> MEK_Raf; k44*MEK*x45 - kr44*MEK_Raf;
  v45: MEK_Raf -> x45 + MEK_P; k45*MEK_Raf;
  v46: x45 + MEK_P -> MEK_P_Raf; k44*MEK_P*x45 - kr44*MEK_P_Raf;
  v47: MEK_P_Raf -> x45 + x51; k47*MEK_P_Raf;
  v48: Phosphatase2 + x51 -> MEK_PP_P_ase2; k48*x51*Phosphatase2 - kr48*MEK_PP_P_ase2;
  v49: MEK_PP_P_ase2 -> Phosphatase2 + MEK_P; k49*MEK_PP_P_ase2;
  v5: EGF_EGFR_2_GAP_Grb2_Prot -> Proti + EGF_EGFRi_2_GAP_Grb2; k5*EGF_EGFR_2_GAP_Grb2_Prot;
  v50: MEK_P + Phosphatase2 -> MEK_P_P_ase2; k50*Phosphatase2*MEK_P - kr50*MEK_P_P_ase2;
  v51: MEK_P_P_ase2 -> Phosphatase2 + MEK; k49*MEK_P_P_ase2;
  v52: x51 + ERK -> ERK_MEK_PP; k52*ERK*x51 - kr52*ERK_MEK_PP;
  v53: ERK_MEK_PP -> ERK_P + x51; k53*ERK_MEK_PP;
  v54: ERK_P + x51 -> ERK_P_MEK_PP; k52*x51*ERK_P - kr52*ERK_P_MEK_PP;
  v55: ERK_P_MEK_PP -> x51 + x59; k55*ERK_P_MEK_PP;
  v56: Phosphotase3 + x59 -> ERK_PP_P_ase3; k56*x59*Phosphotase3 - kr56*ERK_PP_P_ase3;
  v57: ERK_PP_P_ase3 -> Phosphotase3 + ERK_P; k57*ERK_PP_P_ase3;
  v58: ERK_P + Phosphotase3 -> ERK_P_P_ase3; k58*Phosphotase3*ERK_P - kr58*ERK_P_P_ase3;
  v59: ERK_P_P_ase3 -> Phosphotase3 + ERK; k59*ERK_P_P_ase3;
  v6: EGFR -> EGFRi; k6*EGFR - kr6*EGFRi;  // isVersionOf GO:0031623
  v60: EGFRi => EGFRideg; k60*EGFRi;
  v61: EGFi => EGFideg; k61*EGFi;
  v62: x8 => EGF_EGFRi_2deg; k60*x8;
  v63: Grb2 + EGF_EGFRi_2_GAP -> EGF_EGFRi_2_GAP_Grb2; k16*EGF_EGFRi_2_GAP*Grb2 - kr16*EGF_EGFRi_2_GAP_Grb2;
  v64: EGF_EGFRi_2_GAP_Grb2 + Sos -> EGF_EGFRi_2_GAP_Grb2_Sos; k17*Sos*EGF_EGFRi_2_GAP_Grb2 - kr17*EGF_EGFRi_2_GAP_Grb2_Sos;
  v65: EGF_EGFRi_2_GAP_Grb2_Sos + Ras_GDP -> EGF_EGFRi_2_GAP_Grb2_Sos_Ras_GDP; k18*Ras_GDP*EGF_EGFRi_2_GAP_Grb2_Sos - kr18*EGF_EGFRi_2_GAP_Grb2_Sos_Ras_GDP;
  v66: EGF_EGFRi_2_GAP_Grb2_Sos_Ras_GDP -> EGF_EGFRi_2_GAP_Grb2_Sos + x69; k19*EGF_EGFRi_2_GAP_Grb2_Sos_Ras_GDP - kr19*x69*EGF_EGFRi_2_GAP_Grb2_Sos;
  v67: EGF_EGFRi_2_GAP_Grb2_Sos + x71 -> EGF_EGFRi_2_GAP_Grb2_Sos_Ras_GTP; k20*x71*EGF_EGFRi_2_GAP_Grb2_Sos - kr20*EGF_EGFRi_2_GAP_Grb2_Sos_Ras_GTP;
  v68: EGF_EGFRi_2_GAP_Grb2_Sos_Ras_GTP -> Ras_GDP + EGF_EGFRi_2_GAP_Grb2_Sos; k21*EGF_EGFRi_2_GAP_Grb2_Sos_Ras_GTP - kr21*EGF_EGFRi_2_GAP_Grb2_Sos*Ras_GDP;
  v69: EGF_EGFRi_2_GAP + x31 -> x63; k22*x31*EGF_EGFRi_2_GAP - kr22*x63;
  v7: x5 => x8; k7*x5;  // isVersionOf GO:0031623
  v70: x63 -> x64; k23*x63 - kr23*x64;
  v71: x64 + Grb2 -> EGF_EGFRi_2_GAP_Shc_Grb2; k24*Grb2*x64 - kr24*EGF_EGFRi_2_GAP_Shc_Grb2;
  v72: EGF_EGFRi_2_GAP_Shc_Grb2 + Sos -> EGF_EGFRi_2_GAP_Shc_Grb2_Sos; k25*Sos*EGF_EGFRi_2_GAP_Shc_Grb2 - kr25*EGF_EGFRi_2_GAP_Shc_Grb2_Sos;
  v73: EGF_EGFRi_2_GAP_Shc_Grb2_Sos + Ras_GDP -> x67; k18*Ras_GDP*EGF_EGFRi_2_GAP_Shc_Grb2_Sos - kr18*x67;
  v74: x67 -> x69 + EGF_EGFRi_2_GAP_Shc_Grb2_Sos; k19*x67 - kr19*EGF_EGFRi_2_GAP_Shc_Grb2_Sos*x69;
  v75: x41 + x69 -> Rafi_Rasi_GTP; k28*x69*x41 - kr28*Rafi_Rasi_GTP;
  v76: Rafi_Rasi_GTP -> Rafi + x71; k29*Rafi_Rasi_GTP - kr29*x71*Rafi;
  v77: EGF_EGFRi_2_GAP_Shc_Grb2_Sos + x71 -> x68; k20*x71*EGF_EGFRi_2_GAP_Shc_Grb2_Sos - kr20*x68;
  v78: x68 -> Ras_GDP + EGF_EGFRi_2_GAP_Shc_Grb2_Sos; k21*x68 - kr21*EGF_EGFRi_2_GAP_Shc_Grb2_Sos*Ras_GDP;
  v79: EGF_EGFRi_2_GAP_Shc_Grb2_Sos -> Shc_Grb2_Sos + EGF_EGFRi_2_GAP; k32*EGF_EGFRi_2_GAP_Shc_Grb2_Sos - kr32*EGF_EGFRi_2_GAP*Shc_Grb2_Sos;
  v8: GAP + x5 -> EGF_EGFR_2_GAP; k8*x5*GAP - kr8*EGF_EGFR_2_GAP;
  v80: EGF_EGFRi_2_GAP_Grb2_Sos -> Grb2_Sos + EGF_EGFRi_2_GAP; k34*EGF_EGFRi_2_GAP_Grb2_Sos - kr34*EGF_EGFRi_2_GAP*Grb2_Sos;
  v81: x64 -> x40 + EGF_EGFRi_2_GAP; k37*x64 - kr37*EGF_EGFRi_2_GAP*x40;
  v82: EGF_EGFRi_2_GAP_Shc_Grb2 -> Shc_Grb2 + EGF_EGFRi_2_GAP; k37*EGF_EGFRi_2_GAP_Shc_Grb2 - kr37*EGF_EGFRi_2_GAP*Shc_Grb2;
  v83: x64 + Grb2_Sos -> EGF_EGFRi_2_GAP_Shc_Grb2_Sos; k41*Grb2_Sos*x64 - kr41*EGF_EGFRi_2_GAP_Shc_Grb2_Sos;
  v84: Rafi + Phosphotase1 -> Rafi_P_ase; k42*Phosphotase1*Rafi - kr42*Rafi_P_ase;
  v85: Rafi_P_ase -> Phosphotase1 + x41; k43*Rafi_P_ase;
  v86: Rafi + MEK -> MEKi_Rafi; k44*MEK*Rafi - kr44*MEKi_Rafi;
  v87: MEKi_Rafi -> Rafi + MEKi_P; k45*MEKi_Rafi;
  v88: MEKi_P + Rafi -> MEKi_P_Rafi; k44*Rafi*MEKi_P - kr44*MEKi_P_Rafi;
  v89: MEKi_P_Rafi -> MEKi_PP + Rafi; k47*MEKi_P_Rafi;
  v9: EGF_EGFR_2_GAP_Grb2 => EGF_EGFRi_2_GAP_Grb2; k7*EGF_EGFR_2_GAP_Grb2;
  v90: Phosphatase2 + MEKi_PP -> MEKi_PP_P_ase2i; k48*MEKi_PP*Phosphatase2 - kr48*MEKi_PP_P_ase2i;
  v91: MEKi_PP_P_ase2i -> Phosphatase2 + MEKi_P; k49*MEKi_PP_P_ase2i;
  v92: MEKi_P + Phosphatase2 -> MEKi_P_P_ase2i; k50*Phosphatase2*MEKi_P - kr50*MEKi_P_P_ase2i;
  v93: MEKi_P_P_ase2i -> Phosphatase2 + MEK; k49*MEKi_P_P_ase2i;
  v94: MEKi_PP + ERK -> ERKi_MEKi_PP; k52*ERK*MEKi_PP - kr52*ERKi_MEKi_PP;
  v95: ERKi_MEKi_PP -> MEKi_PP + ERKi_P; k53*ERKi_MEKi_PP;
  v96: ERKi_P + MEKi_PP -> ERKi_P_MEKi_PP; k52*MEKi_PP*ERKi_P - kr52*ERKi_P_MEKi_PP;
  v97: ERKi_P_MEKi_PP -> MEKi_PP + ERKi_PP; k55*ERKi_P_MEKi_PP;
  v98: Phosphotase3 + ERKi_PP -> ERKi_PP_P_ase3i; k56*ERKi_PP*Phosphotase3 - kr56*ERKi_PP_P_ase3i;
  v99: ERKi_PP_P_ase3i -> Phosphotase3 + ERKi_P; k57*ERKi_PP_P_ase3i;

  // Unit definitions:
  unit plperitempermin = 1e-12 litre / (60 second * item);
  unit peritempermin = 1 / (item * 60 second);
  unit itemspermin = item / (60 second);
  unit permin = 1 / (60 second);
  unit pl = 1e-12 litre;
  unit min = 60 second;
  unit items = item;
end
