// SBML level 3 version 1

model sedaghat1()

  // Compartments:
  compartment default = 1;

  // Species:
  species L in default = 7237785;
  species P in default = 1174269000;
  species U in default = 7.237785e10;

  // Parameters:
  alphaQ = 0.0005;
  alphaR = 5e-6;
  beta = 5.2000106e-12;
  deltaL = 0.0001;
  deltaP = 0.5;
  deltaU = 0.02;
  lambda = 2000000000;

  // Assignment rules:
  observable_task1_model1_sedaghat1_L := L;
  observable_plot5_L_datagen1 := task3_model3_sedaghat1_L;
  observable_task3_model3_sedaghat1_L := L;
  observable_plot3_L_datagen3 := task5_model5_sedaghat1_L;
  observable_plot3_L_datagen5 := task0_model0_sedaghat1_L;
  observable_plot4_L_datagen3 := task2_model2_sedaghat1_L;
  observable_plot2_L_datagen3 := task4_model4_sedaghat1_L;
  observable_plot4_L_datagen1 := task6_model6_sedaghat1_L;

  // Reactions:
  v1: -> U; lambda;
  v2: U -> ; deltaU*U;
  v3: U -> P; beta*P*U;
  v4: P -> ; deltaP*P;
  v5: P -> L; alphaR*P;
  v6: -> P; alphaQ*L;  // modifiers: L
  v7: L -> ; deltaL*L;
  v8: L -> ; alphaQ*L;
end
