// SBML level 2 version 4

function F(X, T)
  piecewise(1, X >= T, 0);
end

model shenorr1()

  // Compartments:
  compartment cell = 1;  // GO:0005622

  // Species:
  species $X in cell = 0;  // isVersionOf GO:0016563 CHEBI:36080
  species Y in cell = 0;  // isVersionOf GO:0016563 CHEBI:36080
  species Z in cell = 0;  // isVersionOf CHEBI:36080

  // Assignment rules:
  observable_task0_model0_shenorr1_Z := Z;
  observable_task0_model0_shenorr1_Y := Y;

  // Reactions:
  r1: -> Y; F(X, r1_Ty);  // modifiers: X; isVersionOf GO:0045893 GO:0010467
    r1_Ty = 0.5 dimensionless;
  r2: Y -> ; r2_a*Y;  // isVersionOf GO:0030163
    r2_a = 1 dimensionless;
  r3: -> Z; F(X, r3_Ty)*F(Y, Tz);  // modifiers: Y, X; isVersionOf GO:0045893 GO:0010467
    Tz = 0.5 dimensionless; r3_Ty = 0.5 dimensionless;
  r4: Z -> ; r4_a*Z;  // isVersionOf GO:0030163
    r4_a = 1 dimensionless;

  // Events:
  e1: at (time >= 3): X = 1;
  e2: at (time >= 3.5): X = 0;
  e3: at (time >= 10): X = 1;
  e4: at (time >= 15): X = 0;

  // Unit definitions:
  unit volume = dimensionless;
  unit time = dimensionless;
  unit substance = dimensionless;
end
