// SBML level 3 version 1

model shu1()

  // Compartments:
  compartment default = 1;

  // Species:
  species A in default = 10;
  species R in default = 700;
  species T in default = 1;
  species Z in default = 0.1;

  // Parameters:
  a = 0.002;
  dA = 0.6;
  dR = 0.0001;
  dT = 0.7;
  dZ = 0.2;
  delta = 0.5;
  lambda = 1;
  mu = 0.8;
  p = 0.5;
  r = 0.2;
  rho = 0.1;

  // Assignment rules:
  observable_task4_model0_shu1_T := task2_model2_shu1_T;
  observable_task2_model0_shu1_A := A;
  observable_task6_model0_shu1_Z := task2_model2_shu1_Z;
  observable_task0_model0_shu1_R := R;
  observable_plot3_T_datagen1 := task3_model3_shu1_T;
  observable_plot2_A_datagen1 := task3_model1_shu1_A;
  observable_plot4_Z_datagen1 := task3_model3_shu1_Z;
  observable_plot1_R_datagen1 := task1_model1_shu1_R;

  // Reactions:
  v1: -> R; lambda;
  v10: -> Z; rho*A*T*Z;  // modifiers: A, T
  v11: Z -> ; dZ*Z;
  v2: A -> R; r*A;
  v3: R -> A; a*R;
  v4: R -> ; dR*R;
  v5: -> A; p*A;
  v6: A -> ; dA*A;
  v7: A -> T; mu*A*T;
  v8: T -> ; dT*T;
  v9: T -> ; delta*T*Z;  // modifiers: Z
end
