// SBML level 3 version 1

model speirs1()

  // Compartments:
  compartment default = 1;

  // Species:
  species x in default = 500000;
  species xD in default = 55000;
  species y in default = 0;
  species yD in default = 0;

  // Parameters:
  a = 0;
  gamma = 0.00785;
  lambda = 0.026;
  mu = 0.000764;
  p = 1;
  q = 100;

  // Assignment rules:
  v := (x + y)/(x + xD + y + yD);
  observable_task0_model0_speirs1_v := v;

  // Reactions:
  v1: -> x; lambda*x;
  v2: x -> y; a*x;
  v3: x -> xD; mu*x;
  v4: -> y; lambda*p*y;
  v5: y -> yD; mu*q*y;
  v6: xD -> ; gamma*xD;
  v7: yD -> ; gamma*yD;
end
