// SBML level 3 version 1

model srimani1()

  // Compartments:
  compartment default = 1;

  // Species:
  species ain in default = 0;
  species c in default = 0.1;
  species ca in default = 0;
  species cap in default = 0;
  species n in default = 0.001;

  // Parameters:
  V = 1.5;
  V1 = 0.2;
  Vc = 1e-9;
  Vm = 0.0001;
  a0 = 20.62;
  aStart = 0;
  d = 120;
  k1 = 0.2;
  kb = 1.5;
  kd = 0.1;
  kf = 2.5;
  kin = 0.007;
  kout = 0.01;
  kr = 0.02;
  ku = 0.1;
  mu0 = 0.05;
  nm = 1;

  // Assignment rules:
  observable_task0_model0_srimani1_c := c;
  observable_plot0_c_A6_datagen1 := task0_model3_srimani1_c;
  observable_plot0_c_A4_datagen1 := task0_model4_srimani1_c;
  observable_plot0_c_A10_datagen1 := task0_model1_srimani1_c;
  observable_plot0_c_A2_datagen1 := task0_model5_srimani1_c;
  observable_plot0_c_A8_datagen1 := task0_model2_srimani1_c;

  // Reactions:
  v1: -> c; k1*c/(V1 + c);
  v2: c + ain -> ca; kf*c*ain;
  v3: c -> ; ku*c;
  v4: ca -> ain + c; kb*ca;
  v5: -> ain; kin*piecewise(a0, aStart < time && time < aStart + d, 0);
  v6: ain -> ; kout*ain;
  v7: cap -> ain; kr*cap;
  v8: ca -> cap; kd*ca;
  v9: -> n; mu0*c/(V + c)*n*(1 - n/nm);  // modifiers: c
end
