// SBML level 3 version 1

model srivastava1()

  // Compartments:
  compartment default = 1;

  // Species:
  species T in default = 600;
  species T1star in default = 0;
  species Tstar in default = 0;
  species $V in default;
  species VI in default = 0.1;
  species VNI in default = 0;

  // Parameters:
  NN = 500;
  alpha = 4;
  b = 0.05;
  c = 4;
  delta = 0.26;
  epsilon = 0.5;
  eta = 0.6;
  k = 2.4e-5;
  mu = 0.01;
  mu1 = 0.015;
  s = 10;

  // Assignment rules:
  V := VI + VNI;
  observable_task0_model0_srivastava1_T := T;
  observable_task0_model0_srivastava1_T1star := T1star;
  observable_task0_model0_srivastava1_Tstar := Tstar;
  observable_task0_model0_srivastava1_VI := VI;
  observable_plot1_T_datagen1 := task1_model1_srivastava1_T;
  observable_plot4_T1star_datagen1 := task1_model1_srivastava1_T1star;
  observable_plot7_Tstar_datagen1 := task1_model1_srivastava1_Tstar;
  observable_plot10_VI_datagen1 := task1_model1_srivastava1_VI;
  observable_plot2_T_datagen1 := task2_model2_srivastava1_T;
  observable_plot5_T1star_datagen1 := task2_model2_srivastava1_T1star;
  observable_plot8_Tstar_datagen1 := task2_model2_srivastava1_Tstar;
  observable_plot11_VI_datagen1 := task2_model2_srivastava1_VI;

  // Reactions:
  v1: -> T; s;
  v10: VI -> VNI; delta*epsilon*NN*Tstar;  // modifiers: Tstar
  v11: VI -> ; c*VI;
  v12: VNI -> ; c*VNI;
  v2: T -> ; mu*T;
  v3: T -> T1star; k*T*VI;  // modifiers: VI
  v4: Tstar -> T; alpha*eta*T1star;  // modifiers: T1star
  v5: T1star -> T; b*T1star;
  v6: T1star -> ; mu1*T1star;
  v7: T1star -> Tstar; alpha*T1star;
  v8: Tstar -> ; delta*Tstar;
  v9: -> VI; delta*NN*Tstar;  // modifiers: Tstar
end
