// SBML level 3 version 1

model srivastava2()

  // Compartments:
  compartment default = 1;

  // Species:
  species T in default = 400;
  species T1rstar in default = 10;
  species T1sstar in default = 10;
  species Trstar in default = 10;
  species Tsstar in default = 10;
  species $V in default;
  species $VI in default;
  species VIr in default = 50;
  species VIs in default = 10;
  species $VNI in default;
  species VNIr in default = 0;
  species VNIs in default = 0;
  species $Vr in default;
  species $Vs in default;

  // Parameters:
  NN = 1500;
  alphar = 2;
  alphas = 7;
  br = 0.06;
  bs = 0.1;
  c = 16;
  deltar = 0.16;
  deltas = 0.26;
  epsilonr = 0.2;
  epsilons = 0.45;
  etar = 0.5;
  etas = 0.55;
  k = 2.4e-5;
  mu = 0.01;
  mu1 = 0.015;
  pi = 0.03;
  s = 10;

  // Assignment rules:
  VI := VIr + VIs;
  VNI := VNIr + VNIs;
  Vs := VIs + VNIs;
  V := VIr + VIs + VNIr + VNIs;
  Vr := VIr + VNIr;
  observable_task0_model0_srivastava2_VI := VI;
  observable_task0_model0_srivastava2_T := T;
  observable_task0_model0_srivastava2_VIs := VIs;
  observable_task0_model0_srivastava2_VIr := VIr;
  observable_task1_model1_srivastava2_VIs := VIs;
  observable_task1_model1_srivastava2_VIr := VIr;
  observable_task1_model1_srivastava2_VI := VI;
  observable_task1_model1_srivastava2_T := T;

  // Reactions:
  v1: -> T; s;
  v10: T1sstar -> Tsstar; alphas*T1sstar;
  v11: Tsstar -> Trstar; alphas*pi*T1sstar;  // modifiers: T1sstar
  v12: Trstar -> Tsstar; alphas*etas*pi*T1sstar;  // modifiers: T1sstar
  v13: Tsstar -> ; deltas*Tsstar;
  v14: -> VIs; deltas*NN*Tsstar;  // modifiers: Tsstar
  v15: VIs -> ; deltas*epsilons*NN*Tsstar;  // modifiers: Tsstar
  v16: VIs -> ; c*VIs;
  v17: T1rstar -> ; mu1*T1rstar;
  v18: T1rstar -> Trstar; alphar*T1rstar;
  v19: Trstar -> ; deltar*Trstar;
  v2: T -> ; mu*T;
  v20: -> VIr; deltar*NN*Trstar;  // modifiers: Trstar
  v21: VIr -> VNIr; deltar*epsilonr*NN*Trstar;  // modifiers: Trstar
  v22: VIr -> ; c*VIr;
  v23: -> VNIs; deltas*epsilons*NN*Tsstar;  // modifiers: Tsstar
  v24: VNIs -> ; c*VNIs;
  v25: VNIr -> ; c*VNIr;
  v3: T -> T1sstar; k*T*VIs;  // modifiers: VIs
  v4: T -> T1rstar; k*T*VIr;  // modifiers: VIr
  v5: T1sstar -> T; bs*T1sstar;
  v6: Tsstar -> T; alphas*etas*T1sstar;  // modifiers: T1sstar
  v7: T1rstar -> T; br*T1rstar;
  v8: Trstar -> T; alphar*etar*T1rstar;  // modifiers: T1rstar
  v9: T1sstar -> ; mu1*T1sstar;
end
