// SBML level 2 version 4

model vanHeerden1()

  // Compartments:
  compartment compartment = 1;

  // Species:
  species ACE in compartment = 0.0474837;
  species ATP in compartment;
  species BPG in compartment = 0.111;
  species $CO2 in compartment = 1;
  species $ETOH in compartment = 0;
  species F16P in compartment = 0.836;
  species F6P in compartment = 0.75247;
  species G6P in compartment = 3.085;
  species GLCi in compartment = 0.087;
  species $GLCo in compartment = 110;
  species $GLY in compartment = 0.15;
  species $Glyc in compartment = 0;
  species $NAD in compartment = 0;
  species NADH in compartment = 0.044;
  species P2G in compartment = 0.13771;
  species P3G in compartment = 0.825;
  species PEP in compartment = 0.1404;
  species PHOS in compartment = 10;
  species PYR in compartment = 0.884031;
  species Prb in compartment = 5;
  species $SUCC in compartment = 0;
  species TRIO in compartment = 0.5177;
  species $Trh in compartment = 0;
  species $X in compartment = 0;

  // Parameters:
  CPFKAMP = 0.0845;
  CPFKATP = 3;
  CPFKF16BP = 0.397;
  CPFKF26BP = 0.0174;
  CPFKF6P = 0;
  CiPFKATP = 100;
  F26BP = 0.02;
  KATPASE = 39.5;
  KEQAK = 0.45;
  KEQHK = 3800;
  KMHKADP = 0.23;
  KMHKATP = 0.15;
  KMHKG6P = 30;
  KMHKGLCi = 0.08;
  KPFKAMP = 0.0995;
  KPFKF16BP = 0.111;
  KPFKF26BP = 0.000682;
  KPHOS = 0.1;
  KSUCC = 21.4;
  KTREHALOSE = 2.32;
  KeqADH = 6.9e-5;
  KeqAK = 0.45;
  KeqALD = 0.069;
  KeqENO = 6.7;
  KeqG3PDH = 4300;
  KeqGLT = 1;
  KeqPGI = 0.314;
  KeqPGK = 3200;
  KeqPGM = 0.19;
  KeqPYK = 6500;
  KeqTPI = 0.045;
  KiADHACE = 1.1;
  KiADHETOH = 90;
  KiADHNAD = 0.92;
  KiADHNADH = 0.031;
  KiHKG6P = 0.07;
  KiPFKATP = 0.65;
  KmADHACE = 1.11;
  KmADHETOH = 17;
  KmADHNAD = 0.17;
  KmADHNADH = 0.11;
  KmALDDHAP = 2.4;
  KmALDF16P = 0.3;
  KmALDGAP = 2;
  KmALDGAPi = 10;
  KmENOP2G = 0.04;
  KmENOPEP = 0.5;
  KmG3PDHDHAP = 0.4;
  KmG3PDHGLY = 1;
  KmG3PDHNAD = 0.93;
  KmG3PDHNADH = 0.023;
  KmGAPDHBPG = 0.0098;
  KmGAPDHGAP = 0.21;
  KmGAPDHNAD = 0.09;
  KmGAPDHNADH = 0.06;
  KmGLTGLCi = 1.1918;
  KmGLTGLCo = 1.1918;
  KmGLYCOGEN = 5.8;
  KmPDCPYR = 4.33;
  KmPFKATP = 0.71;
  KmPFKF6P = 0.1;
  KmPGIF6P = 0.3;
  KmPGIG6P = 1.4;
  KmPGKADP = 0.2;
  KmPGKATP = 0.3;
  KmPGKBPG = 0.003;
  KmPGKP3G = 0.53;
  KmPGMP2G = 0.08;
  KmPGMP3G = 1.2;
  KmPYKADP = 0.3;
  KmPYKATP = 9.3;
  KmPYKF16P = 0.2;
  KmPYKPEP = 0.19;
  L0 = 0.66;
  L0PYK = 60000;
  NADt = 1.59;
  SUMAXP = 3.1;
  VMAXHK = 226.452;
  VmADH = 810;
  VmALD = 322.258;
  VmENO = 365.806;
  VmG3PDH = 70.15;
  VmGAPDHf = 1184.52;
  VmGAPDHr = 6549.68;
  VmGLT = 198;
  VmPDC = 1062.58;
  VmPFK = 182.903;
  VmPGI = 339.677;
  VmPGK = 1306.45;
  VmPGM = 2525.81;
  VmPYK = 1088.71;
  gR = 5.12;
  nPDC = 1.9;
  npyk = 4;
  pT = 10;
  wt = 1;

  // Assignment rules:
  ATP := (-SUMAXP + (1 - 4*KEQAK)*Prb + (4*(1 - 4*KEQAK)*KEQAK*Prb^2 + (SUMAXP - (1 - 4*KEQAK)*Prb)^2)^0.5)/(2*(1 - 4*KEQAK));
  observable_task0_model0_vanHeerden1_F16P := F16P;
  observable_task0_model0_vanHeerden1_PHOS := PHOS;
  observable_task0_model0_vanHeerden1_ATP := ATP;
  observable_task1_model1_vanHeerden1_F16P := F16P;
  observable_task1_model1_vanHeerden1_PHOS := PHOS;
  observable_task1_model1_vanHeerden1_ATP := ATP;

  // Reactions:
  v1: GLCi + Prb -> G6P; VMAXHK*(GLCi*(-SUMAXP + (1 - 4*KEQAK)*Prb + (4*(1 - 4*KEQAK)*KEQAK*Prb^2 + (SUMAXP - (1 - 4*KEQAK)*Prb)^2)^0.5)/(2*(1 - 4*KEQAK)*KMHKATP*KMHKGLCi) - G6P*(Prb - (-SUMAXP + (1 - 4*KEQAK)*Prb + (4*(1 - 4*KEQAK)*KEQAK*Prb^2 + (SUMAXP - (1 - 4*KEQAK)*Prb)^2)^0.5)/(1 - 4*KEQAK))/(KEQHK*KMHKATP*KMHKGLCi))/(compartment*(1 + G6P/KMHKG6P + wt*G6P/KiHKG6P + GLCi/KMHKGLCi)*(1 + (-SUMAXP + (1 - 4*KEQAK)*Prb + (4*(1 - 4*KEQAK)*KEQAK*Prb^2 + (SUMAXP - (1 - 4*KEQAK)*Prb)^2)^0.5)/(2*(1 - 4*KEQAK)*KMHKATP) + (Prb - (-SUMAXP + (1 - 4*KEQAK)*Prb + (4*(1 - 4*KEQAK)*KEQAK*Prb^2 + (SUMAXP - (1 - 4*KEQAK)*Prb)^2)^0.5)/(1 - 4*KEQAK))/KMHKADP));
  v10: P2G -> PEP; VmENO*(P2G - PEP/KeqENO)/(compartment*KmENOP2G*(1 + P2G/KmENOP2G + PEP/KmENOPEP));
  v11: PEP -> Prb + PYR; VmPYK*PEP*(1 + PEP/KmPYKPEP)^(-1 + npyk)*(Prb - (-SUMAXP + (1 - 4*KeqAK)*Prb + (4*(1 - 4*KeqAK)*KeqAK*Prb^2 + (SUMAXP - (1 - 4*KeqAK)*Prb)^2)^0.5)/(1 - 4*KeqAK))/(compartment*KmPYKPEP*(KmPYKADP + Prb - (-SUMAXP + (1 - 4*KeqAK)*Prb + (4*(1 - 4*KeqAK)*KeqAK*Prb^2 + (SUMAXP - (1 - 4*KeqAK)*Prb)^2)^0.5)/(1 - 4*KeqAK))*((1 + PEP/KmPYKPEP)^npyk + L0PYK*((1 + (-SUMAXP + (1 - 4*KeqAK)*Prb + (4*(1 - 4*KeqAK)*KeqAK*Prb^2 + (SUMAXP - (1 - 4*KeqAK)*Prb)^2)^0.5)/(2*(1 - 4*KeqAK)*KmPYKATP))/(1 + F16P/KmPYKF16P))^npyk));  // modifiers: F16P
  v12: PYR -> ACE + $CO2; VmPDC*PYR^nPDC/(compartment*KmPDCPYR^nPDC*(1 + PYR^nPDC/KmPDCPYR^nPDC));
  v13: 2 ACE + 3 $NAD -> $SUCC + 3 NADH; KSUCC*ACE/compartment;
  v14: $GLCo -> GLCi; VmGLT*(GLCo - GLCi/KeqGLT)/(compartment*KmGLTGLCo*(1 + GLCo/KmGLTGLCo + GLCi/KmGLTGLCi + 0.91*GLCo*GLCi/(KmGLTGLCi*KmGLTGLCo)));
  v15: ACE + NADH -> $ETOH + $NAD; -(VmADH*(ETOH*(NADt - NADH) - ACE*NADH/KeqADH)/(compartment*KiADHNAD*KmADHETOH*(1 + ETOH*KmADHNAD/(KiADHNAD*KmADHETOH) + KmADHNADH*ACE/(KiADHNADH*KmADHACE) + (NADt - NADH)/KiADHNAD + ETOH*(NADt - NADH)/(KiADHNAD*KmADHETOH) + ETOH*ACE*(NADt - NADH)/(KiADHACE*KiADHNAD*KmADHETOH) + KmADHNADH*ACE*(NADt - NADH)/(KiADHNAD*KiADHNADH*KmADHACE) + NADH/KiADHNADH + ETOH*KmADHNAD*NADH/(KiADHNAD*KiADHNADH*KmADHETOH) + ACE*NADH/(KiADHNADH*KmADHACE) + ETOH*ACE*NADH/(KiADHETOH*KiADHNADH*KmADHACE))));
  v16: NADH + TRIO -> PHOS + $GLY + $NAD; VmG3PDH*(-(GLY*(NADt - NADH)/KeqG3PDH) + NADH*TRIO/(1 + KeqTPI))/(compartment*KmG3PDHDHAP*KmG3PDHNADH*(1 + (NADt - NADH)/KmG3PDHNAD + NADH/KmG3PDHNADH)*(1 + GLY/KmG3PDHGLY + TRIO/((1 + KeqTPI)*KmG3PDHDHAP)));
  v17: Prb -> PHOS; KATPASE*(-SUMAXP + Prb - 4*KeqAK*Prb + (SUMAXP^2 - 2*SUMAXP*Prb + 8*KeqAK*SUMAXP*Prb + Prb^2 - 4*KeqAK*Prb^2)^0.5)/(compartment*(2 - 8*KeqAK));
  v18: $X -> PHOS; KPHOS*(pT - PHOS)/compartment;
  v2: G6P -> F6P; VmPGI*(-(F6P/KeqPGI) + G6P)/(compartment*KmPGIG6P*(1 + F6P/KmPGIF6P + G6P/KmPGIG6P));
  v3: G6P + Prb -> $Glyc + 2 PHOS; KmGLYCOGEN*G6P/compartment;
  v4: Prb + 2 G6P -> $Trh + 3 PHOS; wt*KTREHALOSE*G6P/compartment;
  v5: F6P + Prb -> F16P; gR*VmPFK*F6P*(-SUMAXP + Prb - 4*KeqAK*Prb + (SUMAXP^2 - 2*SUMAXP*Prb + 8*KeqAK*SUMAXP*Prb + Prb^2 - 4*KeqAK*Prb^2)^0.5)*(1 + F6P/KmPFKF6P + (-SUMAXP + Prb - 4*KeqAK*Prb + (SUMAXP^2 - 2*SUMAXP*Prb + 8*KeqAK*SUMAXP*Prb + Prb^2 - 4*KeqAK*Prb^2)^0.5)/((2 - 8*KeqAK)*KmPFKATP) + gR*F6P*(-SUMAXP + Prb - 4*KeqAK*Prb + (SUMAXP^2 - 2*SUMAXP*Prb + 8*KeqAK*SUMAXP*Prb + Prb^2 - 4*KeqAK*Prb^2)^0.5)/((2 - 8*KeqAK)*KmPFKATP*KmPFKF6P))/(compartment*(2 - 8*KeqAK)*KmPFKATP*KmPFKF6P*(L0*(1 + CPFKF26BP*F26BP/KPFKF26BP + CPFKF16BP*F16P/KPFKF16BP)^2*(1 + 2*CPFKAMP*KeqAK*(SUMAXP - (SUMAXP^2 - 2*SUMAXP*Prb + 8*KeqAK*SUMAXP*Prb + Prb^2 - 4*KeqAK*Prb^2)^0.5)^2/((-1 + 4*KeqAK)*KPFKAMP*(SUMAXP - Prb + 4*KeqAK*Prb - (SUMAXP^2 - 2*SUMAXP*Prb + 8*KeqAK*SUMAXP*Prb + Prb^2 - 4*KeqAK*Prb^2)^0.5)))^2*(1 + CiPFKATP*(-SUMAXP + Prb - 4*KeqAK*Prb + (SUMAXP^2 - 2*SUMAXP*Prb + 8*KeqAK*SUMAXP*Prb + Prb^2 - 4*KeqAK*Prb^2)^0.5)/((2 - 8*KeqAK)*KiPFKATP))^2*(1 + CPFKATP*(-SUMAXP + Prb - 4*KeqAK*Prb + (SUMAXP^2 - 2*SUMAXP*Prb + 8*KeqAK*SUMAXP*Prb + Prb^2 - 4*KeqAK*Prb^2)^0.5)/((2 - 8*KeqAK)*KmPFKATP))^2/((1 + F26BP/KPFKF26BP + F16P/KPFKF16BP)^2*(1 + 2*KeqAK*(SUMAXP - (SUMAXP^2 - 2*SUMAXP*Prb + 8*KeqAK*SUMAXP*Prb + Prb^2 - 4*KeqAK*Prb^2)^0.5)^2/((-1 + 4*KeqAK)*KPFKAMP*(SUMAXP - Prb + 4*KeqAK*Prb - (SUMAXP^2 - 2*SUMAXP*Prb + 8*KeqAK*SUMAXP*Prb + Prb^2 - 4*KeqAK*Prb^2)^0.5)))^2*(1 + (-SUMAXP + Prb - 4*KeqAK*Prb + (SUMAXP^2 - 2*SUMAXP*Prb + 8*KeqAK*SUMAXP*Prb + Prb^2 - 4*KeqAK*Prb^2)^0.5)/((2 - 8*KeqAK)*KiPFKATP))^2) + (1 + F6P/KmPFKF6P + (-SUMAXP + Prb - 4*KeqAK*Prb + (SUMAXP^2 - 2*SUMAXP*Prb + 8*KeqAK*SUMAXP*Prb + Prb^2 - 4*KeqAK*Prb^2)^0.5)/((2 - 8*KeqAK)*KmPFKATP) + gR*F6P*(-SUMAXP + Prb - 4*KeqAK*Prb + (SUMAXP^2 - 2*SUMAXP*Prb + 8*KeqAK*SUMAXP*Prb + Prb^2 - 4*KeqAK*Prb^2)^0.5)/((2 - 8*KeqAK)*KmPFKATP*KmPFKF6P))^2));
  v6: F16P -> 2 TRIO; VmALD*(F16P - KeqTPI*TRIO^2/(KeqALD*(1 + KeqTPI)^2))/(compartment*KmALDF16P*(1 + F16P/KmALDF16P + TRIO/((1 + KeqTPI)*KmALDDHAP) + KeqTPI*TRIO/((1 + KeqTPI)*KmALDGAP) + KeqTPI*F16P*TRIO/((1 + KeqTPI)*KmALDF16P*KmALDGAPi) + KeqTPI*TRIO^2/((1 + KeqTPI)^2*KmALDDHAP*KmALDGAP)));
  v7: PHOS + TRIO + $NAD -> BPG + NADH; (-(VmGAPDHr*BPG*NADH/(KmGAPDHBPG*KmGAPDHNADH)) + KeqTPI*VmGAPDHf*(NADt - NADH)*PHOS*TRIO/((1 + KeqTPI)*KmGAPDHGAP*KmGAPDHNAD))/(compartment*(1 + (NADt - NADH)/KmGAPDHNAD + NADH/KmGAPDHNADH)*(1 + PHOS)*(1 + BPG/KmGAPDHBPG + KeqTPI*TRIO/((1 + KeqTPI)*KmGAPDHGAP)));
  v8: BPG -> P3G + Prb; VmPGK*(KeqPGK*BPG*(SUMAXP - (SUMAXP^2 - 2*SUMAXP*Prb + 8*KeqAK*SUMAXP*Prb + Prb^2 - 4*KeqAK*Prb^2)^0.5)/(1 - 4*KeqAK) - P3G*(-SUMAXP + Prb - 4*KeqAK*Prb + (SUMAXP^2 - 2*SUMAXP*Prb + 8*KeqAK*SUMAXP*Prb + Prb^2 - 4*KeqAK*Prb^2)^0.5)/(2 - 8*KeqAK))/(compartment*KmPGKATP*KmPGKP3G*(1 + BPG/KmPGKBPG + P3G/KmPGKP3G)*(1 + (SUMAXP - (SUMAXP^2 - 2*SUMAXP*Prb + 8*KeqAK*SUMAXP*Prb + Prb^2 - 4*KeqAK*Prb^2)^0.5)/((1 - 4*KeqAK)*KmPGKADP) + (-SUMAXP + Prb - 4*KeqAK*Prb + (SUMAXP^2 - 2*SUMAXP*Prb + 8*KeqAK*SUMAXP*Prb + Prb^2 - 4*KeqAK*Prb^2)^0.5)/((2 - 8*KeqAK)*KmPGKATP)));
  v9: P3G -> P2G; VmPGM*(-(P2G/KeqPGM) + P3G)/(compartment*KmPGMP3G*(1 + P2G/KmPGMP2G + P3G/KmPGMP3G));
end
