// SBML level 2 version 4

model vernoux1()

  // Compartments:
  compartment c_1 = 1;  // isVersionOf GO:0005623

  // Species:
  species A in c_1 = 10; A is "ARF";  // isVersionOf uniprot:Q94JM3
  species D_IA in c_1 = 10; D_IA is "Aux/IAA:ARF";  // hasPart uniprot:P49677 uniprot:Q94JM3
  species D_II in c_1 = 10; D_II is "Aux/IAA:Aux/IAA";  // hasPart uniprot:P49677
  species I in c_1 = 10; I is "Aux/IAA";  // isVersionOf uniprot:P49677
  species R in c_1 = 1; R is "mRNA";  // isVersionOf CHEBI:33699
  species aux in c_1; aux is "auxin";  // isVersionOf uniprot:Q96247

  // Parameters:
  B_d = 100;
  K_IA = 10;
  K_II = 10;
  K_aux = 1;
  // ARF degradation rate, based on the value for ARF1, cf. Salmon et al. The Plant Journal (2008)
  d_A = 0.003;
  // Aux/IAA basal degradation rate (without auxin), based on half-lifes measured in Dreher et al. The Plant Cell 2006.
  d_I = 0.05;
  d_IA = 0.003;
  d_II = 0.003;
  // Auxin target gene mRNA degradation rate. Computed from the mean half life of Aux/IAA mRNA in Narsai et al. The Plant Cell 2007.
  d_r = 0.007;
  f_A = 10;
  f_c = 10;
  gamma_I = 10;
  k_Am = 10;
  k_IA = 1;
  k_II = 1;
  pi_A = 1;
  pi_I = 1;
  w_A = 10;
  w_D = 10;
  w_I = 10;

  // Assignment rules:
  aux_basal := 1/(K_aux*(gamma_I - 1));
  kprime_II := K_II*k_II;
  kprime_IA := K_IA*k_IA;
  aux := piecewise(5, time > 1000, 0);
  observable_plot20_R_datagen1 := task23_model23_vernoux1_R;
  observable_plot20_D_IA_datagen1 := task23_model23_vernoux1_D_IA;
  observable_plot20_D_II_datagen1 := task23_model23_vernoux1_D_II;
  observable_plot20_A_datagen1 := task23_model23_vernoux1_A;
  observable_plot20_I_datagen1 := task23_model23_vernoux1_I;
  observable_plot19_R_datagen1 := task22_model22_vernoux1_R;
  observable_plot19_D_IA_datagen1 := task22_model22_vernoux1_D_IA;
  observable_plot19_D_II_datagen1 := task22_model22_vernoux1_D_II;
  observable_plot19_A_datagen1 := task22_model22_vernoux1_A;
  observable_plot19_I_datagen1 := task22_model22_vernoux1_I;
  observable_plot18_R_datagen1 := task21_model21_vernoux1_R;
  observable_plot18_D_IA_datagen1 := task21_model21_vernoux1_D_IA;
  observable_plot18_D_II_datagen1 := task21_model21_vernoux1_D_II;
  observable_plot18_A_datagen1 := task21_model21_vernoux1_A;
  observable_plot18_I_datagen1 := task21_model21_vernoux1_I;
  observable_plot17_R_datagen1 := task20_model20_vernoux1_R;
  observable_plot17_D_IA_datagen1 := task20_model20_vernoux1_D_IA;
  observable_plot17_D_II_datagen1 := task20_model20_vernoux1_D_II;
  observable_plot17_A_datagen1 := task20_model20_vernoux1_A;
  observable_plot17_I_datagen1 := task20_model20_vernoux1_I;
  observable_plot16_R_datagen1 := task19_model19_vernoux1_R;
  observable_plot16_D_IA_datagen1 := task19_model19_vernoux1_D_IA;
  observable_plot16_D_II_datagen1 := task19_model19_vernoux1_D_II;
  observable_plot16_A_datagen1 := task19_model19_vernoux1_A;
  observable_plot16_I_datagen1 := task19_model19_vernoux1_I;
  observable_plot15_R_datagen1 := task18_model18_vernoux1_R;
  observable_plot15_D_IA_datagen1 := task18_model18_vernoux1_D_IA;
  observable_plot15_D_II_datagen1 := task18_model18_vernoux1_D_II;
  observable_plot15_A_datagen1 := task18_model18_vernoux1_A;
  observable_plot15_I_datagen1 := task18_model18_vernoux1_I;
  observable_plot14_R_datagen1 := task17_model17_vernoux1_R;
  observable_plot14_D_IA_datagen1 := task17_model17_vernoux1_D_IA;
  observable_plot14_D_II_datagen1 := task17_model17_vernoux1_D_II;
  observable_plot14_A_datagen1 := task17_model17_vernoux1_A;
  observable_plot14_I_datagen1 := task17_model17_vernoux1_I;
  observable_plot13_R_datagen1 := task16_model16_vernoux1_R;
  observable_plot13_D_IA_datagen1 := task16_model16_vernoux1_D_IA;
  observable_plot13_D_II_datagen1 := task16_model16_vernoux1_D_II;
  observable_plot13_A_datagen1 := task16_model16_vernoux1_A;
  observable_plot13_I_datagen1 := task16_model16_vernoux1_I;
  observable_plot12_R_datagen1 := task15_model15_vernoux1_R;
  observable_plot12_D_IA_datagen1 := task15_model15_vernoux1_D_IA;
  observable_plot12_D_II_datagen1 := task15_model15_vernoux1_D_II;
  observable_plot12_A_datagen1 := task15_model15_vernoux1_A;
  observable_plot12_I_datagen3 := task15_model15_vernoux1_I;
  observable_plot11_R_datagen1 := task11_model11_vernoux1_R;
  observable_plot11_D_IA_datagen1 := task11_model11_vernoux1_D_IA;
  observable_plot11_D_II_datagen1 := task11_model11_vernoux1_D_II;
  observable_plot11_A_datagen1 := task11_model11_vernoux1_A;
  observable_plot11_I_datagen1 := task11_model11_vernoux1_I;
  observable_plot10_R_datagen1 := task10_model10_vernoux1_R;
  observable_plot10_D_IA_datagen1 := task10_model10_vernoux1_D_IA;
  observable_plot10_D_II_datagen1 := task10_model10_vernoux1_D_II;
  observable_plot10_A_datagen1 := task10_model10_vernoux1_A;
  observable_plot10_I_datagen1 := task10_model10_vernoux1_I;
  observable_plot9_R_datagen1 := task9_model9_vernoux1_R;
  observable_plot9_D_IA_datagen1 := task9_model9_vernoux1_D_IA;
  observable_plot9_D_II_datagen1 := task9_model9_vernoux1_D_II;
  observable_plot9_A_datagen1 := task9_model9_vernoux1_A;
  observable_plot9_I_datagen1 := task9_model9_vernoux1_I;
  observable_plot8_R_datagen1 := task8_model8_vernoux1_R;
  observable_plot8_D_IA_datagen1 := task8_model8_vernoux1_D_IA;
  observable_plot8_D_II_datagen1 := task8_model8_vernoux1_D_II;
  observable_plot8_A_datagen1 := task8_model8_vernoux1_A;
  observable_plot8_I_datagen1 := task8_model8_vernoux1_I;
  observable_plot7_R_datagen1 := task7_model7_vernoux1_R;
  observable_plot7_D_IA_datagen1 := task7_model7_vernoux1_D_IA;
  observable_plot7_D_II_datagen1 := task7_model7_vernoux1_D_II;
  observable_plot7_A_datagen1 := task7_model7_vernoux1_A;
  observable_plot7_I_datagen1 := task7_model7_vernoux1_I;
  observable_plot6_R_datagen1 := task6_model6_vernoux1_R;
  observable_plot6_D_IA_datagen1 := task6_model6_vernoux1_D_IA;
  observable_plot6_D_II_datagen1 := task6_model6_vernoux1_D_II;
  observable_plot6_A_datagen1 := task6_model6_vernoux1_A;
  observable_plot6_I_datagen1 := task6_model6_vernoux1_I;
  observable_plot5_R_datagen1 := task5_model5_vernoux1_R;
  observable_plot5_D_IA_datagen1 := task5_model5_vernoux1_D_IA;
  observable_plot5_D_II_datagen1 := task5_model5_vernoux1_D_II;
  observable_plot5_A_datagen1 := task5_model5_vernoux1_A;
  observable_plot5_I_datagen1 := task5_model5_vernoux1_I;
  observable_plot4_R_datagen1 := task4_model4_vernoux1_R;
  observable_plot4_D_IA_datagen1 := task4_model4_vernoux1_D_IA;
  observable_plot4_D_II_datagen1 := task4_model4_vernoux1_D_II;
  observable_plot4_A_datagen1 := task4_model4_vernoux1_A;
  observable_plot4_I_datagen1 := task4_model4_vernoux1_I;
  observable_plot3_R_datagen1 := task3_model3_vernoux1_R;
  observable_plot3_D_IA_datagen1 := task3_model3_vernoux1_D_IA;
  observable_plot3_D_II_datagen1 := task3_model3_vernoux1_D_II;
  observable_plot3_A_datagen1 := task3_model3_vernoux1_A;
  observable_plot3_I_datagen1 := task3_model3_vernoux1_I;
  observable_plot2_R_datagen1 := task2_model2_vernoux1_R;
  observable_plot2_D_IA_datagen1 := task2_model2_vernoux1_D_IA;
  observable_plot2_D_II_datagen1 := task2_model2_vernoux1_D_II;
  observable_plot2_A_datagen1 := task2_model2_vernoux1_A;
  observable_plot2_I_datagen1 := task2_model2_vernoux1_I;
  observable_task1_model1_vernoux1_R := R;
  observable_task1_model1_vernoux1_D_IA := D_IA;
  observable_task1_model1_vernoux1_D_II := D_II;
  observable_task1_model1_vernoux1_A := A;
  observable_task1_model1_vernoux1_I := I;
  observable_plot21_R_datagen1 := task0_model0_vernoux1_R;
  observable_plot21_D_IA_datagen1 := task0_model0_vernoux1_D_IA;
  observable_plot21_D_II_datagen1 := task0_model0_vernoux1_D_II;
  observable_plot21_A_datagen1 := task0_model0_vernoux1_A;
  observable_plot21_I_datagen1 := task0_model0_vernoux1_I;
  observable_task0_model0_vernoux1_aux := aux;

  // Reactions:
  reac_DIA: I + A -> D_IA; k_IA*I*A - kprime_IA*D_IA;  // isVersionOf GO:0006461
  reac_DIAxA: D_IA => A; gamma_I*d_I*K_aux*aux/(K_aux*aux + 1)*D_IA;  // modifiers: aux; isVersionOf GO:0043241
  reac_DII: I + I -> D_II; k_II*I*I - kprime_II*D_II;  // isVersionOf GO:0006461
  reac_DIIxI: D_II => I; gamma_I*d_I*K_aux*aux/(K_aux*aux + 1)*D_II;  // modifiers: aux; isVersionOf GO:0043241
  reac_degrA: A => ; d_A*A;  // isVersionOf GO:0009056
  reac_degrDIA: D_IA => ; d_IA*D_IA;  // isVersionOf GO:0009056
  reac_degrDII: D_II => ; d_II*D_II;  // isVersionOf GO:0009056
  reac_degrI: I => ; gamma_I*d_I*K_aux*aux/(K_aux*aux + 1)*I;  // modifiers: aux; isVersionOf GO:0009056
  reac_degrR: R => ; d_r*R;  // isVersionOf GO:0009056
  reac_prodA: => A; pi_A;  // isVersionOf GO:0009058
  reac_prodI: => I; pi_I*R;  // modifiers: R; isVersionOf GO:0009058
  reac_prodR: => R; (1 + f_c/B_d*A*(1 + w_A*f_A*A/B_d))/(1 + A/B_d*(1 + w_A*A/B_d) + w_I*A*I/(K_IA*B_d) + w_D*D_IA/B_d + k_Am);  // modifiers: I, D_IA, A; isVersionOf GO:0009299
end
