// SBML level 3 version 1

model wahl1()

  // Compartments:
  compartment default = 1;

  // Species:
  species w in default = 0;
  species x in default = 2;
  species y1 in default = 0;
  species y2 in default = 0.45;
  species y3 in default = 0.45;
  species z1 in default = 0;
  species z2 in default = 0.072103;
  species z3 in default = 0.0180258;

  // Parameters:
  a = 0.1;
  b = 0.4;
  beta1 = 0.08;
  beta2 = 0.075;
  beta3 = 0.06;
  c1 = 0.9;
  c2 = 0.9;
  c3 = 0.9;
  d = 0.5;
  k1 = 0.4;
  k2 = 0.4;
  k3 = 0.4;
  lambda = 1;
  p = 0.3;
  q = 0.2;

  // Assignment rules:
  observable_task0_model0_wahl1_y1 := y1;
  observable_task0_model0_wahl1_y2 := y2;
  observable_task0_model0_wahl1_y3 := y3;
  observable_task0_model0_wahl1_w := w;
  observable_task0_model0_wahl1_z1 := z1;
  observable_task0_model0_wahl1_z2 := z2;
  observable_task0_model0_wahl1_z3 := z3;

  // Reactions:
  v1: -> x; lambda;
  v10: y2 -> ; p*y2*z2;  // modifiers: z2
  v11: y2 -> ; q*w*y2;  // modifiers: w
  v12: y3 -> ; a*y3;
  v13: y3 -> ; p*y3*z3;  // modifiers: z3
  v14: y3 -> ; q*w*y3;  // modifiers: w
  v15: -> z1; c1*y1*z1;  // modifiers: y1
  v16: z1 -> ; b*z1;
  v17: -> z2; c2*y2*z2;  // modifiers: y2
  v18: z2 -> ; b*z2;
  v19: -> z3; c3*y3*z3;  // modifiers: y3
  v2: x -> ; d*x;
  v20: z3 -> ; b*z3;
  v21: -> w; k1*w*y1;  // modifiers: y1
  v22: -> w; k2*w*y2;  // modifiers: y2
  v23: -> w; k3*w*y3;  // modifiers: y3
  v24: w -> ; b*w;
  v3: x -> y1; beta1*x*y1;
  v4: x -> y2; beta2*x*y2;
  v5: x -> y3; beta3*x*y3;
  v6: y1 -> ; a*y1;
  v7: y1 -> ; p*y1*z1;  // modifiers: z1
  v8: y1 -> ; q*w*y1;  // modifiers: w
  v9: y2 -> ; a*y2;

  // Events:
  at (time > 2499), t0=false, persistent=false, fromTrigger=false: y1 = 0.15, z1 = 0.00992693, w = 0.0215649;
end
