// SBML level 3 version 1

model wang2()

  // Compartments:
  compartment default = 1;

  // Species:
  species CC in default = 0;
  species Mstar in default = 0;
  species T in default = 1000000;
  species Tstar in default = 0;
  species V in default = 0.001;

  // Parameters:
  Nc = 15;
  d1 = 0.01;
  d2 = 1;
  d3 = 0.001;
  d4 = 23;
  d5 = 6.6;
  f = 0.95;
  gammai = 0.00015;
  k = 2.4e-8;
  lambda = 10000;
  pv = 30000;

  // Assignment rules:
  observable_task0_model0_wang2_T := T;
  observable_task1_model1_wang2_T := T;
  observable_task2_model2_wang2_T := T;
  observable_task3_model3_wang2_T := T;
  observable_task4_model4_wang2_T := T;
  observable_task5_model5_wang2_T := T;

  // Reactions:
  v1: -> T; lambda;
  v10: V -> ; d4*V;
  v11: -> CC; d3*Nc*Mstar;  // modifiers: Mstar
  v12: CC -> ; d5*CC;
  v2: T -> Tstar; k*T*V;  // modifiers: V
  v3: T -> Tstar; gammai*k*CC*T*V;  // modifiers: CC, V
  v4: T -> ; d1*T;
  v5: Tstar -> Mstar; f*k*T*V;  // modifiers: V, T
  v6: Tstar -> Mstar; f*gammai*k*CC*T*V;  // modifiers: CC, T, V
  v7: Tstar -> ; d2*Tstar;
  v8: Mstar -> ; d3*Mstar;
  v9: -> V; pv*Tstar;  // modifiers: Tstar
end
