// SBML level 3 version 1

model wodarz1()

  // Compartments:
  compartment default = 1;

  // Species:
  species w in default = 0.01;
  species x in default = 100;
  species y in default = 0.01;
  species z in default = 0;

  // Parameters:
  a = 0.5;
  b = 0.0015;
  beta = 0.01;
  c = 0.063;
  d = 0.1;
  h = 0.1;
  lambda = 10;
  p = 1;
  q = 0.1;

  // Assignment rules:
  observable_task0_model0_wodarz2_w := w;
  observable_plot2_z_datagen1 := task0_model0_wodarz2_z;
  observable_task0_model0_wodarz2_z := z;
  observable_task0_model0_wodarz2_y := y;

  // Reactions:
  v1: -> x; lambda;
  v2: x -> ; d*x;
  v3: x -> y; beta*x*y;
  v4: y -> ; a*y;
  v5: y -> ; p*y*z;  // modifiers: z
  v6: -> w; c*w*y;  // modifiers: y
  v7: w -> z; c*q*w*y;  // modifiers: y
  v8: w -> ; b*w;
  v9: z -> ; h*z;
end
