// SBML level 3 version 1

model wodarz3()

  // Compartments:
  compartment default = 1;

  // Species:
  species v in default = 0.1;
  species x in default = 0.1;
  species y in default = 0;

  // Parameters:
  a = 0.2;
  beta = 0.2;
  d = 0.1;
  eta = 1;
  k = 10;
  r = 1;
  u = 0.5;

  // Assignment rules:
  observable_task0_model0_wodarz3_x := x;
  observable_task0_model0_wodarz3_y := y;
  observable_task1_model1_wodarz3_x := x;
  observable_task1_model1_wodarz3_y := y;

  // Reactions:
  v1: -> x; r*v*x;  // modifiers: v
  v2: x -> ; r*v*x*(x + y)/k;  // modifiers: y, v
  v3: x -> ; d*x;
  v4: x -> y; beta*v*x;  // modifiers: v
  v5: -> y; r*v*y;  // modifiers: v
  v6: y -> ; r*v*y*(x + y)/k;  // modifiers: x, v
  v7: y -> ; a*y;
  v8: -> v; eta*y;  // modifiers: y
  v9: v -> ; u*v;
end
